<FDM_CONFIG NAME="boeing747-jsbsim" VERSION="1.65">

<!--
  ***********************************************************************************
  *                                                                                 *
  *  File:           boeing747-jsbsim.xml                                           *
  *                                                                                 *
  *  Author:         Darren Jones                                                   *
  *                  Department of Mechanical Engineering                           *
  *                  University of Bath                                             *
  *                  UK                                                             *
  *                  en0dpj@bath.ac.uk (up to June 2004)                            *
  *                  darrenpauljones@hotmail.com (after June 2004)                  *
  *                                                                                 *
  *  Function:       Models a 1970 Boeing 747-100B with Pratt & Whitney JT9D-3      *
  *                  turbofan engines                                               *
  *                                                                                 *
  *  Sources:        1. Hanke, C.R., The Simulation of a Large Jet Transport        *
  *                     Aircraft, Vol I: Mathematical Model, 1970                   *
  *                  2. Hanke, C.R., The Simulation of a Large Jet Transport        *
  *                     Aircraft, Vol II: Modeling Data, 1970                       *
  *                  3. Roskam, J., Airplane Flight Dynamics and Automatic Flight   *
  *                     Control, Vol I, 1979                                        *
  *                  4. Jane's All The World's Aircraft 1980-1981                   *
  *                                                                                 *
  *  Notes:          1. Since a moving stabilizer property is not available the     *
  *                     speedbrake property is being used to emulate the Boeing     *
  *                     747 trimmable horizontal stabilizer.                        *
  *                  2. Aircraft origin for measurements is the nose.               *
  *                                                                                 *
  *  Limitations:    1. Aerodynamic effects of undercarriage not modelled           *
  *                  2. Undercarriage data approximated                             *
  *                  2. Spoilers not modelled                                       *
  *                                                                                 *
  ***********************************************************************************
-->

  <!-- ************************************************************************** -->
  <METRICS>
    AC_WINGAREA  5500.0  <!-- ft2 -->
    AC_WINGSPAN   195.7  <!-- ft  -->
    AC_CHORD       27.3  <!-- MAC, in ft  -->
    AC_HTAILAREA 1470.0  <!-- ft2 -->
    AC_HTAILARM    99.0  <!-- ft  -->
    AC_VTAILAREA  830.0  <!-- ft2 -->
    AC_LV         108.6  <!-- ft  -->
    AC_IXX     18420000  <!-- slug-ft2 @EW+pax, 19500000 @MTOW-->
    AC_IYY     25280000  <!-- slug-ft2 @EW+pax, 34600000 @MTOW -->
    AC_IZZ     52980000  <!-- slug-ft2 @EW+pax, 53000000 @MTOW-->
    AC_IXZ       940000  <!-- slug-ft2 @EW+pax,  1080000 @MTOW-->
    AC_EMPTYWT   370000	 <!-- aircraft empty weight -->
    <!-- origin is nose, x,y,z in inches -->
    AC_CGLOC             1340    0   -39  <!-- EW CG at 25% MAC -->
    AC_AERORP            1340    0   -39  <!-- Ref. point at 25% MAC -->
    AC_POINTMASS  95500  1455    0   -39  <!-- Cargo and Pax -->
    AC_EYEPTLOC           236  -40   118
    AC_VRP		 1340    0   -39
  </METRICS>
  <!-- ************************************************************************** -->

  <!-- ************************************************************************** -->
  <UNDERCARRIAGE>
    AC_GEAR NOSE         305     0  -222  200000 15000  0.8 0.50 0.02 STEERABLE NOSE  10 RETRACT
    AC_GEAR FWD_LEFT    1313  -217  -222  400000 25000  0.8 0.50 0.02 FIXED     LEFT  0  RETRACT
    AC_GEAR REAR_LEFT   1434   -76  -222  400000 25000  0.8 0.50 0.02 FIXED     LEFT  0  RETRACT
    AC_GEAR REAR_RIGHT  1434    76  -222  400000 25000  0.8 0.50 0.02 FIXED     RIGHT 0  RETRACT
    AC_GEAR FWD_RIGHT   1313   217  -222  400000 25000  0.8 0.50 0.02 FIXED     RIGHT 0  RETRACT
    AC_GEAR TAIL_TIP    2635     0    48 2000000 100000 0.2  0.2 0.02 FIXED     NONE  0  FIXED
    AC_GEAR ENG_LEFT     915  -477  -166 2000000 100000 0.2  0.2 0.02 FIXED     NONE  0  FIXED
    AC_GEAR ENG_RIGHT    915   477  -166 2000000 100000 0.2  0.2 0.02 FIXED     NONE  0  FIXED
    AC_GEAR W_TIP_LEFT  1719 -1137    42 2000000 100000 0.2  0.2 0.02 FIXED     NONE  0  FIXED
    AC_GEAR W_TIP_RIGHT 1719 -1137    42 2000000 100000 0.2  0.2 0.02 FIXED     NONE  0  FIXED
    AC_GEAR NOSE_TIP     277     0   -97 2000000 100000 0.2  0.2 0.02 FIXED     NONE  0  FIXED
  </UNDERCARRIAGE>
  <!-- ************************************************************************** -->

  <!-- ************************************************************************** -->
  <PROPULSION>
  <!-- pitch +0.044, yaw left -0.035, yaw right +0.035 -->
    <!-- Left Outboard -->
    <AC_ENGINE FILE="JT9D-3">
      XLOC   1375
      YLOC   -839
      ZLOC    -47
      PITCH     0.044
      YAW      -0.035
      FEED      0
      FEED      1
      <AC_THRUSTER FILE="direct">
        XLOC   1525
        YLOC   -839
        ZLOC    -47
        PITCH     0.044
        YAW      -0.035
      </AC_THRUSTER>
    </AC_ENGINE>

    <!-- Left Inboard -->
    <AC_ENGINE FILE="JT9D-3">
      XLOC   1044
      YLOC   -477
      ZLOC    -95
      PITCH     0.044
      YAW      -0.035
      FEED      1
      FEED      2
      <AC_THRUSTER FILE="direct">
        XLOC   1194
        YLOC   -477
        ZLOC    -95
        PITCH     0.044
        YAW      -0.035
      </AC_THRUSTER>
    </AC_ENGINE>

    <!-- Right Inboard -->
    <AC_ENGINE FILE="JT9D-3">
      XLOC   1044
      YLOC    477
      ZLOC    -95
      PITCH     0.044
      YAW       0.035
      FEED      2
      FEED      3
      <AC_THRUSTER FILE="direct">
        XLOC   1194
        YLOC    477
        ZLOC    -95
        PITCH     0.044
        YAW       0.035
      </AC_THRUSTER>
    </AC_ENGINE>

    <!-- Right Outboard -->
    <AC_ENGINE FILE="JT9D-3">
      XLOC   1375
      YLOC    839
      ZLOC    -47
      PITCH     0.044
      YAW       0.035
      FEED      3
      FEED      4
      <AC_THRUSTER FILE="direct">
        XLOC   1525
        YLOC    839
        ZLOC    -47
        PITCH     0.044
        YAW       0.035
      </AC_THRUSTER>
    </AC_ENGINE>

    <!-- Left Outboard -->
    <AC_TANK TYPE="FUEL" NUMBER="0">
      XLOC        1590
      YLOC        -749
      ZLOC         -28
      RADIUS       1.0
      CAPACITY   25000
      CONTENTS   25000
    </AC_TANK>
    <!-- Left Inboard -->
    <AC_TANK TYPE="FUEL" NUMBER="1">
      XLOC        1340
      YLOC        -362
      ZLOC         -57
      RADIUS       1.0
      CAPACITY   75000
      CONTENTS   75000
    </AC_TANK>
    <!-- Centre Tank -->
    <AC_TANK TYPE="FUEL" NUMBER="2">
      XLOC        1165
      YLOC           0
      ZLOC         -84
      RADIUS       1.0
      CAPACITY   80000
      CONTENTS   80000
    </AC_TANK>
    <!-- Right Inboard -->
    <AC_TANK TYPE="FUEL" NUMBER="3">
      XLOC        1340
      YLOC         362
      ZLOC         -57
      RADIUS       1.0
      CAPACITY   75000
      CONTENTS   75000
    </AC_TANK>
    <!-- Right Outboard -->
    <AC_TANK TYPE="FUEL" NUMBER="4">
      XLOC        1590
      YLOC         749
      ZLOC         -28
      RADIUS       1.0
      CAPACITY   25000
      CONTENTS   25000
    </AC_TANK>

  </PROPULSION>
  <!-- ************************************************************************** -->

  <!-- ************************************************************************** -->
  <FLIGHT_CONTROL NAME="boeing747-jsbsim">
     <COMPONENT NAME="Elevator Input" TYPE="SUMMER">
       INPUT        fcs/elevator-cmd-norm
       CLIPTO       -1 1
     </COMPONENT>
     <COMPONENT NAME="Elevator Control" TYPE="AEROSURFACE_SCALE">
       INPUT         fcs/elevator-input
       MIN           -25
       MAX           15
       GAIN          0.0175
     </COMPONENT>
     <COMPONENT NAME="Elevator Summer" TYPE="SUMMER">
       INPUT        fcs/elevator-control
       INPUT        fcs/elevator-fix-pos
       OUTPUT       fcs/elevator-pos-rad
       GAIN         1
     </COMPONENT>
     <!-- NB. speedbrake property used for Stabilizer Position -->
     <COMPONENT NAME="Stabilizer Input" TYPE="SUMMER">
       INPUT         fcs/pitch-trim-cmd-norm
       CLIPTO       -1 1
     </COMPONENT>
     <COMPONENT NAME="Stabilizer Control" TYPE="AEROSURFACE_SCALE">
       INPUT         fcs/stabilizer-input
       MIN           -12
       MAX           3
       OUTPUT        fcs/speedbrake-pos-rad
       GAIN          0.01745
     </COMPONENT>
     <COMPONENT NAME="Roll Trim Sum" TYPE="SUMMER">
       INPUT         fcs/aileron-cmd-norm
       INPUT         fcs/roll-trim-cmd-norm
       CLIPTO        -1 1
     </COMPONENT>
     <COMPONENT NAME="Left Aileron Control" TYPE="AEROSURFACE_SCALE">
       INPUT         fcs/roll-trim-sum
       MIN          -25
       MAX           25
       GAIN          0.01745
       OUTPUT        fcs/left-aileron-pos-rad
     </COMPONENT>
      <COMPONENT NAME="Right Aileron Control" TYPE="AEROSURFACE_SCALE">
       INPUT        -fcs/roll-trim-sum
       MIN          -25
       MAX           25
       GAIN          0.01745
       OUTPUT        fcs/right-aileron-pos-rad
     </COMPONENT>
     <COMPONENT NAME="Yaw Damper Rate" TYPE="PURE_GAIN">
       INPUT         velocities/r-rad_sec
       GAIN          2.5
     </COMPONENT>
     <COMPONENT NAME="Yaw Trim Sum" TYPE="SUMMER">
       INPUT        fcs/rudder-cmd-norm
       INPUT        fcs/yaw-trim-cmd-norm
       CLIPTO       -1 1
     </COMPONENT>
     <COMPONENT NAME="Rudder Sum" TYPE="SUMMER">
       INPUT        fcs/yaw-trim-sum
       INPUT        fcs/yaw-damper-rate
       CLIPTO       -1 1
     </COMPONENT>
     <COMPONENT NAME="Rudder Control" TYPE="AEROSURFACE_SCALE">
       INPUT         fcs/rudder-sum
       MIN           -25
       MAX           25
       GAIN          0.01745
       OUTPUT        fcs/rudder-pos-rad
     </COMPONENT>
     <COMPONENT NAME="Flaps Control" TYPE="KINEMAT">
       INPUT        fcs/flap-cmd-norm
       DETENTS      4
                    0        0
                    10       3
                    20       2
                    30       2
       OUTPUT      fcs/flap-pos-deg
     </COMPONENT>
     <COMPONENT NAME="Gear Control" TYPE="KINEMAT">
       INPUT        gear/gear-cmd-norm
       DETENTS      2
                    0    0
                    1    5
       OUTPUT       gear/gear-pos-norm
     </COMPONENT>
  </FLIGHT_CONTROL>
  <!-- ************************************************************************** -->

  <!-- ************************************************************************** -->
   <AERODYNAMICS>

     AC_ALPHALIMITS  -0.13  0.33
     AC_HYSTLIMITS    0.06  0.26

    <AXIS NAME="LIFT">

      <!-- Hanke 2.0-7/8 -->
      <COEFFICIENT NAME="CLo" TYPE="VECTOR">
        Lift_at_zero_alpha
        4
        velocities/mach-norm
        aero/qbar-psf | metrics/Sw-sqft
        0.00   0.11
        0.20   0.18
        0.65   0.23
        0.90   0.30
      </COEFFICIENT>


      <GROUP NAME="CLb">
        Basic_lift

        <!-- Peden -->
        <FACTOR NAME="kCLge" TYPE="VECTOR">
          Change_in_lift_due_to_ground_effect
          11
          aero/h_b-mac-ft
          none
          0   1.203
          8   1.127
          16  1.073
          24  1.046
          32  1.025
          40  1.019
          48  1.013
          56  1.008
          64  1.006
          72  1.002
          80  1.000
        </FACTOR>

        <!-- Hanke 2.0-7/12 -->
        <COEFFICIENT NAME="CLwbh" TYPE="VECTOR">
          Lift_due_to_alpha
          4
          velocities/mach-norm
          aero/qbar-psf | metrics/Sw-sqft | aero/alpha-rad
          0.00   5.4
          0.20   5.4
          0.65   5.3
          0.90   5.4
         </COEFFICIENT>

        <!-- Hanke 2.0-7/9 -->
        <COEFFICIENT NAME="CLDf" TYPE="VECTOR">
          Delta_lift_due_to_flap_deflection
          4
          fcs/flap-pos-deg
          aero/qbar-psf | metrics/Sw-sqft
          0   0
          10  0.10
          20  0.33
          30  0.78
        </COEFFICIENT>

      </GROUP>

      <!-- Hanke 2.0-18/19 -->
      <COEFFICIENT NAME="CLDe" TYPE="VECTOR">
        Lift_due_to_Elevator_Deflection
        4
        velocities/mach-norm
        aero/qbar-psf | metrics/Sw-sqft | fcs/elevator-pos-rad
        0.00  0.41
        0.20  0.36
        0.65  0.32
        0.90  0.30
      </COEFFICIENT>

      <!-- Hanke 2.0-17 -->
      <COEFFICIENT NAME="CLs" TYPE="VECTOR">
        Lift_due_to_stabilizer_deflection
        4
        velocities/mach-norm
        aero/qbar-psf | metrics/Sw-sqft | fcs/speedbrake-pos-rad
        0.00  0.819
        0.20  0.785
        0.65  0.739
        0.90  0.859
      </COEFFICIENT>

      <!-- Hanke 2.0-13 -->
      <COEFFICIENT NAME="CLadot" TYPE="VECTOR">
        Lift_due_to_alpha_rate
        4
        velocities/mach-norm
        aero/qbar-psf | metrics/Sw-sqft | aero/alphadot-rad_sec | aero/ci2vel
        0.00  6.70
        0.20  6.70
        0.65  6.50
        0.90  5.50
      </COEFFICIENT>

      <!-- Hanke 2.0-14 -->
      <COEFFICIENT NAME="CLq" TYPE="VECTOR">
        Lift_due_to_pitch_rate
        4
        velocities/mach-norm
        aero/qbar-psf | metrics/Sw-sqft | velocities/q-aero-rad_sec | aero/ci2vel
        0.00  6.80
        0.20  5.65
        0.65  5.10
        0.90  6.90
      </COEFFICIENT>

    </AXIS>

    <AXIS NAME="DRAG">

      <!-- Hanke 3.0-5/8/9 -->
      <COEFFICIENT NAME="CDo" TYPE="VECTOR">
        Drag_at_zero_lift
        5
        velocities/mach-norm
        aero/qbar-psf | metrics/Sw-sqft
        0.00  0.022
        0.20  0.020
        0.65  0.022
        0.90  0.024
        0.97  0.050
      </COEFFICIENT>

      <GROUP NAME="CDb">
         Basic_drag

         <!-- Peden -->
         <FACTOR NAME="kCDge" TYPE="VECTOR">
            Change_in_drag_due_to_ground_effect
            11
            aero/h_b-mac-ft
            none
            0   0.048
            8   0.515
            16  0.709
            24  0.815
            32  0.882
            40  0.928
            48  0.962
            56  0.988
            64  1.0
            72  1.0
            80  1.0
         </FACTOR>

         <!-- Hanke 3.0-5 -->
         <COEFFICIENT NAME="CDDf" TYPE="VECTOR">
           Delta_drag_due_to_flap_deflection
           4
           fcs/flap-pos-deg
           aero/qbar-psf | metrics/Sw-sqft
           0   0
           10  0.012
           20  0.031
           30  0.085
         </COEFFICIENT>

         <!-- Roskam p636 -->
         <COEFFICIENT NAME="CDwbh" TYPE="VECTOR">
           Drag_due_to_alpha
           3
           velocities/mach-norm
           aero/qbar-psf | metrics/Sw-sqft | aero/alpha-rad
           0.20  1.13
           0.65  0.2
           0.90  0.5
        </COEFFICIENT>

      </GROUP>

      <!-- Roskam p636 -->
      <COEFFICIENT NAME="CDDe" TYPE="VECTOR">
        Drag_due_to_Elevator_Deflection
        3
        velocities/mach-norm
        aero/qbar-psf | metrics/Sw-sqft | fcs/mag-elevator-pos-rad
        0.20  0
        0.65  0
        0.90  0
      </COEFFICIENT>

      <!-- Hanke 3.0-19 -->
      <COEFFICIENT NAME="CDbeta" TYPE="VECTOR">
        Drag_due_to_sideslip
        4
        aero/qbar-psf | metrics/Sw-sqft | aero/mag-beta-rad
        0.00  -0.06
        0.20  -0.06
        0.65  -0.06
        0.90  -0.06
      </COEFFICIENT>

    </AXIS>

    <AXIS NAME="SIDE">

      <!-- Hanke 7.0-5 -->
      <COEFFICIENT NAME="CYb" TYPE="VECTOR">
        Side_force_due_to_beta
        4
        velocities/mach-norm
        aero/qbar-psf | metrics/Sw-sqft | aero/beta-rad
        0.00  -0.95
        0.20  -0.93
        0.65  -0.91
        0.90  -0.89
      </COEFFICIENT>

      <!-- Roskam p637 -->
      <COEFFICIENT NAME="CYda" TYPE="VECTOR">
        Side_force_due_to_aileron
        3
        velocities/mach-norm
        aero/qbar-psf | metrics/Sw-sqft | fcs/left-aileron-pos-rad
        0.20  0
        0.65  0
        0.90  0
      </COEFFICIENT>

      <!-- Hanke 7.0-13/14/15 -->
      <COEFFICIENT NAME="CYdr" TYPE="VECTOR">
        Side_force_due_to_rudder
        4
        velocities/mach-norm
        aero/qbar-psf | metrics/Sw-sqft | fcs/rudder-pos-rad
        0.00  0.17
        0.20  0.16
        0.65  0.11
        0.90  0.06
      </COEFFICIENT>

      <!-- Hanke 7.0-7 -->
      <COEFFICIENT NAME="CYp" TYPE="VECTOR">
        Side_force_due_to_roll_rate
        4
        velocities/mach-norm
        aero/qbar-psf | metrics/Sw-sqft | aero/bi2vel | velocities/p-aero-rad_sec
        0.00  0.40
        0.20  0.40
        0.65  0.40
        0.90  0.10
      </COEFFICIENT>

      <!-- Hanke 7.0-8/9 -->
      <COEFFICIENT NAME="CYr" TYPE="VECTOR">
        Side_force_due_to_yaw_rate
        4
        velocities/mach-norm
        aero/qbar-psf | metrics/Sw-sqft | aero/bi2vel | velocities/r-aero-rad_sec
        0.00  0.175
        0.20  0.170
        0.65  0.149
        0.90  0.151
      </COEFFICIENT>

    </AXIS>

    <AXIS NAME="ROLL">

      <!-- Hanke 5.0-7/8 -->
      <COEFFICIENT NAME="Clb" TYPE="VECTOR">
        Roll_moment_due_to_beta
        4
        velocities/mach-norm
        aero/qbar-psf | metrics/Sw-sqft | metrics/bw-ft | aero/beta-rad
        0.00  -0.14
        0.20  -0.14
        0.65  -0.17
        0.90  -0.14
      </COEFFICIENT>

      <!-- Hanke 5.0-12/13 -->
      <COEFFICIENT NAME="Clp" TYPE="VECTOR">
        Roll_moment_due_to_roll_rate_(roll_damping)
        4
        velocities/mach-norm
        aero/qbar-psf | metrics/Sw-sqft | metrics/bw-ft | aero/bi2vel | velocities/p-aero-rad_sec
        0.00  -0.35
        0.20  -0.33
        0.65  -0.28
        0.90  -0.26
      </COEFFICIENT>

      <!-- Hanke 5.0-14/15 -->
      <COEFFICIENT NAME="Clr" TYPE="VECTOR">
        Roll_moment_due_to_yaw_rate
        4
        velocities/mach-norm
        aero/qbar-psf | metrics/Sw-sqft | metrics/bw-ft | aero/bi2vel | velocities/r-aero-rad_sec
        0.00  0.15
        0.20  0.14
        0.65  0.16
        0.90  0.23
      </COEFFICIENT>

      <!-- Hanke 5.0-23/24/25/27/28 -->
      <COEFFICIENT NAME="ClDa" TYPE="VECTOR">
        Roll_moment_due_to_aileron
        4
        velocities/mach-norm
        aero/qbar-psf | metrics/Sw-sqft | metrics/bw-ft | fcs/left-aileron-pos-rad
        0.00  0.0802
        0.20  0.0773
        0.65  0.0638
        0.90  0.0682
      </COEFFICIENT>

      <!-- Hanke 5.0-30 -->
      <COEFFICIENT NAME="Cldr" TYPE="VECTOR">
        Roll_moment_due_to_rudder
        4
        velocities/mach-norm
        aero/qbar-psf | metrics/Sw-sqft | metrics/bw-ft | fcs/rudder-pos-rad
        0.00  0.008
        0.20  0.007
        0.65  0.005
        0.90  0.003
      </COEFFICIENT>

    </AXIS>

    <AXIS NAME="PITCH">

      <!-- Hanke 4.0-8/10/12 -->
      <COEFFICIENT NAME="Cmo" TYPE="VECTOR">
        Pitching_moment_at_zero_alpha
        4
        velocities/mach-norm
        aero/qbar-psf | metrics/Sw-sqft | metrics/cbarw-ft
        0.00  0.100
        0.20  0.090
        0.65  0.030
        0.90  0.015
      </COEFFICIENT>

      <!-- Hanke 4.0-8/14 -->
      <COEFFICIENT NAME="Cmalpha" TYPE="VECTOR">
        Pitch_moment_due_to_alpha
        4
        velocities/mach-norm
        aero/qbar-psf | metrics/Sw-sqft | metrics/cbarw-ft | aero/alpha-rad
        0.00  -1.50
        0.20  -1.36
        0.65  -1.01
        0.90  -0.98
      </COEFFICIENT>

      <!-- Hanke 4.0-16 -->
      <COEFFICIENT NAME="Cmq" TYPE="VECTOR">
        Pitch_moment_due_to_pitch_rate
        4
        velocities/mach-norm
        aero/qbar-psf | metrics/Sw-sqft | metrics/cbarw-ft | aero/ci2vel | velocities/q-aero-rad_sec
        0.00  -22.6
        0.20  -21.4
        0.65  -20.3
        0.90  -25.2
      </COEFFICIENT>

      <!-- Hanke 4.0-15 -->
      <COEFFICIENT NAME="Cmadot" TYPE="VECTOR">
        Pitch_moment_due_to_alpha_rate
        4
        velocities/mach-norm
        aero/qbar-psf | metrics/Sw-sqft | metrics/cbarw-ft | aero/ci2vel | aero/alphadot-rad_sec
        0.00  -3.4
        0.20  -3.2
        0.65  -3.9
        0.90  -8.8
      </COEFFICIENT>

      <!-- Hanke 4.0-21/22 -->
      <COEFFICIENT NAME="Cmde" TYPE="VECTOR">
        Pitch_moment_due_to_elevator_deflection
        4
        velocities/mach-norm
        aero/qbar-psf | metrics/Sw-sqft | metrics/cbarw-ft | fcs/elevator-pos-rad
        0.00  -1.60
        0.20  -1.40
        0.65  -1.30
        0.90  -1.20
      </COEFFICIENT>

      <!-- Hanke 4.0-21/22 -->
      <COEFFICIENT NAME="Cms" TYPE="VECTOR">
        Pitch_moment_due_to_stabilizer_deflection
        4
        velocities/mach-norm
        aero/qbar-psf | metrics/Sw-sqft | metrics/cbarw-ft | fcs/speedbrake-pos-rad
        0.00  -3.10
        0.20  -2.92
        0.65  -2.75
        0.90  -3.21
      </COEFFICIENT>

      <!-- Hanke 4.0-8/9 -->
      <COEFFICIENT NAME="Cmdf" TYPE="VECTOR">
        Delta_pitching_moment_due_to_flap_deflection
        4
        fcs/flap-pos-deg
        aero/qbar-psf | metrics/Sw-sqft | metrics/cbarw-ft
        0    0
        10   0
        20  -0.08
        30  -0.16
       </COEFFICIENT>

    </AXIS>

    <AXIS NAME="YAW">

      <!-- Hanke 6.0-6 -->
      <COEFFICIENT NAME="Cnb" TYPE="VECTOR">
        Yaw_moment_due_to_beta
        4
        velocities/mach-norm
        aero/qbar-psf | metrics/Sw-sqft | metrics/bw-ft | aero/beta-rad
        0.00  0.16
        0.20  0.15
        0.65  0.15
        0.90  0.20
      </COEFFICIENT>

      <!-- Hanke 6.0-9 -->
      <COEFFICIENT NAME="Cnp" TYPE="VECTOR">
        Yaw_moment_due_to_roll_rate
        4
        velocities/mach-norm
        aero/qbar-psf | metrics/Sw-sqft | metrics/bw-ft | aero/bi2vel | velocities/p-aero-rad_sec
        0.00  -0.025
        0.20  -0.025
        0.65  -0.025
        0.90  -0.025
      </COEFFICIENT>

      <!-- Hanke 6.0-10 -->
      <COEFFICIENT NAME="Cnr" TYPE="VECTOR">
        Yaw_moment_due_to_yaw_rate
        4
        velocities/mach-norm
        aero/qbar-psf | metrics/Sw-sqft | metrics/bw-ft | aero/bi2vel | velocities/r-aero-rad_sec
        0.00  -0.25
        0.20  -0.24
        0.65  -0.25
        0.90  -0.31
      </COEFFICIENT>

      <!-- Hanke 6.0-15/16 -->
      <COEFFICIENT NAME="Cnda" TYPE="VECTOR">
        Yaw_moment_due_to_aileron
        4
        velocities/mach-norm
        aero/qbar-psf | metrics/Sw-sqft | metrics/bw-ft | fcs/left-aileron-pos-rad
        0.00   0.007
        0.20   0.007
        0.65   0.004
        0.90  -0.005
      </COEFFICIENT>

      <!-- Hanke 6.0-19/20/21 -->
      <COEFFICIENT NAME="Cndr" TYPE="VECTOR">
        Yaw_moment_due_to_rudder
        4
        velocities/mach-norm
        aero/qbar-psf | metrics/Sw-sqft | metrics/bw-ft | fcs/rudder-pos-rad
        0.00  -0.105
        0.20  -0.102
        0.65  -0.089
        0.90  -0.078
      </COEFFICIENT>

    </AXIS>
  </AERODYNAMICS>
  <!-- ************************************************************************** -->
</FDM_CONFIG>
