<?xml version="1.0"?>


<!--
    Search for 'unknown' and replace with real values before loading in JSBSim.
-->

<?xml-stylesheet href="JSBSim.xsl" type="application/xml"?>
<fdm_config name="unknown Your aircraft name here" VERSION="2.0" RELEASE="BETA">

   <fileheader>
      <author>DATCOM+</author>
      <filecreationdate>    </filecreationdate>
      <description>DATCOM model for a unknown</description>
      <version>  </version>
      <reference refID="None" author="n/a" title="n/a" date="n/a"/>
   </fileheader>


<!--


  ****************** IMPORTANT NOTICES **********************

   This is an alpha version release of the DATCOM+ program for
   JSBSIM. Nothing, and I do mean NOTHING, as been checked to
   verify that the parameters, units, sign conventions, or
   basically anything else is correct. Your mileage may vary.

   ***********************************************************

   This file was generated by the USAF Digital DATCOM program.
   This file is considered an intermediary file in the
   DATCOM/JSBSim process. This file may be overwritten without
   warning, so any changes that you make in here may be lost.

   If you intend to use this file as it is and modify it, make
   sure that you take the necessary precautions to prevent it
   from being overwritten, like renaming it.

   ***********************************************************


   DISCLAIMER REQUIRED BY HQ USAF FOR PUBLIC RELEASE APPROVAL

   THIS SOFTWARE AND ANY ACCOMPANYING DOCUMENTATION
   IS RELEASED "AS IS".  THE U.S. GOVERNMENT MAKES NO
   WARRANTY OF ANY KIND, EXPRESS OR IMPLIED, CONCERNING
   THIS SOFTWARE AND ANY ACCOMPANYING DOCUMENTATION,
   INCLUDING, WITHOUT LIMITATION, ANY WARRANTIES OF
   MERCHANTABILITY OR FITNESS FOR A PARTICULAR PURPOSE.
   IN NO EVENT WILL THE U.S. GOVERNMENT BE LIABLE FOR ANY
   DAMAGES, INCLUDING LOST PROFITS, LOST SAVINGS OR OTHER
   INCIDENTAL OR CONSEQUENTIAL DAMAGES ARISING OUT OF THE
   USE, OR INABILITY TO USE, THIS SOFTWARE OR ANY
   ACCOMPANYING DOCUMENTATION, EVEN IF INFORMED IN ADVANCE
   OF THE POSSIBILITY OF SUCH DAMAGES.


   ***********************************************************
-->


<!-- **********************************************************************
        METRICS
     ********************************************************************** -->


   <metrics>
      <wingarea unit="FT2">     9095.5000  </wingarea>
      <wingspan unit="FT">       261.8000  </wingspan>
      <chord unit="FT">           38.2500  </chord>
      <htailarea unit="FT2">    2214.0000  </htailarea>
      <htailarm unit="FT">        58.5665  </htailarm>
      <vtailarea unit="FT2">    1890.9000  </vtailarea>
      <vtailarm unit="FT">        73.2781  </vtailarm>
      <location name="AERORP" unit="IN">
         <x> 43.2 </x>   FIX THIS
         <y>  0.0 </y>   FIX THIS
         <z> 59.4 </z>   FIX THIS
      </location>
      <location name="EYEPOINT" unit="IN">
         <x> 37.0 </x>   FIX THIS
         <y>  0.0 </y>   FIX THIS
         <z> 48.0 </z>   FIX THIS
      </location>
      <location name="VRP" unit="IN">
         <x> 42.6 </x>   FIX THIS
         <y>  0.0 </y>   FIX THIS
         <z> 38.5 </z>   FIX THIS
      </location>
   </metrics>


<!-- **********************************************************************
        MASS_BALANCE
     ********************************************************************** -->


   <mass_balance>
      <ixx unit="SLUG*FT2"> UNKNOWN </ixx>
      <iyy unit="SLUG*FT2"> UNKNOWN </iyy>
      <izz unit="SLUG*FT2"> UNKNOWN </izz>
      <ixz unit="SLUG*FT2"> UNKNOWN </ixz>
      <emptywt unit="LBS">          .0000  </emptywt>    FIX THIS
      <location name="CG" unit="IN">
            <x>  1476.00  </x>
            <y>      .00  </y>
            <z>   124.80  </z>
      </location>
      <pointmass name="PILOT">
         <weight unit="LBS"> 200.0 </weight>
         <location name="POINTMASS" unit="IN">
            <x> UNKNOWN </x>
            <y> UNKNOWN </y>
            <z> UNKNOWN </z>
         </location>
      </pointmass>
      <pointmass name="CO-PILOT">
         <weight unit="LBS"> 200.0 </weight>
         <location name="POINTMASS" unit="IN">
            <x> UNKNOWN </x>
            <y> UNKNOWN </y>
            <z> UNKNOWN </z>
         </location>
      </pointmass>
      <pointmass name="LUGGAGE">
         <weight unit="LBS"> 0.0 </weight>
         <location name="POINTMASS" unit="IN">
            <x> UNKNOWN </x>
            <y> UNKNOWN </y>
            <z> UNKNOWN </z>
         </location>
      </pointmass>
   </mass_balance>


<!-- **********************************************************************
        UNDERCARRIAGE
     ********************************************************************** -->


<!--

   DATCOM does not calculate ground reactions parameters.

-->


   <GROUND_REACTIONS>

   </GROUND_REACTIONS>


<!-- **********************************************************************
        PROPULSION
     ********************************************************************** -->


   <propulsion>

      <tank type="FUEL">   <!-- Tank Number 0 -->
         <location unit="IN">
           <x>      unknown  </x>
           <y>      unknown  </y>
           <z>      unknown  </z>
         </location>
         <radius unit="IN">    UNKNOWN </radius>
         <capacity unit="LBS"> UNKNOWN </capacity>
         <contents unit="LBS"> UNKNOWN </contents>
      </tank>

      <tank type="FUEL">   <!-- Tank Number 1 -->
         <location unit="IN">
           <x>      unknown  </x>
           <y>      unknown  </y>
           <z>      unknown  </z>
         </location>
         <radius unit="IN">    UNKNOWN </radius>
         <capacity unit="LBS"> UNKNOWN </capacity>
         <contents unit="LBS"> UNKNOWN </contents>
      </tank>

   </propulsion>


<!-- **********************************************************************
        AUTOPILOT
     ********************************************************************** -->


   <!-- Autopilot is not a required section, and DATCOM does not calculate this -->


<!-- **********************************************************************
        FLIGHT CONTROLS
     ********************************************************************** -->


   <!-- DATCOM does not calculate the flight control section -->


<!-- **********************************************************************
        AERODYNAMICS
     ********************************************************************** -->


   <aerodynamics>

      <alphalimits unit="DEG">
         <min>-5.0</min>
         <max>14.0</max>
      </alphalimits>

      <hysteresis_limits unit="DEG">
         <min> 5.0</min>
         <max>20.0</max>
      </hysteresis_limits>


      <!-- *************************
                Sign Conventions
           *************************

           Control displacements
                Stick    FWD  + / Aft -
                Stick    Left + / Right -
                Wheel    CCW  + / CW -
                Pedal    Left + / Right -
                Elevator trim Nose Up + / Nose down -

           Surfaces
                Elevator  TED + / TEU -
                R Ail     TED + / TEU -
                L Ail     TEU + / TED -
                Rudder    TEL + / TER -

           F&M, Accel, Rates, Displacements
                Pitch     Up  + / Down -
                Roll      Rgt + / Left -
                Yaw       Rgt + / Left -

           Other
                Alpha     Up  + / Down -
                Beta Wind in right ear + / Wind in left ear -
                Slip Ball right of center + / left of center -
      -->


      <!-- **************************************
                ASSUMPTIONS AND LIMITATIONS

           There is no interaction between deflected surfaces modeled
           so there is no change in elevator effects with the flaps
           deflected, for example.

           Terms known to be missing from DATCOM:
              Power effects
              Ground effects
              Cyr, CyDr, Cyda, ClDr, Cndr

           ************************************** -->


      <!--
           The following ground effect tables are NOT generated
           by DATCOM, but provide representative effects.
           These terms are not currently used in this model.
      -->


      <function name="aero/function/ground-effect-factor-lift">
         <description>Change in lift due to ground effect factor.</description>
         <table>
            <independentVar>aero/h_b-mac-ft</independentVar>
            <tableData>
               0.0  1.203
               0.1  1.127
               0.15 1.090
               0.2  1.073
               0.3  1.046
               0.4  1.055
               0.5  1.019
               0.6  1.013
               0.7  1.008
               0.8  1.006
               0.9  1.003
               1.0  1.002
               1.1  1.0
            </tableData>
         </table>
      </function>

      <function name="aero/function/ground-effect-factor-drag">
         <description>Change in drag due to ground effect</description>
         <table>
            <independentVar>aero/h_b-mac-ft</independentVar>
            <tableData>
               0.0  0.480
               0.1  0.515
               0.15 0.629
               0.2  0.709
               0.3  0.815
               0.4  0.882
               0.5  0.928
               0.6  0.962
               0.7  0.988
               0.8  1.0
               0.9  1.0
               1.0  1.0
               1.1  1.0
            </tableData>
         </table>
      </function>


<!-- ********************************************************************** -->


     <axis name="LIFT">


         <function NAME="aero/coefficient/CLwbh">
            <description>
               Lift due to alpha
               Increase in CL decreases Period and damping,Dutch Roll damping.
               CL is low for landing
            </description>
            <product>
               <property>aero/function/ground-effect-factor-lift</property>
               <property>aero/qbar-area</property>
               <table>
                  <independentVar>aero/alpha-deg</independentVar>
                  <tableData>
                       -16.00        -1.382
                       -8.000        -.5967
                       -6.000        -.3982
                       -4.000        -.2029
                       -2.000        -.1227E-01
                         .000         .1789
                        2.000         .3736
                        4.000         .5723
                        8.000         .9842
                        9.000         1.089
                        10.00         1.194
                        12.00         1.385
                        14.00         1.542
                        16.00         1.670
                        18.00         1.772
                        19.00         1.809
                        20.00         1.833
                        21.00         1.860
                        22.00         1.890
                        24.00         1.805
                  </tableData>
               </table>
            </product>
         </function>

         <function NAME="aero/coefficient/CLq">
            <description>
               Basic Lift Coefficient due to pitch rate(per degree)
            </description>
            <product>
               <property>aero/qbar-area</property>
               <table>
                  <independentVar>aero/alpha-deg</independentVar>
                  <tableData>
                       -16.00         .5675E-01
                       -8.000         .5675E-01
                       -6.000         .5675E-01
                       -4.000         .5675E-01
                       -2.000         .5675E-01
                         .000         .5675E-01
                        2.000         .5675E-01
                        4.000         .5675E-01
                        8.000         .5675E-01
                        9.000         .5675E-01
                        10.00         .5675E-01
                        12.00         .5675E-01
                        14.00         .5675E-01
                        16.00         .5675E-01
                        18.00         .5675E-01
                        19.00         .5675E-01
                        20.00         .5675E-01
                        21.00         .5675E-01
                        22.00         .5675E-01
                        24.00         .5675E-01
                  </tableData>
               </table>
            </product>
         </function>

         <function NAME="aero/coefficient/CLad">
            <description>
               Basic Lift Coefficient due to AOA rate(per degree)
               Important contributor to Short-Period damping
               For low Cla, aircraft must land at high alpha
            </description>
            <product>
               <property>aero/qbar-area</property>
               <table>
                  <independentVar>aero/alpha-deg</independentVar>
                  <tableData>
                       -16.00         .2734E-01
                       -8.000         .2829E-01
                       -6.000         .2850E-01
                       -4.000         .2840E-01
                       -2.000         .2865E-01
                         .000         .2946E-01
                        2.000         .2973E-01
                        4.000         .2934E-01
                        8.000         .2840E-01
                        9.000         .2785E-01
                        10.00         .2644E-01
                        12.00         .2212E-01
                        14.00         .1734E-01
                        16.00         .1334E-01
                        18.00         .8374E-02
                        19.00         .6211E-02
                        20.00         .3830E-02
                        21.00         .2113E-02
                        22.00        -.2699E-02
                        24.00        -.1270E-01
                  </tableData>
               </table>
            </product>
         </function>

         <function NAME="aero/coefficient/CLdf2L">
            <description>
               Airbus A380 SYMETRIC Trailing Edge Flaps
               Lift Coefficient due to Left Single Slotted Flap Deflection
               Positive surface deflection is trailing edge down
            </description>
            <product>
               <property>aero/qbar-area</property>
               <table>
                  <independentVar>fcs/left-flap-pos-deg</independentVar>
                  <tableData>
                         .000          .000
                       -5.000         .4734E-01
                       -10.00         .9449E-01
                       -15.00         .1400
                       -20.00         .1844
                       -25.00         .2184
                       -30.00         .2454
                       -35.00         .2660
                       -40.00         .2746
                  </tableData>
               </table>
            </product>
         </function>

         <function NAME="aero/coefficient/CLdf2R">
            <description>
               Airbus A380 SYMETRIC Trailing Edge Flaps
               Lift Coefficient due to Right Single Slotted Flap Deflection
               Positive surface deflection is trailing edge down
            </description>
            <product>
               <property>aero/qbar-area</property>
               <table>
                  <independentVar>fcs/right-flap-pos-deg</independentVar>
                  <tableData>
                         .000          .000
                       -5.000         .4734E-01
                       -10.00         .9449E-01
                       -15.00         .1400
                       -20.00         .1844
                       -25.00         .2184
                       -30.00         .2454
                       -35.00         .2660
                       -40.00         .2746
                  </tableData>
               </table>
            </product>
         </function>

         <function NAME="aero/coefficient/CLdf7L">
            <description>
               Airbus A380 SYMETRIC Leading Edge Slats
               Lift Coefficient due to Left Leading Edge Slat Deflection
               Positive surface deflection is leading edge down
            </description>
            <product>
               <property>aero/qbar-area</property>
               <table>
                  <independentVar>fcs/left-leading-edge-slat-pos-deg</independentVar>
                  <tableData>
                         .000          .000
                        5.000         .1437E-02
                        10.00         .2987E-02
                        20.00         .6206E-02
                  </tableData>
               </table>
            </product>
         </function>

         <function NAME="aero/coefficient/CLdf7R">
            <description>
               Airbus A380 SYMETRIC Leading Edge Slats
               Lift Coefficient due to Right Leading Edge Slat Deflection
               Positive surface deflection is leading edge down
            </description>
            <product>
               <property>aero/qbar-area</property>
               <table>
                  <independentVar>fcs/right-leading-edge-slat-pos-deg</independentVar>
                  <tableData>
                         .000          .000
                        5.000         .1437E-02
                        10.00         .2987E-02
                        20.00         .6206E-02
                  </tableData>
               </table>
            </product>
         </function>

         <function NAME="aero/coefficient/CLdf9L">
            <description>
               Airbus A380 SYMETRIC Ground Spoilers
               Lift Coefficient due to Left Ground Spoiler Deflection
               Positive surface deflection is trailing edge up
            </description>
            <product>
               <property>aero/qbar-area</property>
               <table>
                  <independentVar>fcs/left-ground-spoiler-pos-deg</independentVar>
                  <tableData>
                         .000          .000
                        10.00        -.2284E-01
                        20.00        -.4112E-01
                        30.00        -.4948E-01
                        40.00        -.5857E-01
                        50.00        -.6807E-01
                        60.00        -.7703E-01
                        70.00        -.8986E-01
                        80.00        -.1027
                  </tableData>
               </table>
            </product>
         </function>

         <function NAME="aero/coefficient/CLdf9R">
            <description>
               Airbus A380 SYMETRIC Ground Spoilers
               Lift Coefficient due to Right Ground Spoiler Deflection
               Positive surface deflection is trailing edge up
            </description>
            <product>
               <property>aero/qbar-area</property>
               <table>
                  <independentVar>fcs/right-ground-spoiler-pos-deg</independentVar>
                  <tableData>
                         .000          .000
                        10.00        -.2284E-01
                        20.00        -.4112E-01
                        30.00        -.4948E-01
                        40.00        -.5857E-01
                        50.00        -.6807E-01
                        60.00        -.7703E-01
                        70.00        -.8986E-01
                        80.00        -.1027
                  </tableData>
               </table>
            </product>
         </function>

         <function NAME="aero/coefficient/CLdf10L">
            <description>
               Airbus A380 SYMETRIC Flight Spoilers
               Lift Coefficient due to Left Flight Spoiler Deflection
               Positive surface deflection is trailing edge up
            </description>
            <product>
               <property>aero/qbar-area</property>
               <table>
                  <independentVar>fcs/left-flight-spoiler-pos-deg</independentVar>
                  <tableData>
                         .000          .000
                        10.00        -.5611E-01
                        20.00        -.1002
                        25.00        -.1093
                        27.50        -.1136
                        30.00        -.1188
                        32.50        -.1243
                        35.00        -.1291
                        40.00        -.1404
                  </tableData>
               </table>
            </product>
         </function>

         <function NAME="aero/coefficient/CLdf10R">
            <description>
               Airbus A380 SYMETRIC Flight Spoilers
               Lift Coefficient due to Right Flight Spoiler Deflection
               Positive surface deflection is trailing edge up
            </description>
            <product>
               <property>aero/qbar-area</property>
               <table>
                  <independentVar>fcs/right-flight-spoiler-pos-deg</independentVar>
                  <tableData>
                         .000          .000
                        10.00        -.5611E-01
                        20.00        -.1002
                        25.00        -.1093
                        27.50        -.1136
                        30.00        -.1188
                        32.50        -.1243
                        35.00        -.1291
                        40.00        -.1404
                  </tableData>
               </table>
            </product>
         </function>

     </axis>


<!-- ********************************************************************** -->


     <axis name="DRAG">


         <function NAME="aero/coefficient/CD">
            <description>
               Basic Drag Coefficient
               Sense: Always positive.
               Main contributor to Phugoid damping: Greater Cd, Better damping
            </description>
            <product>
               <property>aero/function/ground-effect-factor-lift</property>
               <property>aero/qbar-area</property>
               <table>
                  <independentVar>aero/alpha-deg</independentVar>
                  <tableData>
                       -16.00         .1023
                       -8.000         .2714E-01
                       -6.000         .1785E-01
                       -4.000         .1252E-01
                       -2.000         .1082E-01
                         .000         .1279E-01
                        2.000         .1841E-01
                        4.000         .2813E-01
                        8.000         .6177E-01
                        9.000         .7337E-01
                        10.00         .8627E-01
                        12.00         .1138
                        14.00         .1409
                        16.00         .1682
                        18.00         .1963
                        19.00         .2094
                        20.00         .2219
                        21.00         .2358
                        22.00         .2508
                        24.00         .2596
                  </tableData>
               </table>
            </product>
         </function>

         <function NAME="aero/coefficient/CdDf2L">
            <description>
               Airbus A380 SYMETRIC Trailing Edge Flaps
               Drag Coefficient due to Left Single Slotted Flap Deflection
               Positive surface deflection is trailing edge down
            </description>
            <product>
               <table>
                  <independentVar lookup="row">aero/alpha-deg</independentVar>
                  <independentVar lookup="column">fcs/left-flap-pos-deg</independentVar>
                  <tableData>
                                       .000        -5.000        -10.00        -15.00        -20.00        -25.00        -30.00        -35.00        -40.00
                       -16.00          .000        -.5184E-02    -.9843E-02    -.1387E-01    -.1734E-01    -.1969E-01    -.2139E-01    -.2256E-01    -.2302E-01
                       -8.000          .000        -.2470E-02    -.4427E-02    -.5841E-02    -.6769E-02    -.7178E-02    -.7318E-02    -.7313E-02    -.7283E-02
                       -6.000          .000        -.1792E-02    -.3073E-02    -.3835E-02    -.4126E-02    -.4049E-02    -.3801E-02    -.3501E-02    -.3348E-02
                       -4.000          .000        -.1114E-02    -.1720E-02    -.1828E-02    -.1484E-02    -.9201E-03    -.2838E-03     .3106E-03     .5876E-03
                       -2.000          .000        -.4352E-03    -.3656E-03     .1780E-03     .1159E-02     .2209E-02     .3233E-02     .4123E-02     .4523E-02
                         .000          .000         .2433E-03     .9884E-03     .2184E-02     .3801E-02     .5338E-02     .6750E-02     .7934E-02     .8458E-02
                        2.000          .000         .9217E-03     .2342E-02     .4191E-02     .6443E-02     .8467E-02     .1027E-01     .1175E-01     .1239E-01
                        4.000          .000         .1600E-02     .3696E-02     .6197E-02     .9086E-02     .1160E-01     .1378E-01     .1556E-01     .1633E-01
                        8.000          .000         .2957E-02     .6404E-02     .1021E-01     .1437E-01     .1785E-01     .2082E-01     .2318E-01     .2420E-01
                        9.000          .000         .3296E-02     .7081E-02     .1121E-01     .1569E-01     .1942E-01     .2258E-01     .2509E-01     .2617E-01
                        10.00          .000         .3635E-02     .7758E-02     .1222E-01     .1701E-01     .2098E-01     .2433E-01     .2699E-01     .2813E-01
                        12.00          .000         .4314E-02     .9112E-02     .1422E-01     .1966E-01     .2411E-01     .2785E-01     .3081E-01     .3207E-01
                        14.00          .000         .4992E-02     .1047E-01     .1623E-01     .2230E-01     .2724E-01     .3137E-01     .3462E-01     .3600E-01
                        16.00          .000         .5671E-02     .1182E-01     .1824E-01     .2494E-01     .3037E-01     .3489E-01     .3843E-01     .3994E-01
                        18.00          .000         .6349E-02     .1317E-01     .2024E-01     .2758E-01     .3350E-01     .3840E-01     .4224E-01     .4388E-01
                        19.00          .000         .6688E-02     .1385E-01     .2125E-01     .2890E-01     .3506E-01     .4016E-01     .4415E-01     .4584E-01
                        20.00          .000         .7028E-02     .1453E-01     .2225E-01     .3023E-01     .3663E-01     .4192E-01     .4605E-01     .4781E-01
                        21.00          .000         .7367E-02     .1520E-01     .2325E-01     .3155E-01     .3819E-01     .4368E-01     .4796E-01     .4978E-01
                        22.00          .000         .7706E-02     .1588E-01     .2425E-01     .3287E-01     .3976E-01     .4544E-01     .4987E-01     .5175E-01
                        24.00          .000         .8385E-02     .1724E-01     .2626E-01     .3551E-01     .4288E-01     .4895E-01     .5368E-01     .5568E-01
                  </tableData>
               </table>
            </product>
         </function>

         <function NAME="aero/coefficient/CdDf2R">
            <description>
               Airbus A380 SYMETRIC Trailing Edge Flaps
               Drag Coefficient due to Right Single Slotted Flap Deflection
               Positive surface deflection is trailing edge down
            </description>
            <product>
               <table>
                  <independentVar lookup="row">aero/alpha-deg</independentVar>
                  <independentVar lookup="column">fcs/right-flap-pos-deg</independentVar>
                  <tableData>
                                       .000        -5.000        -10.00        -15.00        -20.00        -25.00        -30.00        -35.00        -40.00
                       -16.00          .000        -.5184E-02    -.9843E-02    -.1387E-01    -.1734E-01    -.1969E-01    -.2139E-01    -.2256E-01    -.2302E-01
                       -8.000          .000        -.2470E-02    -.4427E-02    -.5841E-02    -.6769E-02    -.7178E-02    -.7318E-02    -.7313E-02    -.7283E-02
                       -6.000          .000        -.1792E-02    -.3073E-02    -.3835E-02    -.4126E-02    -.4049E-02    -.3801E-02    -.3501E-02    -.3348E-02
                       -4.000          .000        -.1114E-02    -.1720E-02    -.1828E-02    -.1484E-02    -.9201E-03    -.2838E-03     .3106E-03     .5876E-03
                       -2.000          .000        -.4352E-03    -.3656E-03     .1780E-03     .1159E-02     .2209E-02     .3233E-02     .4123E-02     .4523E-02
                         .000          .000         .2433E-03     .9884E-03     .2184E-02     .3801E-02     .5338E-02     .6750E-02     .7934E-02     .8458E-02
                        2.000          .000         .9217E-03     .2342E-02     .4191E-02     .6443E-02     .8467E-02     .1027E-01     .1175E-01     .1239E-01
                        4.000          .000         .1600E-02     .3696E-02     .6197E-02     .9086E-02     .1160E-01     .1378E-01     .1556E-01     .1633E-01
                        8.000          .000         .2957E-02     .6404E-02     .1021E-01     .1437E-01     .1785E-01     .2082E-01     .2318E-01     .2420E-01
                        9.000          .000         .3296E-02     .7081E-02     .1121E-01     .1569E-01     .1942E-01     .2258E-01     .2509E-01     .2617E-01
                        10.00          .000         .3635E-02     .7758E-02     .1222E-01     .1701E-01     .2098E-01     .2433E-01     .2699E-01     .2813E-01
                        12.00          .000         .4314E-02     .9112E-02     .1422E-01     .1966E-01     .2411E-01     .2785E-01     .3081E-01     .3207E-01
                        14.00          .000         .4992E-02     .1047E-01     .1623E-01     .2230E-01     .2724E-01     .3137E-01     .3462E-01     .3600E-01
                        16.00          .000         .5671E-02     .1182E-01     .1824E-01     .2494E-01     .3037E-01     .3489E-01     .3843E-01     .3994E-01
                        18.00          .000         .6349E-02     .1317E-01     .2024E-01     .2758E-01     .3350E-01     .3840E-01     .4224E-01     .4388E-01
                        19.00          .000         .6688E-02     .1385E-01     .2125E-01     .2890E-01     .3506E-01     .4016E-01     .4415E-01     .4584E-01
                        20.00          .000         .7028E-02     .1453E-01     .2225E-01     .3023E-01     .3663E-01     .4192E-01     .4605E-01     .4781E-01
                        21.00          .000         .7367E-02     .1520E-01     .2325E-01     .3155E-01     .3819E-01     .4368E-01     .4796E-01     .4978E-01
                        22.00          .000         .7706E-02     .1588E-01     .2425E-01     .3287E-01     .3976E-01     .4544E-01     .4987E-01     .5175E-01
                        24.00          .000         .8385E-02     .1724E-01     .2626E-01     .3551E-01     .4288E-01     .4895E-01     .5368E-01     .5568E-01
                  </tableData>
               </table>
            </product>
         </function>

         <function NAME="aero/coefficient/CdDf7L">
            <description>
               Airbus A380 SYMETRIC Leading Edge Slats
               Drag Coefficient due to Left Leading Edge Slat Deflection
               Positive surface deflection is leading edge down
               DATCOM does not produce useful results.
            </description>
            <product>
               <table>
                  <independentVar lookup="row">aero/alpha-deg</independentVar>
                  <independentVar lookup="column">fcs/left-leading-edge-slat-pos-deg</independentVar>
                  <tableData>
                                       .000         5.000         10.00         20.00
                       -16.00          .000         .5000E-30     .5000E-30     .5000E-30
                       -8.000          .000         .5000E-30     .5000E-30     .5000E-30
                       -6.000          .000         .5000E-30     .5000E-30     .5000E-30
                       -4.000          .000         .5000E-30     .5000E-30     .5000E-30
                       -2.000          .000         .5000E-30     .5000E-30     .5000E-30
                         .000          .000         .5000E-30     .5000E-30     .5000E-30
                        2.000          .000         .5000E-30     .5000E-30     .5000E-30
                        4.000          .000         .5000E-30     .5000E-30     .5000E-30
                        8.000          .000         .5000E-30     .5000E-30     .5000E-30
                        9.000          .000         .5000E-30     .5000E-30     .5000E-30
                        10.00          .000         .5000E-30     .5000E-30     .5000E-30
                        12.00          .000         .5000E-30     .5000E-30     .5000E-30
                        14.00          .000         .5000E-30     .5000E-30     .5000E-30
                        16.00          .000         .5000E-30     .5000E-30     .5000E-30
                        18.00          .000         .5000E-30     .5000E-30     .5000E-30
                        19.00          .000         .5000E-30     .5000E-30     .5000E-30
                        20.00          .000         .5000E-30     .5000E-30     .5000E-30
                        21.00          .000         .5000E-30     .5000E-30     .5000E-30
                        22.00          .000         .5000E-30     .5000E-30     .5000E-30
                        24.00          .000         .5000E-30     .5000E-30     .5000E-30
                  </tableData>
               </table>
            </product>
         </function>

         <function NAME="aero/coefficient/CdDf7R">
            <description>
               Airbus A380 SYMETRIC Leading Edge Slats
               Drag Coefficient due to Right Leading Edge Slat Deflection
               Positive surface deflection is leading edge down
               DATCOM does not produce useful results.
            </description>
            <product>
               <table>
                  <independentVar lookup="row">aero/alpha-deg</independentVar>
                  <independentVar lookup="column">fcs/right-leading-edge-slat-pos-deg</independentVar>
                  <tableData>
                                       .000         5.000         10.00         20.00
                       -16.00          .000         .5000E-30     .5000E-30     .5000E-30
                       -8.000          .000         .5000E-30     .5000E-30     .5000E-30
                       -6.000          .000         .5000E-30     .5000E-30     .5000E-30
                       -4.000          .000         .5000E-30     .5000E-30     .5000E-30
                       -2.000          .000         .5000E-30     .5000E-30     .5000E-30
                         .000          .000         .5000E-30     .5000E-30     .5000E-30
                        2.000          .000         .5000E-30     .5000E-30     .5000E-30
                        4.000          .000         .5000E-30     .5000E-30     .5000E-30
                        8.000          .000         .5000E-30     .5000E-30     .5000E-30
                        9.000          .000         .5000E-30     .5000E-30     .5000E-30
                        10.00          .000         .5000E-30     .5000E-30     .5000E-30
                        12.00          .000         .5000E-30     .5000E-30     .5000E-30
                        14.00          .000         .5000E-30     .5000E-30     .5000E-30
                        16.00          .000         .5000E-30     .5000E-30     .5000E-30
                        18.00          .000         .5000E-30     .5000E-30     .5000E-30
                        19.00          .000         .5000E-30     .5000E-30     .5000E-30
                        20.00          .000         .5000E-30     .5000E-30     .5000E-30
                        21.00          .000         .5000E-30     .5000E-30     .5000E-30
                        22.00          .000         .5000E-30     .5000E-30     .5000E-30
                        24.00          .000         .5000E-30     .5000E-30     .5000E-30
                  </tableData>
               </table>
            </product>
         </function>

         <function NAME="aero/coefficient/CdDf9L">
            <description>
               Airbus A380 SYMETRIC Ground Spoilers
               Drag Coefficient due to Left Ground Spoiler Deflection
               Positive surface deflection is trailing edge up
            </description>
            <product>
               <table>
                  <independentVar lookup="row">aero/alpha-deg</independentVar>
                  <independentVar lookup="column">fcs/left-ground-spoiler-pos-deg</independentVar>
                  <tableData>
                                       .000         10.00         20.00         30.00         40.00         50.00         60.00         70.00         80.00
                       -16.00          .000         .2438E-02     .4468E-02     .5421E-02     .6473E-02     .7593E-02     .8665E-02     .1023E-01     .1183E-01
                       -8.000          .000         .1249E-02     .2328E-02     .2845E-02     .3425E-02     .4050E-02     .4656E-02     .5555E-02     .6490E-02
                       -6.000          .000         .9516E-03     .1793E-02     .2202E-02     .2663E-02     .3164E-02     .3654E-02     .4386E-02     .5153E-02
                       -4.000          .000         .6544E-03     .1258E-02     .1558E-02     .1901E-02     .2278E-02     .2652E-02     .3217E-02     .3817E-02
                       -2.000          .000         .3572E-03     .7231E-03     .9142E-03     .1139E-02     .1393E-02     .1650E-02     .2048E-02     .2481E-02
                         .000          .000         .5996E-04     .1881E-03     .2704E-03     .3769E-03     .5071E-03     .6473E-03     .8783E-03     .1144E-02
                        2.000          .000        -.2373E-03    -.3469E-03    -.3733E-03    -.3851E-03    -.3786E-03    -.3549E-03    -.2909E-03    -.1919E-03
                        4.000          .000        -.5345E-03    -.8819E-03    -.1017E-02    -.1147E-02    -.1264E-02    -.1357E-02    -.1460E-02    -.1528E-02
                        8.000          .000        -.1129E-02    -.1952E-02    -.2305E-02    -.2671E-02    -.3036E-02    -.3361E-02    -.3799E-02    -.4201E-02
                        9.000          .000        -.1278E-02    -.2219E-02    -.2627E-02    -.3052E-02    -.3479E-02    -.3863E-02    -.4383E-02    -.4869E-02
                        10.00          .000        -.1426E-02    -.2487E-02    -.2948E-02    -.3433E-02    -.3921E-02    -.4364E-02    -.4968E-02    -.5537E-02
                        12.00          .000        -.1723E-02    -.3022E-02    -.3592E-02    -.4195E-02    -.4807E-02    -.5366E-02    -.6137E-02    -.6873E-02
                        14.00          .000        -.2021E-02    -.3557E-02    -.4236E-02    -.4957E-02    -.5693E-02    -.6368E-02    -.7306E-02    -.8210E-02
                        16.00          .000        -.2318E-02    -.4092E-02    -.4880E-02    -.5720E-02    -.6579E-02    -.7370E-02    -.8476E-02    -.9546E-02
                        18.00          .000        -.2615E-02    -.4627E-02    -.5523E-02    -.6482E-02    -.7464E-02    -.8372E-02    -.9645E-02    -.1088E-01
                        19.00          .000        -.2764E-02    -.4894E-02    -.5845E-02    -.6863E-02    -.7907E-02    -.8874E-02    -.1023E-01    -.1155E-01
                        20.00          .000        -.2912E-02    -.5162E-02    -.6167E-02    -.7244E-02    -.8350E-02    -.9375E-02    -.1081E-01    -.1222E-01
                        21.00          .000        -.3061E-02    -.5429E-02    -.6489E-02    -.7625E-02    -.8793E-02    -.9876E-02    -.1140E-01    -.1289E-01
                        22.00          .000        -.3209E-02    -.5697E-02    -.6811E-02    -.8006E-02    -.9236E-02    -.1038E-01    -.1198E-01    -.1355E-01
                        24.00          .000        -.3507E-02    -.6232E-02    -.7455E-02    -.8768E-02    -.1012E-01    -.1138E-01    -.1315E-01    -.1489E-01
                  </tableData>
               </table>
            </product>
         </function>

         <function NAME="aero/coefficient/CdDf9R">
            <description>
               Airbus A380 SYMETRIC Ground Spoilers
               Drag Coefficient due to Right Ground Spoiler Deflection
               Positive surface deflection is trailing edge up
            </description>
            <product>
               <table>
                  <independentVar lookup="row">aero/alpha-deg</independentVar>
                  <independentVar lookup="column">fcs/right-ground-spoiler-pos-deg</independentVar>
                  <tableData>
                                       .000         10.00         20.00         30.00         40.00         50.00         60.00         70.00         80.00
                       -16.00          .000         .2438E-02     .4468E-02     .5421E-02     .6473E-02     .7593E-02     .8665E-02     .1023E-01     .1183E-01
                       -8.000          .000         .1249E-02     .2328E-02     .2845E-02     .3425E-02     .4050E-02     .4656E-02     .5555E-02     .6490E-02
                       -6.000          .000         .9516E-03     .1793E-02     .2202E-02     .2663E-02     .3164E-02     .3654E-02     .4386E-02     .5153E-02
                       -4.000          .000         .6544E-03     .1258E-02     .1558E-02     .1901E-02     .2278E-02     .2652E-02     .3217E-02     .3817E-02
                       -2.000          .000         .3572E-03     .7231E-03     .9142E-03     .1139E-02     .1393E-02     .1650E-02     .2048E-02     .2481E-02
                         .000          .000         .5996E-04     .1881E-03     .2704E-03     .3769E-03     .5071E-03     .6473E-03     .8783E-03     .1144E-02
                        2.000          .000        -.2373E-03    -.3469E-03    -.3733E-03    -.3851E-03    -.3786E-03    -.3549E-03    -.2909E-03    -.1919E-03
                        4.000          .000        -.5345E-03    -.8819E-03    -.1017E-02    -.1147E-02    -.1264E-02    -.1357E-02    -.1460E-02    -.1528E-02
                        8.000          .000        -.1129E-02    -.1952E-02    -.2305E-02    -.2671E-02    -.3036E-02    -.3361E-02    -.3799E-02    -.4201E-02
                        9.000          .000        -.1278E-02    -.2219E-02    -.2627E-02    -.3052E-02    -.3479E-02    -.3863E-02    -.4383E-02    -.4869E-02
                        10.00          .000        -.1426E-02    -.2487E-02    -.2948E-02    -.3433E-02    -.3921E-02    -.4364E-02    -.4968E-02    -.5537E-02
                        12.00          .000        -.1723E-02    -.3022E-02    -.3592E-02    -.4195E-02    -.4807E-02    -.5366E-02    -.6137E-02    -.6873E-02
                        14.00          .000        -.2021E-02    -.3557E-02    -.4236E-02    -.4957E-02    -.5693E-02    -.6368E-02    -.7306E-02    -.8210E-02
                        16.00          .000        -.2318E-02    -.4092E-02    -.4880E-02    -.5720E-02    -.6579E-02    -.7370E-02    -.8476E-02    -.9546E-02
                        18.00          .000        -.2615E-02    -.4627E-02    -.5523E-02    -.6482E-02    -.7464E-02    -.8372E-02    -.9645E-02    -.1088E-01
                        19.00          .000        -.2764E-02    -.4894E-02    -.5845E-02    -.6863E-02    -.7907E-02    -.8874E-02    -.1023E-01    -.1155E-01
                        20.00          .000        -.2912E-02    -.5162E-02    -.6167E-02    -.7244E-02    -.8350E-02    -.9375E-02    -.1081E-01    -.1222E-01
                        21.00          .000        -.3061E-02    -.5429E-02    -.6489E-02    -.7625E-02    -.8793E-02    -.9876E-02    -.1140E-01    -.1289E-01
                        22.00          .000        -.3209E-02    -.5697E-02    -.6811E-02    -.8006E-02    -.9236E-02    -.1038E-01    -.1198E-01    -.1355E-01
                        24.00          .000        -.3507E-02    -.6232E-02    -.7455E-02    -.8768E-02    -.1012E-01    -.1138E-01    -.1315E-01    -.1489E-01
                  </tableData>
               </table>
            </product>
         </function>

         <function NAME="aero/coefficient/CdDf10L">
            <description>
               Airbus A380 SYMETRIC Flight Spoilers
               Drag Coefficient due to Left Flight Spoiler Deflection
               Positive surface deflection is trailing edge up
            </description>
            <product>
               <table>
                  <independentVar lookup="row">aero/alpha-deg</independentVar>
                  <independentVar lookup="column">fcs/left-flight-spoiler-pos-deg</independentVar>
                  <tableData>
                                       .000         10.00         20.00         25.00         27.50         30.00         32.50         35.00         40.00
                       -16.00          .000         .6917E-02     .1291E-01     .1420E-01     .1483E-01     .1558E-01     .1639E-01     .1710E-01     .1880E-01
                       -8.000          .000         .3667E-02     .7112E-02     .7879E-02     .8257E-02     .8711E-02     .9201E-02     .9636E-02     .1068E-01
                       -6.000          .000         .2854E-02     .5662E-02     .6298E-02     .6613E-02     .6993E-02     .7403E-02     .7769E-02     .8652E-02
                       -4.000          .000         .2042E-02     .4212E-02     .4718E-02     .4969E-02     .5274E-02     .5605E-02     .5901E-02     .6621E-02
                       -2.000          .000         .1229E-02     .2762E-02     .3137E-02     .3326E-02     .3556E-02     .3808E-02     .4034E-02     .4591E-02
                         .000          .000         .4170E-03     .1312E-02     .1556E-02     .1682E-02     .1838E-02     .2010E-02     .2167E-02     .2560E-02
                        2.000          .000        -.3955E-03    -.1384E-03    -.2419E-04     .3849E-04     .1191E-03     .2121E-03     .2999E-03     .5297E-03
                        4.000          .000        -.1208E-02    -.1588E-02    -.1605E-02    -.1605E-02    -.1599E-02    -.1586E-02    -.1567E-02    -.1501E-02
                        8.000          .000        -.2833E-02    -.4489E-02    -.4766E-02    -.4892E-02    -.5036E-02    -.5181E-02    -.5302E-02    -.5562E-02
                        9.000          .000        -.3239E-02    -.5214E-02    -.5556E-02    -.5714E-02    -.5895E-02    -.6080E-02    -.6235E-02    -.6577E-02
                        10.00          .000        -.3645E-02    -.5939E-02    -.6347E-02    -.6536E-02    -.6755E-02    -.6979E-02    -.7169E-02    -.7592E-02
                        12.00          .000        -.4458E-02    -.7389E-02    -.7927E-02    -.8180E-02    -.8473E-02    -.8776E-02    -.9036E-02    -.9623E-02
                        14.00          .000        -.5270E-02    -.8839E-02    -.9508E-02    -.9823E-02    -.1019E-01    -.1057E-01    -.1090E-01    -.1165E-01
                        16.00          .000        -.6083E-02    -.1029E-01    -.1109E-01    -.1147E-01    -.1191E-01    -.1237E-01    -.1277E-01    -.1368E-01
                        18.00          .000        -.6895E-02    -.1174E-01    -.1267E-01    -.1311E-01    -.1363E-01    -.1417E-01    -.1464E-01    -.1571E-01
                        19.00          .000        -.7302E-02    -.1246E-01    -.1346E-01    -.1393E-01    -.1449E-01    -.1507E-01    -.1557E-01    -.1673E-01
                        20.00          .000        -.7708E-02    -.1319E-01    -.1425E-01    -.1475E-01    -.1535E-01    -.1597E-01    -.1650E-01    -.1774E-01
                        21.00          .000        -.8114E-02    -.1391E-01    -.1504E-01    -.1558E-01    -.1621E-01    -.1687E-01    -.1744E-01    -.1876E-01
                        22.00          .000        -.8520E-02    -.1464E-01    -.1583E-01    -.1640E-01    -.1707E-01    -.1777E-01    -.1837E-01    -.1978E-01
                        24.00          .000        -.9333E-02    -.1609E-01    -.1741E-01    -.1804E-01    -.1878E-01    -.1956E-01    -.2024E-01    -.2181E-01
                  </tableData>
               </table>
            </product>
         </function>

         <function NAME="aero/coefficient/CdDf10R">
            <description>
               Airbus A380 SYMETRIC Flight Spoilers
               Drag Coefficient due to Right Flight Spoiler Deflection
               Positive surface deflection is trailing edge up
            </description>
            <product>
               <table>
                  <independentVar lookup="row">aero/alpha-deg</independentVar>
                  <independentVar lookup="column">fcs/right-flight-spoiler-pos-deg</independentVar>
                  <tableData>
                                       .000         10.00         20.00         25.00         27.50         30.00         32.50         35.00         40.00
                       -16.00          .000         .6917E-02     .1291E-01     .1420E-01     .1483E-01     .1558E-01     .1639E-01     .1710E-01     .1880E-01
                       -8.000          .000         .3667E-02     .7112E-02     .7879E-02     .8257E-02     .8711E-02     .9201E-02     .9636E-02     .1068E-01
                       -6.000          .000         .2854E-02     .5662E-02     .6298E-02     .6613E-02     .6993E-02     .7403E-02     .7769E-02     .8652E-02
                       -4.000          .000         .2042E-02     .4212E-02     .4718E-02     .4969E-02     .5274E-02     .5605E-02     .5901E-02     .6621E-02
                       -2.000          .000         .1229E-02     .2762E-02     .3137E-02     .3326E-02     .3556E-02     .3808E-02     .4034E-02     .4591E-02
                         .000          .000         .4170E-03     .1312E-02     .1556E-02     .1682E-02     .1838E-02     .2010E-02     .2167E-02     .2560E-02
                        2.000          .000        -.3955E-03    -.1384E-03    -.2419E-04     .3849E-04     .1191E-03     .2121E-03     .2999E-03     .5297E-03
                        4.000          .000        -.1208E-02    -.1588E-02    -.1605E-02    -.1605E-02    -.1599E-02    -.1586E-02    -.1567E-02    -.1501E-02
                        8.000          .000        -.2833E-02    -.4489E-02    -.4766E-02    -.4892E-02    -.5036E-02    -.5181E-02    -.5302E-02    -.5562E-02
                        9.000          .000        -.3239E-02    -.5214E-02    -.5556E-02    -.5714E-02    -.5895E-02    -.6080E-02    -.6235E-02    -.6577E-02
                        10.00          .000        -.3645E-02    -.5939E-02    -.6347E-02    -.6536E-02    -.6755E-02    -.6979E-02    -.7169E-02    -.7592E-02
                        12.00          .000        -.4458E-02    -.7389E-02    -.7927E-02    -.8180E-02    -.8473E-02    -.8776E-02    -.9036E-02    -.9623E-02
                        14.00          .000        -.5270E-02    -.8839E-02    -.9508E-02    -.9823E-02    -.1019E-01    -.1057E-01    -.1090E-01    -.1165E-01
                        16.00          .000        -.6083E-02    -.1029E-01    -.1109E-01    -.1147E-01    -.1191E-01    -.1237E-01    -.1277E-01    -.1368E-01
                        18.00          .000        -.6895E-02    -.1174E-01    -.1267E-01    -.1311E-01    -.1363E-01    -.1417E-01    -.1464E-01    -.1571E-01
                        19.00          .000        -.7302E-02    -.1246E-01    -.1346E-01    -.1393E-01    -.1449E-01    -.1507E-01    -.1557E-01    -.1673E-01
                        20.00          .000        -.7708E-02    -.1319E-01    -.1425E-01    -.1475E-01    -.1535E-01    -.1597E-01    -.1650E-01    -.1774E-01
                        21.00          .000        -.8114E-02    -.1391E-01    -.1504E-01    -.1558E-01    -.1621E-01    -.1687E-01    -.1744E-01    -.1876E-01
                        22.00          .000        -.8520E-02    -.1464E-01    -.1583E-01    -.1640E-01    -.1707E-01    -.1777E-01    -.1837E-01    -.1978E-01
                        24.00          .000        -.9333E-02    -.1609E-01    -.1741E-01    -.1804E-01    -.1878E-01    -.1956E-01    -.2024E-01    -.2181E-01
                  </tableData>
               </table>
            </product>
         </function>

     </axis>


<!-- ********************************************************************** -->


     <axis name="SIDE">


         <function NAME="aero/coefficient/Cyb">
            <description>
               Side Force coefficient due to Sideslip(per degree)
                Contributes to damping of Dutch Roll mode
            </description>
            <product>
               <property>aero/qbar-area</property>
               <property>aero/beta-deg</property>
               <table>
                  <independentVar>aero/alpha-deg</independentVar>
                  <tableData>
                       -16.00        -.1049E-01
                       -8.000        -.1049E-01
                       -6.000        -.1049E-01
                       -4.000        -.1049E-01
                       -2.000        -.1049E-01
                         .000        -.1049E-01
                        2.000        -.1049E-01
                        4.000        -.1049E-01
                        8.000        -.1049E-01
                        9.000        -.1049E-01
                        10.00        -.1049E-01
                        12.00        -.1049E-01
                        14.00        -.1049E-01
                        16.00        -.1049E-01
                        18.00        -.1049E-01
                        19.00        -.1049E-01
                        20.00        -.1049E-01
                        21.00        -.1049E-01
                        22.00        -.1049E-01
                        24.00        -.1049E-01
                  </tableData>
               </table>
            </product>
         </function>

         <function NAME="aero/coefficient/Cyp">
            <description>
               Side Force Coefficient due to Roll Rate(per degree)
            </description>
            <product>
               <property>aero/qbar-area</property>
               <property>velocities/p-aero-deg_sec</property>
               <table>
                  <independentVar>aero/alpha-deg</independentVar>
                  <tableData>
                       -16.00        -.7738E-02
                       -8.000        -.4859E-02
                       -6.000        -.4134E-02
                       -4.000        -.3420E-02
                       -2.000        -.2719E-02
                         .000        -.2010E-02
                        2.000        -.1287E-02
                        4.000        -.5533E-03
                        8.000         .9305E-03
                        9.000         .1302E-02
                        10.00         .1691E-02
                        12.00         .2438E-02
                        14.00         .3082E-02
                        16.00         .3642E-02
                        18.00         .4118E-02
                        19.00         .4327E-02
                        20.00         .4417E-02
                        21.00         .4441E-02
                        22.00         .4902E-02
                        24.00         .2308E-01
                  </tableData>
               </table>
            </product>
         </function>


         <!-- *************************
              Not calculated by DATCOM+
              ************************* -->

         <function NAME="aero/coefficient/Cyr">
            <description>
               Side Force due to Yaw Rate(DATCOM does not calculate)
               Effect is small
            </description>
            <product>
               <property>velocities/r-aero-deg_sec</property>
               <value>    .000    </value>
            </product>
         </function>


         <!-- *************************
              Not calculated by DATCOM+
              ************************* -->

         <function NAME="aero/coefficient/CyDr">
            <description>
               Side Force due to rudder(DATCOM does not calculate)
            </description>
            <product>
               <property>fcs/rudder-pos-deg</property>
               <value>    .000    </value>
            </product>
         </function>


         <!-- *************************
              Not calculated by DATCOM+
              ************************* -->

         <function NAME="aero/coefficient/CyDa">
            <description>
               Side Force due to aileron(DATCOM does not calculate)
               Usually neglected
            </description>
            <product>
               <property>fcs/left-aileron-pos-deg</property>
               <value>    .000    </value>
            </product>
         </function>

     </axis>


<!-- ********************************************************************** -->


     <axis name="ROLL">


         <function NAME="aero/coefficient/Clb">
            <description>
               Roll Moment coefficient due to Beta(per degree)
               Decrease of Clb to small negative value improves Dutch Roll Damping
               High Positive value leads to excessive spiral instability
            </description>
            <product>
               <property>aero/qbar-area</property>
               <property>aero/beta-deg</property>
               <property>metrics/bw-ft</property>
               <table>
                  <independentVar>aero/alpha-deg</independentVar>
                  <tableData>
                       -16.00         .3225E-03
                       -8.000        -.1405E-02
                       -6.000        -.1843E-02
                       -4.000        -.2271E-02
                       -2.000        -.2686E-02
                         .000        -.3102E-02
                        2.000        -.3528E-02
                        4.000        -.3965E-02
                        8.000        -.4874E-02
                        9.000        -.5106E-02
                        10.00        -.5339E-02
                        12.00        -.5749E-02
                        14.00        -.6064E-02
                        16.00        -.6291E-02
                        18.00        -.6419E-02
                        19.00        -.6445E-02
                        20.00        -.6439E-02
                        21.00        -.6437E-02
                        22.00        -.6451E-02
                        24.00        -.6105E-02
                  </tableData>
               </table>
            </product>
         </function>

         <function NAME="aero/coefficient/Clp">
            <description>
               Roll Moment coefficient due to roll rate(per degree)
               Clp alone determines damping-in-roll characteristics
            </description>
            <product>
               <property>aero/qbar-area</property>
               <property>metrics/bw-ft</property>
               <property>aero/bi2vel</property>
               <property>velocities/p-aero-deg_sec</property>
               <table>
                  <independentVar>aero/alpha-deg</independentVar>
                  <tableData>
                       -16.00        -.8289E-02
                       -8.000        -.8051E-02
                       -6.000        -.7934E-02
                       -4.000        -.7717E-02
                       -2.000        -.7641E-02
                         .000        -.7783E-02
                        2.000        -.7955E-02
                        4.000        -.8062E-02
                        8.000        -.8138E-02
                        9.000        -.8126E-02
                        10.00        -.7743E-02
                        12.00        -.6184E-02
                        14.00        -.4677E-02
                        16.00        -.3192E-02
                        18.00        -.1502E-02
                        19.00        -.5774E-03
                        20.00        -.3201E-03
                        21.00        -.7449E-03
                        22.00         .1511E-02
                        24.00         .1142E-01
                  </tableData>
               </table>
            </product>
         </function>

         <function NAME="aero/coefficient/Clr">
            <description>
               Roll Moment coefficient due to yaw rate(per degree)
               Considerable effect on Spiral mode. Large
               positive values leads to strong sprial instability.
            </description>
            <product>
               <property>aero/qbar-area</property>
               <property>metrics/bw-ft</property>
               <property>aero/bi2vel</property>
               <property>velocities/r-aero-deg_sec</property>
               <table>
                  <independentVar>aero/alpha-deg</independentVar>
                  <tableData>
                       -16.00        -.5092E-02
                       -8.000        -.1833E-02
                       -6.000        -.1022E-02
                       -4.000        -.2307E-03
                       -2.000         .5365E-03
                         .000         .1313E-02
                        2.000         .2109E-02
                        4.000         .2918E-02
                        8.000         .4544E-02
                        9.000         .4947E-02
                        10.00         .5346E-02
                        12.00         .6021E-02
                        14.00         .6514E-02
                        16.00         .6856E-02
                        18.00         .7022E-02
                        19.00         .7034E-02
                        20.00         .6994E-02
                        21.00         .6978E-02
                        22.00         .6983E-02
                        24.00         .6198E-02
                  </tableData>
               </table>
            </product>
         </function>

         <function NAME="aero/coefficient/ClDa">
            <description>
               Airbus A380 ASYMETRIC Plain Flap Ailerons
               Roll moment coefficient due to aileron deflection
            </description>
            <product>
               <property>aero/qbar-area</property>
               <property>metrics/bw-ft</property>
               <table>
                  <independentVar>fcs/left-aileron-pos-deg</independentVar>
                  <tableData>
                       -70.00        -.3728E-01
                       -40.00        -.3007E-01
                       -20.00        -.1787E-01
                       -10.00        -.8937E-02
                         .000          .000
                        10.00         .8937E-02
                        20.00         .1787E-01
                        40.00         .3007E-01
                        70.00         .3728E-01
                  </tableData>
               </table>
            </product>
         </function>

         <function NAME="aero/coefficient/ClDf2">
            <description>
               Airbus A380 SYMETRIC Trailing Edge Flaps
               Roll Moment Coefficient due to Asymetrical Single Slotted Flap Deflection
               calculated as difference between left and right flap lift coef,
               times distance from centerline to MAC of surface
            </description>
            <product>
               <value>     33.74</value>
               <difference>
                  <property>aero/coefficient/CLDf2R</property>
                  <property>aero/coefficient/CLDf2L</property>
               </difference>
            </product>
         </function>

         <function NAME="aero/coefficient/ClDf7">
            <description>
               Airbus A380 SYMETRIC Leading Edge Slats
               Roll Moment Coefficient due to Asymetrical Leading Edge Slat Deflection
               calculated as difference between left and right flap lift coef,
               times distance from centerline to MAC of surface
            </description>
            <product>
               <value>     51.19</value>
               <difference>
                  <property>aero/coefficient/CLDf7R</property>
                  <property>aero/coefficient/CLDf7L</property>
               </difference>
            </product>
         </function>

         <function NAME="aero/coefficient/ClDf9">
            <description>
               Airbus A380 SYMETRIC Ground Spoilers
               Roll Moment Coefficient due to Asymetrical Ground Spoiler Deflection
               calculated as difference between left and right ground spoiler lift coef,
               times distance from centerline to MAC of surface
            </description>
            <product>
               <value>     24.12</value>
               <difference>
                  <property>aero/coefficient/CLDf9R</property>
                  <property>aero/coefficient/CLDf9L</property>
               </difference>
            </product>
         </function>

         <function NAME="aero/coefficient/ClDf10">
            <description>
               Airbus A380 SYMETRIC Flight Spoilers
               Roll Moment Coefficient due to Asymetrical Flight Spoiler Deflection
               calculated as difference between left and right flight spoiler lift coef,
               times distance from centerline to MAC of surface
            </description>
            <product>
               <value>     61.25</value>
               <difference>
                  <property>aero/coefficient/CLDf10R</property>
                  <property>aero/coefficient/CLDf10L</property>
               </difference>
            </product>
         </function>


         <!-- *************************
              Not calculated by DATCOM+
              ************************* -->

         <function NAME="aero/coefficient/ClDr">
            <description>
               Roll moment due to rudder(DATCOM does not calculate)
               Usually insignificant in dynamic stability considerations
               but is ued in autopilot work
            </description>
            <product>
               <property>metrics/bw-ft</property>
               <property>fcs/rudder-pos-deg</property>
               <value>    .000    </value>
            </product>
         </function>

     </axis>


<!-- ********************************************************************** -->


     <axis name="PITCH">


         <function NAME="aero/coefficient/Cm_basic">
            <description>
               Basic_Pitch_moment_coefficient
            </description>
            <product>
               <property>aero/qbar-area</property>
               <property>metrics/cbarw-ft</property>
               <table>
                  <independentVar>aero/alpha-deg</independentVar>
                  <tableData>
                       -16.00        -.1353
                       -8.000         .1494E-01
                       -6.000         .4650E-01
                       -4.000         .7593E-01
                       -2.000         .1028
                         .000         .1319
                        2.000         .1633
                        4.000         .1949
                        8.000         .2584
                        9.000         .2743
                        10.00         .2897
                        12.00         .3067
                        14.00         .3137
                        16.00         .3002
                        18.00         .2496
                        19.00         .2496
                        20.00         .2496
                        21.00         .2496
                        22.00         .2496
                        24.00         .2496
                  </tableData>
               </table>
            </product>
         </function>

         <function NAME="aero/coefficient/Cmq">
            <description>
               Pitch moment coefficient due to pitch rate(per degree)
                Pitch Damping Derivative
               Very important to Short Period damping of oscillations.
            </description>
            <product>
               <property>aero/qbar-area</property>
               <property>metrics/cbarw-ft</property>
               <property>aero/ci2vel</property>
               <property>velocities/q-aero-deg_sec</property>
               <table>
                  <independentVar>aero/alpha-deg</independentVar>
                  <tableData>
                       -16.00        -.2095
                       -8.000        -.2095
                       -6.000        -.2095
                       -4.000        -.2095
                       -2.000        -.2095
                         .000        -.2095
                        2.000        -.2095
                        4.000        -.2095
                        8.000        -.2095
                        9.000        -.2095
                        10.00        -.2095
                        12.00        -.2095
                        14.00        -.2095
                        16.00        -.2095
                        18.00        -.2095
                        19.00        -.2095
                        20.00        -.2095
                        21.00        -.2095
                        22.00        -.2095
                        24.00        -.2095
                  </tableData>
               </table>
            </product>
         </function>

         <function NAME="aero/coefficient/Cmadot">
            <description>
               Pitch moment coefficient due to AOA rate(per degree)
               Negitive Cmad increase Short Period damping
            </description>
            <product>
               <property>aero/qbar-area</property>
               <property>metrics/cbarw-ft</property>
               <property>aero/ci2vel</property>
               <property>aero/alphadot-deg_sec</property>
               <table>
                  <independentVar>aero/alpha-deg</independentVar>
                  <tableData>
                       -16.00        -.6968E-01
                       -8.000        -.7208E-01
                       -6.000        -.7263E-01
                       -4.000        -.7237E-01
                       -2.000        -.7301E-01
                         .000        -.7507E-01
                        2.000        -.7577E-01
                        4.000        -.7476E-01
                        8.000        -.7237E-01
                        9.000        -.7097E-01
                        10.00        -.6737E-01
                        12.00        -.5637E-01
                        14.00        -.4418E-01
                        16.00        -.3399E-01
                        18.00        -.2134E-01
                        19.00        -.1583E-01
                        20.00        -.9761E-02
                        21.00        -.5384E-02
                        22.00         .6879E-02
                        24.00         .3236E-01
                  </tableData>
               </table>
            </product>
         </function>

         <function NAME="aero/coefficient/CmDe">
            <description>
               Pitch moment coefficient due to elevator deflection
               Positive surface deflection is trailing edge down
            </description>
            <product>
               <property>aero/qbar-area</property>
               <property>metrics/cbarw-ft</property>
               <table>
                  <independentVar>fcs/elevator-pos-deg</independentVar>
                  <tableData>
                       -20.00         .2188
                       -15.00         .1960
                       -10.00         .1343
                       -5.000         .6722E-01
                         .000        -.1345E-03
                        5.000        -.6722E-01
                        10.00        -.1343
                        13.00        -.1727
                        16.00        -.2063
                  </tableData>
               </table>
            </product>
         </function>

         <function NAME="aero/coefficient/CmDf2L">
            <description>
               Airbus A380 SYMETRIC Trailing Edge Flaps
               Pitch moment coefficient due to left single slotted flap deflection
               Positive surface deflection is trailing edge down
            </description>
            <product>
               <property>aero/qbar-area</property>
               <table>
                  <independentVar>fcs/left-flap-pos-deg</independentVar>
                  <tableData>
                         .000          .000
                       -5.000         .8226E-03
                       -10.00        -.6022E-03
                       -15.00        -.4096E-02
                       -20.00        -.1280E-01
                       -25.00        -.1638E-01
                       -30.00        -.1979E-01
                       -35.00        -.2145E-01
                       -40.00        -.2214E-01
                  </tableData>
               </table>
            </product>
         </function>

         <function NAME="aero/coefficient/CmDf2R">
            <description>
               Airbus A380 SYMETRIC Trailing Edge Flaps
               Pitch moment coefficient due to right single slotted flap deflection
               Positive surface deflection is trailing edge down
            </description>
            <product>
               <property>aero/qbar-area</property>
               <table>
                  <independentVar>fcs/right-flap-pos-deg</independentVar>
                  <tableData>
                         .000          .000
                       -5.000         .8226E-03
                       -10.00        -.6022E-03
                       -15.00        -.4096E-02
                       -20.00        -.1280E-01
                       -25.00        -.1638E-01
                       -30.00        -.1979E-01
                       -35.00        -.2145E-01
                       -40.00        -.2214E-01
                  </tableData>
               </table>
            </product>
         </function>

         <function NAME="aero/coefficient/CmDf7L">
            <description>
               Airbus A380 SYMETRIC Leading Edge Slats
               Pitch moment coefficient due to left leading edge slat deflection
               Positive surface deflection is leading edge down
            </description>
            <product>
               <property>aero/qbar-area</property>
               <table>
                  <independentVar>fcs/left-leading-edge-slat-pos-deg</independentVar>
                  <tableData>
                         .000          .000
                        5.000         .2239E-02
                        10.00         .3843E-02
                        20.00         .7445E-02
                  </tableData>
               </table>
            </product>
         </function>

         <function NAME="aero/coefficient/CmDf7R">
            <description>
               Airbus A380 SYMETRIC Leading Edge Slats
               Pitch moment coefficient due to right leading edge slat deflection
               Positive surface deflection is leading edge down
            </description>
            <product>
               <property>aero/qbar-area</property>
               <table>
                  <independentVar>fcs/right-leading-edge-slat-pos-deg</independentVar>
                  <tableData>
                         .000          .000
                        5.000         .2239E-02
                        10.00         .3843E-02
                        20.00         .7445E-02
                  </tableData>
               </table>
            </product>
         </function>

         <function NAME="aero/coefficient/CmDf9L">
            <description>
               Airbus A380 SYMETRIC Ground Spoilers
               Pitch moment coefficient due to left Ground Spoiler deflection
               Positive surface deflection is trailing edge up
            </description>
            <product>
               <property>aero/qbar-area</property>
               <table>
                  <independentVar>fcs/left-ground-spoiler-pos-deg</independentVar>
                  <tableData>
                         .000          .000
                        10.00         .3722E-02
                        20.00         .9124E-02
                        30.00         .1346E-01
                        40.00         .1450E-01
                        50.00         .1295E-01
                        60.00         .1013E-01
                        70.00         .5744E-02
                        80.00         .9453E-03
                  </tableData>
               </table>
            </product>
         </function>

         <function NAME="aero/coefficient/CmDf9R">
            <description>
               Airbus A380 SYMETRIC Ground Spoilers
               Pitch moment coefficient due to right Ground Spoiler deflection
               Positive surface deflection is trailing edge up
            </description>
            <product>
               <property>aero/qbar-area</property>
               <table>
                  <independentVar>fcs/right-ground-spoiler-pos-deg</independentVar>
                  <tableData>
                         .000          .000
                        10.00         .3722E-02
                        20.00         .9124E-02
                        30.00         .1346E-01
                        40.00         .1450E-01
                        50.00         .1295E-01
                        60.00         .1013E-01
                        70.00         .5744E-02
                        80.00         .9453E-03
                  </tableData>
               </table>
            </product>
         </function>

         <function NAME="aero/coefficient/CmDf10L">
            <description>
               Airbus A380 SYMETRIC Flight Spoilers
               Pitch moment coefficient due to left Flight Spoiler deflection
               Positive surface deflection is trailing edge up
            </description>
            <product>
               <property>aero/qbar-area</property>
               <table>
                  <independentVar>fcs/left-flight-spoiler-pos-deg</independentVar>
                  <tableData>
                         .000          .000
                        10.00         .4793E-02
                        20.00         .1022E-01
                        25.00         .1284E-01
                        27.50         .1410E-01
                        30.00         .1443E-01
                        32.50         .1470E-01
                        35.00         .1507E-01
                        40.00         .1489E-01
                  </tableData>
               </table>
            </product>
         </function>

         <function NAME="aero/coefficient/CmDf10R">
            <description>
               Airbus A380 SYMETRIC Flight Spoilers
               Pitch moment coefficient due to right Flight Spoiler deflection
               Positive surface deflection is trailing edge up
            </description>
            <product>
               <property>aero/qbar-area</property>
               <table>
                  <independentVar>fcs/right-flight-spoiler-pos-deg</independentVar>
                  <tableData>
                         .000          .000
                        10.00         .4793E-02
                        20.00         .1022E-01
                        25.00         .1284E-01
                        27.50         .1410E-01
                        30.00         .1443E-01
                        32.50         .1470E-01
                        35.00         .1507E-01
                        40.00         .1489E-01
                  </tableData>
               </table>
            </product>
         </function>

     </axis>


<!-- ********************************************************************** -->


     <axis name="YAW">


         <function NAME="aero/coefficient/Cnb">
            <description>
               Yaw moment coefficient due to sideslip(per degree)
               Determines Dutch Roll and Spiral characteristics
               Prevents side-slip and yawing moments
            </description>
            <product>
               <property>aero/qbar-area</property>
               <property>metrics/bw-ft</property>
               <property>aero/beta-deg</property>
               <table>
                  <independentVar>aero/alpha-deg</independentVar>
                  <tableData>
                       -16.00         .2066E-02
                       -8.000         .2066E-02
                       -6.000         .2066E-02
                       -4.000         .2066E-02
                       -2.000         .2066E-02
                         .000         .2066E-02
                        2.000         .2066E-02
                        4.000         .2066E-02
                        8.000         .2066E-02
                        9.000         .2066E-02
                        10.00         .2066E-02
                        12.00         .2066E-02
                        14.00         .2066E-02
                        16.00         .2066E-02
                        18.00         .2066E-02
                        19.00         .2066E-02
                        20.00         .2066E-02
                        21.00         .2066E-02
                        22.00         .2066E-02
                        24.00         .2066E-02
                  </tableData>
               </table>
            </product>
         </function>

         <function NAME="aero/coefficient/Cnp">
            <description>
               Yaw moment coefficient due to roll rate(per degree)
               Reduces Dutch Roll damping.
               positive value desireable.
            </description>
            <product>
               <property>aero/qbar-area</property>
               <property>metrics/bw-ft</property>
               <property>aero/bi2vel</property>
               <property>velocities/p-aero-deg_sec</property>
               <table>
                  <independentVar>aero/alpha-deg</independentVar>
                  <tableData>
                       -16.00         .1624E-02
                       -8.000         .6895E-03
                       -6.000         .4503E-03
                       -4.000         .2143E-03
                       -2.000        -.2003E-04
                         .000        -.2574E-03
                        2.000        -.4982E-03
                        4.000        -.7429E-03
                        8.000        -.1242E-02
                        9.000        -.1369E-02
                        10.00        -.1520E-02
                        12.00        -.1854E-02
                        14.00        -.2151E-02
                        16.00        -.2412E-02
                        18.00        -.2633E-02
                        19.00        -.2721E-02
                        20.00        -.2751E-02
                        21.00        -.2750E-02
                        22.00        -.2888E-02
                        24.00         .1102E-01
                  </tableData>
               </table>
            </product>
         </function>

         <function NAME="aero/coefficient/Cnr">
            <description>
               Yaw Moment coefficient due to yaw rate(per degree)
               Main contributor to damping of Dutch Roll
            </description>
            <product>
               <property>aero/qbar-area</property>
               <property>metrics/bw-ft</property>
               <property>aero/bi2vel</property>
               <property>velocities/r-aero-deg_sec</property>
               <table>
                  <independentVar>aero/alpha-deg</independentVar>
                  <tableData>
                       -16.00        -.1221E-02
                       -8.000        -.1189E-02
                       -6.000        -.1198E-02
                       -4.000        -.1213E-02
                       -2.000        -.1235E-02
                         .000        -.1261E-02
                        2.000        -.1294E-02
                        4.000        -.1333E-02
                        8.000        -.1430E-02
                        9.000        -.1458E-02
                        10.00        -.1487E-02
                        12.00        -.1540E-02
                        14.00        -.1582E-02
                        16.00        -.1611E-02
                        18.00        -.1623E-02
                        19.00        -.1621E-02
                        20.00        -.1615E-02
                        21.00        -.1609E-02
                        22.00        -.1605E-02
                        24.00        -.1527E-02
                  </tableData>
               </table>
            </product>
         </function>

         <function NAME="aero/coefficient/CnDf2">
            <description>
               Airbus A380 SYMETRIC Trailing Edge Flaps
               Yaw Moment Coefficient due to Asymetrical Single Slotted Flap Deflection
               calculated as difference between left and right flap drag coef,
               times distance from centerline to MAC of surface
            </description>
            <product>
               <value>     33.74</value>
               <difference>
                  <property>aero/coefficient/CdDf2R</property>
                  <property>aero/coefficient/CdDf2L</property>
               </difference>
            </product>
         </function>

         <function NAME="aero/coefficient/CnDf7">
            <description>
               Airbus A380 SYMETRIC Leading Edge Slats
               Yaw Moment Coefficient due to Asymetrical Leading Edge Slat Deflection
               calculated as difference between left and right LE slat drag coef,
               times distance from centerline to MAC of surface
            </description>
            <product>
               <value>     51.19</value>
               <difference>
                  <property>aero/coefficient/CdDf7R</property>
                  <property>aero/coefficient/CdDf7L</property>
               </difference>
            </product>
         </function>

         <function NAME="aero/coefficient/CnDf9">
            <description>
               Airbus A380 SYMETRIC Ground Spoilers
               Yaw Moment Coefficient due to Asymetrical Ground Spoiler Deflection
               calculated as difference between left and right ground spoiler drag coef,
               times distance from centerline to MAC of surface
            </description>
            <product>
               <value>     24.12</value>
               <difference>
                  <property>aero/coefficient/CdDf9R</property>
                  <property>aero/coefficient/CdDf9L</property>
               </difference>
            </product>
         </function>

         <function NAME="aero/coefficient/CnDf10">
            <description>
               Airbus A380 SYMETRIC Flight Spoilers
               Yaw Moment Coefficient due to Asymetrical Flight Spoiler Deflection
               calculated as difference between left and right flight spoiler drag coef,
               times distance from centerline to MAC of surface
            </description>
            <product>
               <value>     61.25</value>
               <difference>
                  <property>aero/coefficient/CdDf10R</property>
                  <property>aero/coefficient/CdDf10L</property>
               </difference>
            </product>
         </function>

         <function NAME="aero/coefficient/CnDa">
            <description>
               Airbus A380 ASYMETRIC Plain Flap Ailerons
               Yaw Moment coefficient due to plain flap aileron deflection
            </description>
            <product>
               <property>metrics/bw-ft</property>
               <table>
                  <independentVar lookup="row">aero/alpha-rad</independentVar>
                  <independentVar lookup="column">fcs/left-aileron-pos-deg                </independentVar>
                  <tableData>
                                     -70.00        -40.00        -20.00        -10.00          .000         10.00         20.00         40.00         70.00
                       -16.00        -.5317E-02    -.4289E-02    -.2547E-02    -.1274E-02      .000         .1274E-02     .2547E-02     .4289E-02     .5317E-02
                       -8.000        -.2150E-02    -.1734E-02    -.1030E-02    -.5150E-03      .000         .5150E-03     .1030E-02     .1734E-02     .2150E-02
                       -6.000        -.1356E-02    -.1094E-02    -.6498E-03    -.3249E-03      .000         .3249E-03     .6498E-03     .1094E-02     .1356E-02
                       -4.000        -.5790E-03    -.4671E-03    -.2774E-03    -.1387E-03      .000         .1387E-03     .2774E-03     .4671E-03     .5790E-03
                       -2.000         .1768E-03     .1426E-03     .8469E-04     .4235E-04      .000        -.4235E-04    -.8469E-04    -.1426E-03    -.1768E-03
                         .000         .9427E-03     .7604E-03     .4516E-03     .2258E-03      .000        -.2258E-03    -.4516E-03    -.7604E-03    -.9427E-03
                        2.000         .1728E-02     .1394E-02     .8280E-03     .4140E-03      .000        -.4140E-03    -.8280E-03    -.1394E-02    -.1728E-02
                        4.000         .2527E-02     .2038E-02     .1211E-02     .6053E-03      .000        -.6053E-03    -.1211E-02    -.2038E-02    -.2527E-02
                        8.000         .4135E-02     .3335E-02     .1981E-02     .9905E-03      .000        -.9905E-03    -.1981E-02    -.3335E-02    -.4135E-02
                        9.000         .4534E-02     .3657E-02     .2172E-02     .1086E-02      .000        -.1086E-02    -.2172E-02    -.3657E-02    -.4534E-02
                        10.00         .4930E-02     .3977E-02     .2362E-02     .1181E-02      .000        -.1181E-02    -.2362E-02    -.3977E-02    -.4930E-02
                        12.00         .5605E-02     .4521E-02     .2685E-02     .1343E-02      .000        -.1343E-02    -.2685E-02    -.4521E-02    -.5605E-02
                        14.00         .6110E-02     .4929E-02     .2927E-02     .1464E-02      .000        -.1464E-02    -.2927E-02    -.4929E-02    -.6110E-02
                        16.00         .6473E-02     .5221E-02     .3101E-02     .1550E-02      .000        -.1550E-02    -.3101E-02    -.5221E-02    -.6473E-02
                        18.00         .6671E-02     .5381E-02     .3196E-02     .1598E-02      .000        -.1598E-02    -.3196E-02    -.5381E-02    -.6671E-02
                        19.00         .6702E-02     .5406E-02     .3211E-02     .1605E-02      .000        -.1605E-02    -.3211E-02    -.5406E-02    -.6702E-02
                        20.00         .6685E-02     .5392E-02     .3203E-02     .1601E-02      .000        -.1601E-02    -.3203E-02    -.5392E-02    -.6685E-02
                        21.00         .6691E-02     .5397E-02     .3205E-02     .1603E-02      .000        -.1603E-02    -.3205E-02    -.5397E-02    -.6691E-02
                        22.00         .6715E-02     .5417E-02     .3217E-02     .1609E-02      .000        -.1609E-02    -.3217E-02    -.5417E-02    -.6715E-02
                        24.00         .6018E-02     .4854E-02     .2883E-02     .1442E-02      .000        -.1442E-02    -.2883E-02    -.4854E-02    -.6018E-02
                  </tableData>
               </table>
            </product>
         </function>


         <!-- ******************************************************
              CnDr is not calculated by DATCOM+, but a default value
              is supplied.
              ******************************************************-->

         <function NAME="aero/coefficient/CnDr">
            <description>
               Yaw Coefficient due to rudder(DATCOM does not calculate)
               High value for controllablity, low value
               for good dynamic stability
            </description>
            <product>
               <property>aero/qbar-area</property>
               <property>metrics/bw-ft</property>
               <property>fcs/rudder-pos-deg</property>
               <value>  -.1047E-02</value>
            </product>
         </function>


     </axis>


<!-- ********************************************************************** -->


      <function NAME="aero/elev_hinge_moment_ft_lbs">
         <description>
            Elevator hinge moment in ft-lbs
            HM = q * S * Cbar * ( Ch0 + Cha*alpha + Chd*delta )
            Positive causes trailing edge down movement
            Ch0 is used to artifically trim HM to zero
         </description>
         <product>
            <property>aero/qbar</property>
            <value>   195.3    </value>	<!-- surface area of elevator -->
            <value>   6.460    </value>	<!-- MAC of elevator -->
            <sum>
               <property>aero/Ch0_elev</property>	   <!-- Ch0 -->
               <product>
                  <property>aero/aero/alpha-deg</property>
                  <table>                            	<!-- Ch-alpha -->
                     <independentVar>aero/alpha-deg</independentVar>
                     <tableData>
                          -16.00    	  -.4298E-02
                          -8.000    	  -.4298E-02
                          -6.000    	  -.4298E-02
                          -4.000    	  -.4298E-02
                          -2.000    	  -.4298E-02
                            .000    	  -.4298E-02
                           2.000    	  -.4298E-02
                           4.000    	  -.4298E-02
                           8.000    	  -.4298E-02
                           9.000    	  -.4298E-02
                           10.00    	  -.7491E-02
                           12.00    	  -.7201E-02
                           14.00    	  -.7156E-02
                           16.00    	  -.7156E-02
                           18.00    	  -.7156E-02
                           19.00    	  -.7156E-02
                           20.00    	  -.7156E-02
                           21.00    	  -.7172E-02
                           22.00    	  -.7224E-02
                           24.00    	  -.7156E-02
                     </tableData>
                  </table>
               </product>
               <product>
                  <property>fcs/elevator-deg</property>
                  <table>                            	<!-- Ch-delta elevator -->
                     <independentVar>fcs/elevator-deg</independentVar>
                     <tableData>
                          -20.00    	  -.7491E-02
                          -15.00    	  -.7201E-02
                          -10.00    	  -.7156E-02
                          -5.000    	  -.7156E-02
                            .000    	  -.7156E-02
                           5.000    	  -.7156E-02
                           10.00    	  -.7156E-02
                           13.00    	  -.7172E-02
                           16.00    	  -.7224E-02
                     </tableData>
                  </table>
               </product>
            </sum>
         </product>
      </function>

   </aerodynamics>


<!-- ********************************************************************** -->


<!--
   OUTPUT section definition

   The following specifies the way that JSBSim writes out data

   NAME is the filename you want the output to go to

   TYPE can be:

      CSV       Comma separated data. If a filename is supplied then the data
                goes to that file. If COUT or cout is specified, the data
                goes to stdout. If the filename is a null filename
                the data goes to stdout, as well

      SOCKET    Will eventually send data to a socket output, where NAME
                would then be the IP address of the machine the data
                should be sent to. DON'T USE THIS YET!

      TABULAR   Columnar data.

      TERMINAL  Output to terminal. NOT IMPLEMENTED YET!

      NONE      Specifies to do nothing. This setting makes it easy to turn
                on and off the data output without having to mess with
                anything else.


   NOTE that Time is always output with the data.

-->


   <output name="JSBout.rec" TYPE="TABULAR" RATE="10">
      <simulation>       OFF </simulation>
      <atmosphere>       ON  </atmosphere>
      <atmosphere>       ON  </atmosphere>
      <massprops>        ON  </massprops>
      <aerosurfaces>     ON  </aerosurfaces>
      <rates>            ON  </rates>
      <velocities>       ON  </velocities>
      <forces>           OFF </forces>
      <moments>          OFF </moments>
      <position>         ON  </position>
      <coefficients>     OFF </coefficients>
      <ground_reactions> OFF </ground_reactions>
      <fcs>              ON  </fcs>
      <propulsion>       OFF </propulsion>

      <property>fcs/flap-pos-deg</property>

   </output>


</fdm_config>
