<?xml version="1.0"?>
<?xml-stylesheet href="http://jsbsim.sourceforge.net/JSBSim.xsl" type="text/xsl"?>
<fdm_config name="Boeing314A" version="2.0" release="BETA"
 xmlns:xsi="http://www.w3.org/2001/XMLSchema-instance"
 xsi:noNamespaceSchemaLocation="http://jsbsim.sourceforge.net/JSBSim.xsd">

    <fileheader>
        <author> Anon Y. Mous </author>
        <filecreationdate> 03-26-2006 </filecreationdate>
        <version> 1.02 </version>
        <description> Models a Boeing314A </description>
        <note>314A model, 14.5 ft propeller, 1600 hp, 5200 miles range (314 model has smaller propeller, 1500 hp and 3500 miles range).</note>
        <note>CG in range, between 26 and 29 % MAC.</note>
        <note>takeoff flaps 2/3.</note>
        <note>real gear ratio 16:9.</note>
        <note>economic speed 110 kt.</note>
        <note>tilt at rest.</note>
        <note>hull drag.</note>
        <note>step lift and triming moment.</note>
        <note>rebound at landing.</note>
        <note>skipping at landing (empty weight).</note>

        <limitation>the gear tilt reduces brakes efficiency (empty at idle 700 RPM) : increasing the static friction brings vibrations at rest.</limitation>
        <limitation>no waterloop when turns by cross-wind (wing diging water).</limitation>
        <limitation>weathervaning doesn't result of the real causes.</limitation>
        <limitation>no weathervaning at rest.</limitation>
        <limitation>no propoising at takeoff.</limitation>
        <limitation>no fuel selector.</limitation>
        <limitation>heading autopilot can hang in a roll : the ball of the turn indicator experiences of a centrifugal force, in the direction of the roll.</limitation>

        <documentation>
  File:     Boeing314A.xml
  Author:   Aero-Matic v 0.71

  Inputs:
    name:          Boeing314A
    type:          multi-engine prop transport
    max weight:    84000.0 lb
    wing span:     152.0 ft
    length:        106.0 ft
    wing area:     2867.0 sq-ft
    gear type:     tricycle
    retractable?:  no
    # engines:     4
    engine type:   piston
    engine layout: wings
    yaw damper?    no

  Outputs:
    wing loading:  29.30 lb/sq-ft
    CL-alpha:      4.9 per radian
    CL-0:          0.24
    CL-max:        1.4
    CD-0:          0.028
    K:             0.039


  Notation :
  ========
  Hydrodynamic coefficients starts by H.
  Artificial coefficients starts by A.


  Not possible :
  ============
  - buoyancy by weak spring, because that can rear up at rest (and speed makes water as hard as concrete).
  - rebound by hard spring, because static can be unstable with empty weight.


  References :
  ==========
  - http://www.airweb.faa.gov/Regulatory_and_Guidance_Library/rgMakeModel.nsf/MainFrame?OpenFrameSet
  (FAA certificate, TC704 - 25 january 1939, B-314) :

  Engine limits : * maximum except take-off (straight line manifold pressure variation) : 33.2 in. hg. 2100 rpm (1200 hp)
                  at 5400 ft, 35.0 in. hg. 2100 rpm (1200 hp) at sea level.
                  * take-off (2 minutes), 42.5 in. hg. 2400 rpm (1550 hp).
  Airspeed limits : * level flight or climb 178 mph (155 kt) true, glide or dive 212 mph (184 kt) true.
                    * flaps extended (40 or less) 121 mph (105 kt) true.
                    * flaps extended (more than 40) 105 mph (91 kt) true.
  Weight limits : landing 80000 lb, take-off 84000 lb.
  Fuel capacity : 5448 gallons (32688 lb). 2 tanks at 600 gallons (3600 lb) each, in wing stubs; 1 tank 960 gallons
                  (5760 lb) inboard; and 1 tank at 1164 gallons (6984 lb) outboard, in each hydro-stabilizer.

  Note that :
  - 1 gallon = 6 lb !
  - this is the most recent content (314A), the real content of 314 could be lower.

  Datum : nose of hull.
  MAC : 258.79 in., leading edge of MAC at 398.66 in.
  CG range (flight)   : * at 80000 lb or more, 455.6 in. (22% MAC) to 478.2 in. (30.7% MAC).
                        * at less than 80000 lb, 444.3 in. (17.65% MAC) to 478.2 in. (30.7% MAC).
           (landing)  : * at 70330 lb or more, 463.4 in. (25% MAC) to 478.2 in. (30.7% MAC).
                        * at less than 70330 lb, 455.6 in. (22% MAC) to 478.2 in. (30.7% MAC).

  Ceiling (ft)   Weight (lb)   RPM   Manifold   True IAS   Prop.   Cowl flap   De-icers
                                     pressure     (kt)     blade    opening    installed
  ======================================================================================
     8900         80000       2100   Full         100     6159A-0     ...         ...
                                     throttle
     7500         84000       2100   Full         102     6159A-0     ...         ...
                                     throttle
    10000         80000       2100   Full         100     6243A-3   5 degrees     yes
                                     throttle
     9000         84000       2100   Full         102     6243A-3   5 degrees     yes
                                     throttle

  Propeller : * Hamilton standard 3 blade constant speed, 6243A-3 to 6243A-6 inclusive, diameter 14'9-3/8" maximum
              14'5-5/8" minimum (1928 lb).
              * Hamilton standard 3 blade constant speed, 6159A-0 to 6159A-3 inclusive, diameter 14'3/8" maximum
              13'8-3/4" minimum (1819 lb).

  - http://www.airweb.faa.gov/Regulatory_and_Guidance_Library/rgMakeModel.nsf/MainFrame?OpenFrameSet
  (FAA certificate, TC704 - 2 may 1941 B-314A) :

  Same model as B-314, except for engine, powerplane installation, engine mount, and inner structural details.

  Engine limits : * maximum except take-off (straight line manifold pressure variation) : 35.8 in. hg. 2300 rpm (1350 hp)
                  at 6200 ft, 37.5 in. hg. 2300 rpm (1350 hp) at sea level.
                  * take-off (2 minutes), 43.5 in. hg. 2400 rpm (1600 hp).

  Ceiling (ft)   Weight (lb)   RPM   Manifold   True IAS   Prop.   Cowl flap   De-icers
                                     pressure     (kt)     blade    opening    installed
  ======================================================================================
    10000         80000       2300   Full         100     6243A-3   5 degrees     yes
                                     throttle
     9000         84000       2300   Full         102     6243A-3   5 degrees     yes
                                     throttle

  Propeller : Hamilton standard 3 blade constant speed, 6243A-3 to 6243A-6 inclusive, diameter 14'9-3/8" maximum
              14'5-5/8" minimum (1928 lb).

  - http://case.pr.erau.edu/reports/US_reports/1940/1943.02.22_PanAmericanAirways_Boeing-314.pdf
  (crash - 22 february 1943 Lisbon, Portugal) :

  Elevator range : +/-25 deg (20 + 5).

  - http://case.pr.erau.edu/reports/US_reports/1940/1941.08.16_PanAmericanAirways_Boeing-314.pdf
  (crash - 16 august 1941 Apra Harbor, Guam) :

  Takeoff : in less than 6000 ft (full load).

  - http://www.hq.nasa.gov/office/pao/History/SP-468/app-a2.htm/

  Maximum power (sea level) : 1600 hp per engine, power loading 13.1 lb / hp.
  Weights : gross 84000 lb, empty 48400 lb.
  Lengths : wing span 152.0 ft, length 106.0 ft.
  Areas : wing 2867 sq ft, wind loading 29.3 lb / sq ft, drag area (CD0 x wing area) 78.56 sq ft.
  Speeds : Vmax 201 mph at 6200 ft, Vcruise 184 mph at 11000 ft, Vstall 70 mph.
  Drag : CD0 (zero-lift) 0.0274, wing aspect ratio 8.06, maximum lift/drag ratio 13.0.

  - http://www.hq.nasa.gov/office/pao/History/SP-468/ch8-2.htm/

  Curve of a hull drag.

  - http://www.aviation-history.com/boeing/314.html/

  4 Wright GR-2600 Twin Cyclone, 1600 hp (1192 kw), 14 cylinder, air-cooled, radial engines.
  Weights : gross 82500 lb, empty 50268 lb.
  Lengths : wing span 152.0 ft, length 106.0 ft, height 27.7 ft.
  Wing area : 2867 sq ft.
  Speeds : maximum level 199 mph, cruise 183 mph.
  Service ceiling : 13400 ft.
  Normal range : 3500 miles.

  - http://www.daveswarbirds.com/usplanes/aircraft/b-314.htm/

  4 Wright GR-2600 Cyclone, 1600 hp, 14 radial.
  Weights : gross 82500 lb, empty 50268 lb.
  Lengths : wing span 152.0 ft, length 106.0 ft, height 27.7 ft.
  Wing area : 2867 sq ft.
  Speeds : maximum 193 mph at 10000 ft, cruise 183 mph.
  Service ceiling : 13400 ft.
  Normal range : 3500 miles.

  - http://www.flyingclippers.com/B314.html/

  Ceiling : cruise 13400 ft, maximum 19600 ft, climb 562 ft/min.
  Crew : 6-10.
  Payload : 40-74 (36 night) passengers.

  - http://www.boeing.com/history/boeing/m314.html/

  (B314-A)

  4 1600 hp Wright GR-2600 Twin Cyclone.
  Weights : gross 84000 lb.
  Lengths : wing span 152.0 ft, length 106.0 ft.
  Speeds : maximum 199 mph, cruise 184 mph.
  Ceiling : 19600 ft.
  Range : 5200 miles.
  Accommodation : 10 crew, 74 passengers.

  - http://www.southernoregonwarbirds.org/fa3.html/
    (Franck Varnum flew during WWII).

  The sponsons (the short fins sticking out of the sides of the fuselage) provide lateral stability on the water. They
  were filled with gasoline and as a result were not at all that buoyant.
  If you had to taxi to downwind, on the turn to downwind the wind could get under the upwind wing and tip the plane until
  the downwind wing dug into the water. In that condition a lot of water could flow into the wing, and once there could
  flow through the wings and into the fuselage, dousing everyone and everything. That never happened to me but I did hear
  of such cases.
  When we faced that situation we would have several of the crew walk into the upwind wing out to the outer nacelle, to
  provide balance during the turn. The wing at the fuselage was about 11 feet thick and contained a catwalk that led all
  the way out to the outboard engine. Flight engineers could actually work on the engines in flight.

  Set up the cruise at 117 mph (102 kt), until 135 mph (117 kt) as one burns off gas.
  They were never anywhere near the advertised max cruise of 193 mph (168 kt) : KSFO - PHNL (2080 nmi) at an average
  speed of 126 mph (109 kt), 16 hours depending of wind.
  During "Amber Alerts", they leaned out the mixture and slowed the engine rpms to 100 mph (87 kt) : 23-24 hours till
  Honolulu.

  Landing : 70-75 mph (61-65 kt).

  - TV documentary (Panam films) :

  At rest, B314 tilted on one of its lateral sponsons.

  - http://www.pilotfriend.com/flight_training/frames2/seaplane_main_frame.htm/ :
  How to fly seaplanes and amphibians.

  - http://naca.larc.nasa.gov/reports/1938/naca-tn-512/ :
  A complete tank test of the hull of the Sikorsky S-40 flying-boat - American clipper class,
  John R. Dawson, December 1934.

  - http://naca.larc.nasa.gov/reports/1952/naca-report-1103/ :
  Generalized theory for seaplane impact, Benjamin Milwitzky, October 1952.

  - http://www.nwlink.com/~orion/Documents/Hull.pdf/ :
  Stepped hull development for amphibious aircraft, Orion Technologies.
        </documentation>
    </fileheader>

    <metrics>
        <wingarea unit="FT2"> 2867 </wingarea>
        <wingspan unit="FT"> 152 </wingspan>
        <chord unit="FT"> 21.57 </chord>
        <htailarea unit="FT2"> 458.72 </htailarea>
        <htailarm unit="FT"> 22.91 </htailarm>
        <vtailarea unit="FT2"> 516.06 </vtailarea>
        <vtailarm unit="FT"> 17.17 </vtailarm>
        <location name="AERORP" unit="IN">
            <x> 477.7 </x>
            <y> 0 </y>
            <z> 0 </z>
        </location>
        <location name="EYEPOINT" unit="IN">
            <x> 101.8 </x>
            <y> -24 </y>
            <z> 65 </z>
        </location>
        <location name="VRP" unit="IN">
            <x> 0 </x>
            <y> 0 </y>
            <z> 0 </z>
        </location>
    </metrics>

    <mass_balance>
        <ixx unit="SLUG*FT2"> 2.31442e+06 </ixx>
        <iyy unit="SLUG*FT2"> 1.34649e+06 </iyy>
        <izz unit="SLUG*FT2"> 3.59608e+06 </izz>
        <ixy unit="SLUG*FT2"> 0 </ixy>
        <ixz unit="SLUG*FT2"> 0 </ixz>
        <iyz unit="SLUG*FT2"> 0 </iyz>
        <emptywt unit="LBS"> 49872 </emptywt>
        <location name="CG" unit="IN">
            <x> 477.7 </x>
            <y> 0 </y>
            <z> -31.8 </z>
        </location>
    </mass_balance>

    <ground_reactions>
        <contact type="BOGEY" name="HUMP_LG">
            <location unit="IN">
                <x> 66.4 </x>
                <y> 0 </y>
                <z> -125.6 </z>
            </location>
            <static_friction> 0.8 </static_friction>
            <dynamic_friction> 0.5 </dynamic_friction>
            <rolling_friction> 0.02 </rolling_friction>
            <spring_coeff unit="LBS/FT"> 84000 </spring_coeff>
            <damping_coeff unit="LBS/FT/SEC"> 16800 </damping_coeff>
            <max_steer unit="DEG"> 0.0 </max_steer>
            <brake_group> NOSE </brake_group>
            <retractable>0</retractable>
        </contact>
        <contact type="BOGEY" name="NOSE_LG">
            <location unit="IN">
                <x> 395.4 </x>
                <y> 0 </y>
                <z> -145.6 </z>
            </location>
            <static_friction> 0.8 </static_friction>
            <dynamic_friction> 0.5 </dynamic_friction>
            <rolling_friction> 0.02 </rolling_friction>
            <spring_coeff unit="LBS/FT"> 84000 </spring_coeff>
            <damping_coeff unit="LBS/FT/SEC"> 16800 </damping_coeff>
            <max_steer unit="DEG"> 0.0 </max_steer>
            <brake_group> NOSE </brake_group>
            <retractable>0</retractable>
        </contact>
        <contact type="BOGEY" name="LEFT_MLG">
            <location unit="IN">
                <x> 495.4 </x>
                <y> -228 </y>
                <z> -135.6 </z>
            </location>
            <static_friction> 0.8 </static_friction>
            <dynamic_friction> 0.5 </dynamic_friction>
            <rolling_friction> 0.02 </rolling_friction>
            <spring_coeff unit="LBS/FT"> 84000 </spring_coeff>
            <damping_coeff unit="LBS/FT/SEC"> 16800 </damping_coeff>
            <max_steer unit="DEG"> 0.0 </max_steer>
            <brake_group> LEFT </brake_group>
            <retractable>0</retractable>
        </contact>
        <contact type="BOGEY" name="RIGHT_MLG">
            <location unit="IN">
                <x> 495.4 </x>
                <y> 228 </y>
                <z> -135.6 </z>
            </location>
            <static_friction> 0.8 </static_friction>
            <dynamic_friction> 0.5 </dynamic_friction>
            <rolling_friction> 0.02 </rolling_friction>
            <spring_coeff unit="LBS/FT"> 84000 </spring_coeff>
            <damping_coeff unit="LBS/FT/SEC"> 16800 </damping_coeff>
            <max_steer unit="DEG"> 0.0 </max_steer>
            <brake_group> RIGHT </brake_group>
            <retractable>0</retractable>
        </contact>
        <contact type="BOGEY" name="STEP_MLG">
            <location unit="IN">
                <x> 535.4 </x>
                <y> 0 </y>
                <z> -125.6 </z>
            </location>
            <static_friction> 0.8 </static_friction>
            <dynamic_friction> 0.5 </dynamic_friction>
            <rolling_friction> 0.02 </rolling_friction>
            <spring_coeff unit="LBS/FT"> 84000 </spring_coeff>
            <damping_coeff unit="LBS/FT/SEC"> 16800 </damping_coeff>
            <max_steer unit="DEG"> 0.0 </max_steer>
            <brake_group> TAIL </brake_group>
            <retractable>0</retractable>
        </contact>
        <contact type="BOGEY" name="REAR_MLG">
            <location unit="IN">
                <x> 803.4 </x>
                <y> 0 </y>
                <z> -145.6 </z>
            </location>
            <static_friction> 0.8 </static_friction>
            <dynamic_friction> 0.5 </dynamic_friction>
            <rolling_friction> 0.02 </rolling_friction>
            <spring_coeff unit="LBS/FT"> 84000 </spring_coeff>
            <damping_coeff unit="LBS/FT/SEC"> 16800 </damping_coeff>
            <max_steer unit="DEG"> 0.0 </max_steer>
            <brake_group> TAIL </brake_group>
            <retractable>0</retractable>
        </contact>
    </ground_reactions>
    <propulsion>
        <engine file="WrightGR-2600">
            <location unit="IN">
                <x> 254.4 </x>
                <y> -364.8 </y>
                <z> 40 </z>
            </location>
            <orient unit="DEG">
                <roll> 0.0 </roll>
                <pitch> 0 </pitch>
                <yaw> 0 </yaw>
            </orient>
            <feed>0</feed>
            <feed>4</feed>
            <feed>5</feed>
            <thruster file="HamiltonStd6243A-3">
                <location unit="IN">
                    <x> 254.4 </x>
                    <y> -364.8 </y>
                    <z> 40 </z>
                </location>
                <orient unit="DEG">
                    <roll> 0.0 </roll>
                    <pitch> 0.0 </pitch>
                    <yaw> 0.0 </yaw>
                </orient>
            </thruster>
        </engine>
        <engine file="WrightGR-2600">
            <location unit="IN">
                <x> 254.4 </x>
                <y> -182.4 </y>
                <z> 40 </z>
            </location>
            <orient unit="DEG">
                <roll> 0.0 </roll>
                <pitch> 0 </pitch>
                <yaw> 0 </yaw>
            </orient>
            <feed>1</feed>
            <feed>4</feed>
            <feed>5</feed>
            <thruster file="HamiltonStd6243A-3">
                <location unit="IN">
                    <x> 254.4 </x>
                    <y> -182.4 </y>
                    <z> 40 </z>
                </location>
                <orient unit="DEG">
                    <roll> 0.0 </roll>
                    <pitch> 0.0 </pitch>
                    <yaw> 0.0 </yaw>
                </orient>
            </thruster>
        </engine>
        <engine file="WrightGR-2600">
            <location unit="IN">
                <x> 254.4 </x>
                <y> 182.4 </y>
                <z> 40 </z>
            </location>
            <orient unit="DEG">
                <roll> 0.0 </roll>
                <pitch> 0 </pitch>
                <yaw> 0 </yaw>
            </orient>
            <feed>2</feed>
            <feed>4</feed>
            <feed>6</feed>
            <thruster file="HamiltonStd6243A-3">
                <location unit="IN">
                    <x> 254.4 </x>
                    <y> 182.4 </y>
                    <z> 40 </z>
                </location>
                <orient unit="DEG">
                    <roll> 0.0 </roll>
                    <pitch> 0.0 </pitch>
                    <yaw> 0.0 </yaw>
                </orient>
            </thruster>
        </engine>
        <engine file="WrightGR-2600">
            <location unit="IN">
                <x> 254.4 </x>
                <y> 364.8 </y>
                <z> 40 </z>
            </location>
            <orient unit="DEG">
                <roll> 0.0 </roll>
                <pitch> 0 </pitch>
                <yaw> 0 </yaw>
            </orient>
            <feed>3</feed>
            <feed>4</feed>
            <feed>6</feed>
            <thruster file="HamiltonStd6243A-3">
                <location unit="IN">
                    <x> 254.4 </x>
                    <y> 364.8 </y>
                    <z> 40 </z>
                </location>
                <orient unit="DEG">
                    <roll> 0.0 </roll>
                    <pitch> 0.0 </pitch>
                    <yaw> 0.0 </yaw>
                </orient>
            </thruster>
        </engine>
        <tank type="FUEL">    <!-- Tank number 0 -->
            <location unit="IN">
                <x> 0 </x>
                <y> 0 </y>
                <z> 0 </z>
            </location>
            <capacity unit="LBS"> 3600 </capacity>
            <contents unit="LBS"> 3600 </contents>
        </tank>
        <tank type="FUEL">    <!-- Tank number 1 -->
            <location unit="IN">
                <x> 502 </x>
                <y> -182.4 </y>
                <z> 30 </z>
            </location>
            <capacity unit="LBS"> 3600 </capacity>
            <contents unit="LBS"> 3600 </contents>
        </tank>
        <tank type="FUEL">    <!-- Tank number 2 -->
            <location unit="IN">
                <x> 502 </x>
                <y> 182.4 </y>
                <z> 30 </z>
            </location>
            <capacity unit="LBS"> 3600 </capacity>
            <contents unit="LBS"> 3600 </contents>
        </tank>
        <tank type="FUEL">    <!-- Tank number 3 -->
            <location unit="IN">
                <x> 502 </x>
                <y> 364.8 </y>
                <z> 30 </z>
            </location>
            <capacity unit="LBS"> 3600 </capacity>
            <contents unit="LBS"> 3600 </contents>
        </tank>
        <tank type="FUEL">    <!-- Tank number 4 -->
            <location unit="IN">
                <x> 502 </x>
                <y> 0 </y>
                <z> -40 </z>
            </location>
            <capacity unit="LBS"> 5760 </capacity>
            <contents unit="LBS"> 5760 </contents>
        </tank>
        <tank type="FUEL">    <!-- Tank number 5 -->
            <location unit="IN">
                <x> 502 </x>
                <y> -182.4 </y>
                <z> -40 </z>
            </location>
            <capacity unit="LBS"> 6984 </capacity>
            <contents unit="LBS"> 6984 </contents>
        </tank>
        <tank type="FUEL">    <!-- Tank number 6 -->
            <location unit="IN">
                <x> 502 </x>
                <y> 182.4 </y>
                <z> -40 </z>
            </location>
            <capacity unit="LBS"> 6984 </capacity>
            <contents unit="LBS"> 6984 </contents>
        </tank>
    </propulsion>
    <flight_control name="FCS: Boeing314A">
     <channel name="Pitch">

        <summer name="Pitch Trim Sum">
            <input>fcs/elevator-cmd-norm</input>
            <input>fcs/pitch-trim-cmd-norm</input>
            <clipto>
                <min>-1</min>
                <max>1</max>
            </clipto>
        </summer>

        <aerosurface_scale name="Elevator Control">
            <input>fcs/pitch-trim-sum</input>
            <gain>0.01745</gain>
            <range>
                <min>-25</min>
                <max>25</max>
            </range>
            <output>fcs/elevator-pos-rad</output>
        </aerosurface_scale>
        <aerosurface_scale name="Elevator Position Normalizer">
            <input>fcs/pitch-trim-sum</input>
            <range>
                <min>-1</min>
                <max>1</max>
            </range>
            <output>fcs/elevator-pos-norm</output>
        </aerosurface_scale>

     </channel>
     <channel name="Roll">

        <summer name="Roll Trim Sum">
            <input>fcs/aileron-cmd-norm</input>
            <input>fcs/roll-trim-cmd-norm</input>
            <clipto>
                <min>-1</min>
                <max>1</max>
            </clipto>
        </summer>

        <aerosurface_scale name="Left Aileron Control">
            <input>fcs/roll-trim-sum</input>
            <range>
                <min>-0.35</min>
                <max>0.35</max>
            </range>
            <output>fcs/left-aileron-pos-rad</output>
        </aerosurface_scale>
        <aerosurface_scale name="Left Aileron Position Normalizer">
            <input>fcs/roll-trim-sum</input>
            <range>
                <min>-1</min>
                <max>1</max>
            </range>
            <output>fcs/left-aileron-pos-norm</output>
        </aerosurface_scale>

        <aerosurface_scale name="Right Aileron Control">
            <input>-fcs/roll-trim-sum</input>
            <range>
                <min>-0.35</min>
                <max>0.35</max>
            </range>
            <output>fcs/right-aileron-pos-rad</output>
        </aerosurface_scale>
        <aerosurface_scale name="Right Aileron Position Normalizer">
            <input>fcs/roll-trim-sum</input>
            <range>
                <min>-1</min>
                <max>1</max>
            </range>
            <output>fcs/right-aileron-pos-norm</output>
        </aerosurface_scale>

     </channel>
     <channel name="Yaw">

        <summer name="Rudder Command Sum">
            <input>fcs/rudder-cmd-norm</input>
            <input>fcs/yaw-trim-cmd-norm</input>
            <clipto>
                <min>-1</min>
                <max>1</max>
            </clipto>
        </summer>

        <aerosurface_scale name="Rudder Control">
            <input>fcs/rudder-command-sum</input>
            <range>
                <min>-0.35</min>
                <max>0.35</max>
            </range>
            <output>fcs/rudder-pos-rad</output>
        </aerosurface_scale>
        <aerosurface_scale name="Rudder Position Normalizer">
            <input>fcs/rudder-command-sum</input>
            <range>
                <min>-1</min>
                <max>1</max>
            </range>
            <output>fcs/rudder-pos-norm</output>
        </aerosurface_scale>

     </channel>
     <channel name="Aeromechanical">

        <kinematic name="Flaps Control">
            <input>fcs/flap-cmd-norm</input>
            <traverse>
                <setting>
                    <position>0</position>
                    <time>0</time>
                </setting>
                <setting>
                    <position>20</position>
                    <time>4</time>
                </setting>
                <setting>
                    <position>40</position>
                    <time>3</time>
                </setting>
                <setting>
                    <position>55</position>
                    <time>2</time>
                </setting>
            </traverse>
            <output>fcs/flap-pos-deg</output>
        </kinematic>
        <aerosurface_scale name="Flap Position Normalizer">
          <input>fcs/flap-pos-deg</input>
          <domain>
            <min>0</min>
            <max>55</max>
          </domain>
          <range>
            <min>0</min>
            <max>1</max>
          </range>
          <output>fcs/flap-pos-norm</output>
        </aerosurface_scale>

        <kinematic name="Speedbrake Control">
            <input>fcs/speedbrake-cmd-norm</input>
            <traverse>
                <setting>
                    <position>0</position>
                    <time>0</time>
                </setting>
                <setting>
                    <position>1</position>
                    <time>1</time>
                </setting>
            </traverse>
            <output>fcs/speedbrake-pos-norm</output>
        </kinematic>
     </channel>
    </flight_control>

    <aerodynamics>
        <function name="aero/function/kHDhull">
            <description>Hull_factor</description>
            <product>
                  <table>
                      <independentVar lookup="row">velocities/vc-kts</independentVar>
                      <independentVar lookup="column">aero/h_b-mac-ft</independentVar>
                      <independentVar lookup="table">inertia/weight-lbs</independentVar>
                      <tableData breakPoint="47850">
                            0.0450	0.0550	0.0650
                          0.0000	0.0000	0.0000	0.0000
                          3.7000	0.0678	0.0339	0.0000
                          6.0000	0.1356	0.0678	0.0000
                          8.3000	0.2288	0.1144	0.0000
                          10.6000	0.3559	0.1780	0.0000
                          12.5000	0.4576	0.2288	0.0000
                          14.3000	0.5593	0.2797	0.0000
                          15.9000	0.6186	0.3093	0.0000
                          18.5000	0.7203	0.3602	0.0000
                          21.1000	0.8051	0.4026	0.0000
                          24.5000	0.8983	0.4492	0.0000
                          26.4000	0.9322	0.4661	0.0000
                          28.7000	0.9576	0.4788	0.0000
                          31.3000	0.9915	0.4958	0.0000
                          34.0000	1.0000	0.5000	0.0000
                          36.2000	0.9915	0.4958	0.0000
                          38.9000	0.9961	0.4981	0.0000
                          41.5000	0.9068	0.4534	0.0000
                          44.9000	0.7119	0.3560	0.0000
                          48.7000	0.6186	0.3093	0.0000
                          52.5000	0.4915	0.2458	0.0000
                          57.4000	0.1949	0.0975	0.0000
                      </tableData>
                      <tableData breakPoint="84000.0000">
                            0.0490	0.0590	0.0690
                          0.0000	0.0000	0.0000	0.0000
                          4.7000	0.0678	0.0339	0.0000
                          7.5000	0.1356	0.0678	0.0000
                          10.4000	0.2288	0.1144	0.0000
                          13.2000	0.3559	0.1780	0.0000
                          15.6000	0.4576	0.2288	0.0000
                          17.9000	0.5593	0.2797	0.0000
                          19.8000	0.6186	0.3093	0.0000
                          23.1000	0.7203	0.3602	0.0000
                          26.4000	0.8051	0.4026	0.0000
                          30.7000	0.8983	0.4492	0.0000
                          33.0000	0.9322	0.4661	0.0000
                          35.8000	0.9576	0.4788	0.0000
                          39.1000	0.9915	0.4958	0.0000
                          42.0000	1.0000	0.5000	0.0000
                          45.3000	0.9915	0.4958	0.0000
                          48.6000	0.9961	0.4981	0.0000
                          51.9000	0.9068	0.4534	0.0000
                          56.1000	0.7119	0.3560	0.0000
                          60.9000	0.6186	0.3093	0.0000
                          65.6000	0.4915	0.2458	0.0000
                          71.7000	0.1949	0.0975	0.0000
                      </tableData>
                  </table>
            </product>
        </function>

        <function name="aero/function/kCLge">
            <description>Change_in_lift_due_to_ground_effect</description>
            <product>
                  <table>
                      <independentVar>aero/h_b-mac-ft</independentVar>
                      <tableData>
                          0.0000	1.2000
                          0.1000	1.1500
                          0.1500	1.0900
                          0.2000	1.0200
                          1.1000	1.0000
                      </tableData>
                  </table>
            </product>
        </function>

        <function name="aero/function/kHLstep">
            <description>Step_factor</description>
            <product>
                  <table>
                      <independentVar lookup="row">aero/h_b-mac-ft</independentVar>
                      <independentVar lookup="column">velocities/vc-kts</independentVar>
                      <independentVar lookup="table">inertia/weight-lbs</independentVar>
                      <tableData breakPoint="47850.0000">
                            0.0000	17.0000	34.0000
                          0.0450	0.0000	0.0000	1.0000
                          0.0550	0.0000	0.0000	0.8000
                          0.0650	0.0000	0.0000	0.0000
                      </tableData>
                      <tableData breakPoint="84000.0000">
                            0.0000	21.0000	42.0000
                          0.0490	0.0000	0.0000	1.0000
                          0.0590	0.0000	0.0000	0.8000
                          0.0690	0.0000	0.0000	0.0000
                      </tableData>
                  </table>
            </product>
        </function>

        <function name="aero/function/kHmstep">
            <description>Step_factor</description>
            <product>
                  <table>
                      <independentVar lookup="row">velocities/vc-kts</independentVar>
                      <independentVar lookup="column">aero/h_b-mac-ft</independentVar>
                      <independentVar lookup="table">inertia/weight-lbs</independentVar>
                      <tableData breakPoint="47850.0000">
                            0.0450	0.0550	0.0650
                          0.0000	0.0000	0.0000	0.0000
                          17.0000	-1.6000	-1.2800	0.0000
                          34.0000	0.8000	0.6400	0.0000
                          51.0000	0.0000	0.0000	0.0000
                          57.0000	-0.1000	-0.0800	0.0000
                      </tableData>
                      <tableData breakPoint="84000.0000">
                            0.0490	0.0590	0.0690
                          0.0000	0.0000	0.0000	0.0000
                          21.0000	-1.6000	-1.2800	0.0000
                          42.0000	0.8000	0.6400	0.0000
                          63.0000	0.0000	0.0000	0.0000
                          72.0000	-0.1000	-0.0800	0.0000
                      </tableData>
                  </table>
            </product>
        </function>

        <function name="aero/function/kAmgear">
            <description>Compression_factor</description>
            <product>
                  <table>
                      <independentVar lookup="row">velocities/vc-kts</independentVar>
                      <independentVar lookup="column">aero/h_b-mac-ft</independentVar>
                      <independentVar lookup="table">inertia/weight-lbs</independentVar>
                      <tableData breakPoint="47850.0000">
                            0.0450	0.0550	0.0650
                          0.0000	0.0000	0.0000	0.0000
                          17.0000	2.0000	1.6000	0.0000
                          34.0000	1.0000	0.8000	0.0000
                          51.0000	0.7000	0.5600	0.0000
                          57.0000	0.7000	0.5600	0.0000
                      </tableData>
                      <tableData breakPoint="84000.0000">
                            0.0490	0.0590	0.0690
                          0.0000	0.0000	0.0000	0.0000
                          21.0000	2.0000	1.6000	0.0000
                          42.0000	3.0000	2.4000	0.0000
                          63.0000	0.7000	0.5600	0.0000
                          72.0000	0.7000	0.5600	0.0000
                      </tableData>
                  </table>
            </product>
        </function>

        <function name="aero/function/kHmkhi">
            <description>Rebound_due_to_khi</description>
            <product>
                  <table>
                      <independentVar lookup="row">flight-path/gamma-rad</independentVar>
                      <independentVar lookup="column">attitude/pitch-rad</independentVar>
                      <independentVar lookup="table">velocities/vc-kts</independentVar>
                      <tableData breakPoint="42.0000">
                            0.0500	0.2600
                          0.0000	0.0000	0.0000
                          0.3500	0.0000	0.0000
                          0.7000	0.0000	0.0000
                          1.0500	0.0000	0.0000
                          1.4000	0.0000	0.0000
                      </tableData>
                      <tableData breakPoint="52.0000">
                            0.0500	0.2600
                          0.0000	15.0000	13.0000
                          0.3500	0.3500	1.1000
                          0.7000	0.2500	0.6000
                          1.0500	0.1500	0.5000
                          1.4000	0.0500	0.4000
                      </tableData>
                  </table>
            </product>
        </function>

        <axis name="DRAG">
            <function name="aero/coefficient/HDhull0">
                <description>Drag_at_hump</description>
                <product>
                    <property>aero/qbar-psf</property>
                    <property>metrics/Sw-sqft</property>
                    <property>aero/function/kHDhull</property>
                    <value>0.1200</value>
                </product>
            </function>
            <function name="aero/coefficient/CDo">
                <description>Drag_at_zero_lift</description>
                <product>
                    <property>aero/qbar-psf</property>
                    <property>metrics/Sw-sqft</property>
                    <value>0.0274</value>
                </product>
            </function>
            <function name="aero/coefficient/CDalpha">
                <description>Drag_due_to_alpha</description>
                <product>
                    <property>aero/qbar-psf</property>
                    <property>metrics/Sw-sqft</property>
                      <table>
                          <independentVar>aero/alpha-rad</independentVar>
                          <tableData>
                              -1.5700	1.4726
                              -0.2600	0.0286
                              0.0000	0.0006
                              0.2600	0.0286
                              1.5700	1.4726
                          </tableData>
                      </table>
                </product>
            </function>
            <function name="aero/coefficient/CDi">
                <description>Induced_drag</description>
                <product>
                    <property>aero/qbar-psf</property>
                    <property>metrics/Sw-sqft</property>
                    <property>aero/cl-squared</property>
                    <value>0.0390</value>
                </product>
            </function>
            <function name="aero/coefficient/CDmach">
                <description>Drag_due_to_mach</description>
                <product>
                    <property>aero/qbar-psf</property>
                    <property>metrics/Sw-sqft</property>
                      <table>
                          <independentVar>velocities/mach</independentVar>
                          <tableData>
                              0.0000	0.0000
                              0.7000	0.0000
                              1.1000	0.0230
                              1.8000	0.0150
                          </tableData>
                      </table>
                </product>
            </function>
            <function name="aero/coefficient/CDflap">
                <description>Drag_due_to_flaps</description>
                <product>
                    <property>aero/qbar-psf</property>
                    <property>metrics/Sw-sqft</property>
                    <property>fcs/flap-cmd-norm</property>
                    <value>0.0350</value>
                </product>
            </function>
            <function name="aero/coefficient/CDsb">
                <description>Drag_due_to_speedbrakes</description>
                <product>
                    <property>aero/qbar-psf</property>
                    <property>metrics/Sw-sqft</property>
                    <property>fcs/speedbrake-pos-norm</property>
                    <value>0.0280</value>
                </product>
            </function>
            <function name="aero/coefficient/CDbeta">
                <description>Drag_due_to_sideslip</description>
                <product>
                    <property>aero/qbar-psf</property>
                    <property>metrics/Sw-sqft</property>
                      <table>
                          <independentVar>aero/beta-rad</independentVar>
                          <tableData>
                              -1.5700	1.2300
                              -0.2600	0.0500
                              0.0000	0.0000
                              0.2600	0.0500
                              1.5700	1.2300
                          </tableData>
                      </table>
                </product>
            </function>
            <function name="aero/coefficient/CDde">
                <description>Drag_due_to_Elevator_Deflection</description>
                <product>
                    <property>aero/qbar-psf</property>
                    <property>metrics/Sw-sqft</property>
                    <property>fcs/elevator-pos-norm</property>
                    <value>0.0350</value>
                </product>
            </function>
        </axis>

        <axis name="SIDE">
            <function name="aero/coefficient/CYb">
                <description>Side_force_due_to_beta</description>
                <product>
                    <property>aero/qbar-psf</property>
                    <property>metrics/Sw-sqft</property>
                    <property>aero/beta-rad</property>
                    <value>-1.0000</value>
                </product>
            </function>
        </axis>

        <axis name="LIFT">
            <function name="aero/coefficient/HLstep0">
                <description>Lift_at_step</description>
                <product>
                    <property>aero/qbar-psf</property>
                    <property>metrics/Sw-sqft</property>
                    <property>aero/function/kHLstep</property>
                      <table>
                          <independentVar lookup="row">attitude/roll-rad</independentVar>
                          <independentVar lookup="column">velocities/vc-kts</independentVar>
                          <independentVar lookup="table">inertia/weight-lbs</independentVar>
                          <tableData breakPoint="47850.0000">
                              	34.0000	44.0000
                              -0.0690	0.0000	0.0000
                              -0.0590	0.0000	0.5000
                              -0.0490	0.5000	1.0000
                              -0.0290	1.0000	1.0000
                              0.0290	1.0000	1.0000
                              0.0490	0.5000	1.0000
                              0.0590	0.0000	0.5000
                              0.0690	0.0000	0.0000
                          </tableData>
                          <tableData breakPoint="84000.0000">
                              	42.0000	52.0000
                              -0.0600	0.0000	0.0000
                              -0.0500	0.0000	0.5000
                              -0.0400	0.5000	1.0000
                              -0.0200	1.0000	1.0000
                              0.0200	1.0000	1.0000
                              0.0400	0.5000	1.0000
                              0.0500	0.0000	0.5000
                              0.0600	0.0000	0.0000
                          </tableData>
                      </table>
                </product>
            </function>
            <function name="aero/coefficient/CLo">
                <description>Lift_at_zero_alpha</description>
                <product>
                    <property>aero/qbar-psf</property>
                    <property>metrics/Sw-sqft</property>
                    <property>aero/function/kCLge</property>
                    <value>0.2400</value>
                </product>
            </function>
            <function name="aero/coefficient/CLalpha">
                <description>Lift_due_to_alpha</description>
                <product>
                    <property>aero/qbar-psf</property>
                    <property>metrics/Sw-sqft</property>
                    <property>aero/function/kCLge</property>
                      <table>
                          <independentVar>aero/alpha-rad</independentVar>
                          <tableData>
                              -0.2000	-0.9800
                              0.0000	0.0000
                              0.2400	1.1600
                              0.6000	0.4640
                          </tableData>
                      </table>
                </product>
            </function>
            <function name="aero/coefficient/dCLflap">
                <description>Delta_Lift_due_to_flaps</description>
                <product>
                    <property>aero/qbar-psf</property>
                    <property>metrics/Sw-sqft</property>
                    <property>fcs/flap-cmd-norm</property>
                    <property>aero/function/kCLge</property>
                    <value>0.6000</value>
                </product>
            </function>
            <function name="aero/coefficient/dCLsb">
                <description>Delta_Lift_due_to_speedbrake</description>
                <product>
                    <property>aero/qbar-psf</property>
                    <property>metrics/Sw-sqft</property>
                    <property>fcs/speedbrake-pos-norm</property>
                    <value>0.0000</value>
                </product>
            </function>
            <function name="aero/coefficient/CLde">
                <description>Lift_due_to_Elevator_Deflection</description>
                <product>
                    <property>aero/qbar-psf</property>
                    <property>metrics/Sw-sqft</property>
                    <property>fcs/elevator-pos-rad</property>
                    <value>0.2000</value>
                </product>
            </function>
        </axis>

        <axis name="ROLL">
            <function name="aero/coefficient/Clb">
                <description>Roll_moment_due_to_beta</description>
                <product>
                    <property>aero/qbar-psf</property>
                    <property>metrics/Sw-sqft</property>
                    <property>metrics/bw-ft</property>
                    <property>aero/beta-rad</property>
                    <value>-0.1000</value>
                </product>
            </function>
            <function name="aero/coefficient/Clp">
                <description>Roll_moment_due_to_roll_rate</description>
                <product>
                    <property>aero/qbar-psf</property>
                    <property>metrics/Sw-sqft</property>
                    <property>metrics/bw-ft</property>
                    <property>aero/bi2vel</property>
                    <property>velocities/p-aero-rad_sec</property>
                    <value>-0.4000</value>
                </product>
            </function>
            <function name="aero/coefficient/Clr">
                <description>Roll_moment_due_to_yaw_rate</description>
                <product>
                    <property>aero/qbar-psf</property>
                    <property>metrics/Sw-sqft</property>
                    <property>metrics/bw-ft</property>
                    <property>aero/bi2vel</property>
                    <property>velocities/r-aero-rad_sec</property>
                    <value>0.1500</value>
                </product>
            </function>
            <function name="aero/coefficient/Clda">
                <description>Roll_moment_due_to_aileron</description>
                <product>
                    <property>aero/qbar-psf</property>
                    <property>metrics/Sw-sqft</property>
                    <property>metrics/bw-ft</property>
                    <property>fcs/left-aileron-pos-rad</property>
                      <table>
                          <independentVar>velocities/mach</independentVar>
                          <tableData>
                              0.0000	0.1500
                              2.0000	0.0500
                          </tableData>
                      </table>
                </product>
            </function>
            <function name="aero/coefficient/Cldr">
                <description>Roll_moment_due_to_rudder</description>
                <product>
                    <property>aero/qbar-psf</property>
                    <property>metrics/Sw-sqft</property>
                    <property>metrics/bw-ft</property>
                    <property>fcs/rudder-pos-rad</property>
                    <value>0.0100</value>
                </product>
            </function>
        </axis>

        <axis name="PITCH">
            <function name="aero/coefficient/Hmstep0">
                <description>Trim_moment_at_step</description>
                <product>
                    <property>aero/qbar-psf</property>
                    <property>metrics/Sw-sqft</property>
                    <property>metrics/cbarw-ft</property>
                    <property>aero/function/kHmstep</property>
                    <value>1.0000</value>
                </product>
            </function>
            <function name="aero/coefficient/Amgear0">
                <description>Compression</description>
                <product>
                    <property>aero/qbar-psf</property>
                    <property>metrics/Sw-sqft</property>
                    <property>metrics/cbarw-ft</property>
                    <property>aero/function/kAmgear</property>
                    <value>0.5000</value>
                </product>
            </function>
            <function name="aero/coefficient/Hmrebound0">
                <description>Rebound_due_to_vertical_speed</description>
                <product>
                    <property>aero/qbar-psf</property>
                    <property>metrics/Sw-sqft</property>
                    <property>metrics/cbarw-ft</property>
                    <property>aero/function/kHmkhi</property>
                      <table>
                          <independentVar lookup="row">velocities/v-down-fps</independentVar>
                          <independentVar lookup="column">aero/h_b-mac-ft</independentVar>
                          <independentVar lookup="table">inertia/weight-lbs</independentVar>
                          <tableData breakPoint="47850.0000">
                              	0.0650	0.0700	0.0750
                              0.0000	0.0000	0.0000	0.0000
                              11.6700	0.0000	0.3000	0.0000
                          </tableData>
                          <tableData breakPoint="84000.0000">
                              	0.0690	0.0740	0.0790
                              0.0000	0.0000	0.0000	0.0000
                              11.6700	0.0000	0.3000	0.0000
                          </tableData>
                      </table>
                </product>
            </function>
            <function name="aero/coefficient/Cmalpha">
                <description>Pitch_moment_due_to_alpha</description>
                <product>
                    <property>aero/qbar-psf</property>
                    <property>metrics/Sw-sqft</property>
                    <property>metrics/cbarw-ft</property>
                    <property>aero/alpha-rad</property>
                    <value>-0.4000</value>
                </product>
            </function>
            <function name="aero/coefficient/Cmde">
                <description>Pitch_moment_due_to_elevator</description>
                <product>
                    <property>aero/qbar-psf</property>
                    <property>metrics/Sw-sqft</property>
                    <property>metrics/cbarw-ft</property>
                    <property>fcs/elevator-pos-rad</property>
                      <table>
                          <independentVar>velocities/mach</independentVar>
                          <tableData>
                              0.0000	-1.0000
                              2.0000	-0.2500
                          </tableData>
                      </table>
                </product>
            </function>
            <function name="aero/coefficient/Cmq">
                <description>Pitch_moment_due_to_pitch_rate</description>
                <product>
                    <property>aero/qbar-psf</property>
                    <property>metrics/Sw-sqft</property>
                    <property>metrics/cbarw-ft</property>
                    <property>aero/ci2vel</property>
                    <property>velocities/q-aero-rad_sec</property>
                    <value>-22.0000</value>
                </product>
            </function>
            <function name="aero/coefficient/Cmadot">
                <description>Pitch_moment_due_to_alpha_rate</description>
                <product>
                    <property>aero/qbar-psf</property>
                    <property>metrics/Sw-sqft</property>
                    <property>metrics/cbarw-ft</property>
                    <property>aero/ci2vel</property>
                    <property>aero/alphadot-rad_sec</property>
                    <value>-8.0000</value>
                </product>
            </function>
        </axis>

        <axis name="YAW">
            <function name="aero/coefficient/Cnb">
                <description>Yaw_moment_due_to_beta</description>
                <product>
                    <property>aero/qbar-psf</property>
                    <property>metrics/Sw-sqft</property>
                    <property>metrics/bw-ft</property>
                    <property>aero/beta-rad</property>
                    <value>0.1200</value>
                </product>
            </function>
            <function name="aero/coefficient/Cnr">
                <description>Yaw_moment_due_to_yaw_rate</description>
                <product>
                    <property>aero/qbar-psf</property>
                    <property>metrics/Sw-sqft</property>
                    <property>metrics/bw-ft</property>
                    <property>aero/bi2vel</property>
                    <property>velocities/r-aero-rad_sec</property>
                    <value>-0.1500</value>
                </product>
            </function>
            <function name="aero/coefficient/Cndr">
                <description>Yaw_moment_due_to_rudder</description>
                <product>
                    <property>aero/qbar-psf</property>
                    <property>metrics/Sw-sqft</property>
                    <property>metrics/bw-ft</property>
                    <property>fcs/rudder-pos-rad</property>
                    <value>-0.1000</value>
                </product>
            </function>
            <function name="aero/coefficient/Cnda">
                <description>Adverse_yaw</description>
                <product>
                    <property>aero/qbar-psf</property>
                    <property>metrics/Sw-sqft</property>
                    <property>metrics/bw-ft</property>
                    <property>fcs/left-aileron-pos-rad</property>
                    <value>-0.0080</value>
                </product>
            </function>
        </axis>
    </aerodynamics>
</fdm_config>
