<FDM_CONFIG NAME="T37" VERSION="1.61" RELEASE="ALPHA">
<!--
  File:     T37.xml
  Author:   Aero-Matic v 0.7

  Inputs:
    name:          T37
    type:          two-engine transonic/supersonic fighter
    max weight:    6580 lb
    wing span:     33.833 ft
    length:        29.333 ft
    wing area:     158.86 sq-ft
    gear type:     tricycle
    retractable?:  yes
    # engines:     2
    engine type:   turbine
    engine layout: aft fuselage
    yaw damper?    no
  Outputs:
    wing loading:  41.42 lb/sq-ft
    CL-alpha:      3.6 per radian
    CL-0:          0.08
    CL-max:        1
    CD-0:          0.024
    K:             0.09

    Sources:

      * http://www.wpafb.af.mil/museum/newold/t37.htm
      SPECIFICATIONS
        Span:   10.32 meters (33 ft. 10 in.)
        Length:  8.92 meters (29 ft.  4 in.)
        Height:  2.79 meters ( 9 ft.  5 in.)
        Weight: 4,056 lbs. empty
                6,580 lbs. max.
        Armament: None
        Engines: Two Continental J69-T-25s of 1,025 lbs. thrust ea.
        Crew: Two

      PERFORMANCE
        Maximum speed:   425 mph (370 Kt)
        Cruising speed:  350 mph.
        Range:           650 miles
        Service Ceiling: 35,000 ft.

    * Jeff Scott
      Cessna A-37/T-37, cruise configuration
      small twin jet engine military trainer, data from:
        Roskam, Jan. Airplane Flight Dynamics and Automatic Flight
        Controls, Part I. Lawrence KS: DARcorporation, 1995,
        pg 501-503

    * H-886: A flight test investigation of the rolling moments induced
             on a T-37B airplane in the wake of a B-747 airplane.
    * H-912: Stability and control derivatives of the T-37 airplane.

-->

 <METRICS>
   AC_WINGAREA  182.0		<!-- Roskam -->
   AC_WINGSPAN  33.83		<!-- Roskam -->
   AC_CHORD      5.47		<!-- Roskam -->
   AC_HTAILAREA 31.77
   AC_HTAILARM  11.73
   AC_VTAILAREA 28.59
   AC_LV        11.73
   AC_IXX       3010		<!-- Roskam defines 7985 -->
   AC_IYY       3847		<!-- Culp defined 6000, Roskam defines 3326 -->
   AC_IZZ       6392		<!-- Roskam defines 11183 -->
   AC_IXZ       0		<!-- Roskam -->
   AC_EMPTYWT   4337		<!-- Roskam defines 6360 -->
   AC_CGLOC     211.2  0.0 -8.8
   AC_AERORP    211.2  0.0  0.0
   AC_EYEPTLOC  70.4  0.0 38.0
   AC_VRP       211.2  0.0 -8.8
 </METRICS>
 <UNDERCARRIAGE>
  AC_GEAR NOSE_LG   45.8  0.0 -42.2 1974.0 658.0  0.5  0.8  0.02 STEERABLE NONE  5.0 RETRACT
  AC_GEAR LEFT_MLG  221.8 -36.5 -42.2 6580.0 1316.0  0.5  0.8  0.02 FIXED LEFT  0 RETRACT
  AC_GEAR RIGHT_MLG 221.8 36.5 -42.2 6580.0 1316.0  0.5  0.8  0.02 FIXED RIGHT 0 RETRACT
 </UNDERCARRIAGE>
 <PROPULSION>
  <AC_ENGINE FILE="J69-T25_sim">
    XLOC 291.996
    YLOC -20
    ZLOC 0
    PITCH 0
    YAW 0
    FEED 0
  </AC_ENGINE>
  <AC_THRUSTER FILE="direct">
    XLOC 291.996
    YLOC -20
    ZLOC 0
    PITCH 0
    YAW 0
  </AC_THRUSTER>
  <AC_ENGINE FILE="J69-T25_sim">
    XLOC 291.996
    YLOC 20
    ZLOC 0
    PITCH 0
    YAW 0
    FEED 1
  </AC_ENGINE>
  <AC_THRUSTER FILE="direct">
    XLOC 291.996
    YLOC 20
    ZLOC 0
    PITCH 0
    YAW 0
  </AC_THRUSTER>
  <AC_TANK TYPE="FUEL" NUMBER="0">
    XLOC 211.1976
    YLOC 0
    ZLOC -8.7999
    RADIUS 1
    CAPACITY   700.0
    CONTENTS   350.0
  </AC_TANK>
  <AC_TANK TYPE="FUEL" NUMBER="1">
    XLOC 211.1976
    YLOC 0
    ZLOC -8.7999
    RADIUS 1
    CAPACITY   700.0
    CONTENTS   350.0
  </AC_TANK>
 </PROPULSION>
 <FLIGHT_CONTROL NAME="T37">
   <COMPONENT NAME="Pitch Trim Sum" TYPE="SUMMER">
      INPUT   fcs/elevator-cmd-norm
      INPUT   fcs/pitch-trim-cmd-norm
      CLIPTO  -1 1
   </COMPONENT>
   <COMPONENT NAME="Elevator Control" TYPE="AEROSURFACE_SCALE">
      INPUT   fcs/pitch-trim-sum
      MIN     -0.454
      MAX      0.262
      OUTPUT  fcs/elevator-pos-rad
   </COMPONENT>
   <COMPONENT NAME="Roll Trim Sum" TYPE="SUMMER">
      INPUT   fcs/aileron-cmd-norm
      INPUT   fcs/roll-trim-cmd-norm
      CLIPTO  -1 1
   </COMPONENT>
   <COMPONENT NAME="Left Aileron Control" TYPE="AEROSURFACE_SCALE">
      INPUT   fcs/roll-trim-sum
      MIN    -0.262
      MAX     0.262
      OUTPUT  fcs/left-aileron-pos-rad
   </COMPONENT>
   <COMPONENT NAME="Right Aileron Control" TYPE="AEROSURFACE_SCALE">
      INPUT  -fcs/roll-trim-sum
      MIN    -0.262
      MAX     0.262
      OUTPUT  fcs/right-aileron-pos-rad
   </COMPONENT>
   <COMPONENT NAME="Yaw Trim Sum" TYPE="SUMMER">
      INPUT   fcs/rudder-cmd-norm
      INPUT   fcs/yaw-trim-cmd-norm
      CLIPTO  -1 1
   </COMPONENT>
   <COMPONENT NAME="Rudder Control" TYPE="AEROSURFACE_SCALE">
      INPUT   fcs/yaw-trim-sum
      MIN     -0.436
      MAX      0.436
      OUTPUT  fcs/rudder-pos-rad
   </COMPONENT>
   <COMPONENT NAME="Flaps Control" TYPE="KINEMAT">
     INPUT   fcs/flap-cmd-norm
     DETENTS 3
             0   0
             20  4
             40  3
     OUTPUT  fcs/flap-pos-deg
   </COMPONENT>
   <COMPONENT NAME="Gear Control" TYPE="KINEMAT">
     INPUT   gear/gear-cmd-norm
     DETENTS 2
             0   0
             1   5
     OUTPUT  gear/gear-pos-norm
   </COMPONENT>
   <COMPONENT NAME="Speedbrake Control" TYPE="KINEMAT">
     INPUT   fcs/speedbrake-cmd-norm
     DETENTS 2
             0     0
             1.153 1
     OUTPUT  fcs/speedbrake-pos-rad
   </COMPONENT>
 </FLIGHT_CONTROL>
 <AERODYNAMICS>
  <AXIS NAME="LIFT">
    <GROUP NAME="CLb">
      Basic_lift
      <FACTOR NAME="kCLge" TYPE="VECTOR">
         Change_in_lift_due_to_ground_effect
         13
         aero/h_b-mac-ft
         none
         0.0   1.061
         0.1   1.033
         0.15  1.031
         0.2   1.033
         0.3   1.028
         0.4   1.011
         0.5   1.009
         0.6   1.005
         0.7   1.002
         0.8   1.000
         0.9   1.000
         1.0   1.000
         1.1   1.000
      </FACTOR>
      <COEFFICIENT NAME="CLalpha" TYPE="VECTOR">
        Lift_due_to_alpha
        4
        aero/alpha-rad
        aero/qbar-psf|metrics/Sw-sqft
        -0.20   -0.640
         0.00    0.080
         0.26    1.339
         0.60    0.448
      </COEFFICIENT>
      <COEFFICIENT NAME="dCLflap" TYPE="VALUE">
         Delta_Lift_due_to_flaps
         aero/qbar-psf|metrics/Sw-sqft|fcs/components/flaps-control/output-norm
         0.35
      </COEFFICIENT>
    </GROUP>
    <!-- Roskam -->
    <COEFFICIENT NAME="CLadot" TYPE="VALUE">
       Delta_Lift_due_to_alpha_rate
       aero/qbar-psf|metrics/Sw-sqft|aero/alphadot-rad_sec|aero/ci2vel
       2.0
    </COEFFICIENT>
    <!-- Roskam -->
    <COEFFICIENT NAME="CLq" TYPE="VALUE">
        Lift_due_to_pitch_rate
        aero/qbar-psf|metrics/Sw-sqft|velocities/q-aero-rad_sec|aero/ci2vel
        4.1
    </COEFFICIENT>
    <COEFFICIENT NAME="dCLsb" TYPE="VALUE">
       Delta_Lift_due_to_speedbrake
       aero/qbar-psf|metrics/Sw-sqft|fcs/speedbrake-pos-rad
       0
    </COEFFICIENT>
    <!-- Roskam -->
    <COEFFICIENT NAME="CLde" TYPE="VALUE">
       Lift_due_to_Elevator_Deflection
       aero/qbar-psf|metrics/Sw-sqft|fcs/elevator-pos-rad
       0.5
    </COEFFICIENT>
  </AXIS>
  <AXIS NAME="DRAG">
    <GROUP NAME="CDb">
      Basic_drag
      <FACTOR NAME="kCDge" TYPE="VECTOR">
         Change_in_drag_due_to_ground_effect
         13
         aero/h_b-mac-ft
         none
         0.0   0.81
         0.1   0.99
         0.15  0.95
         0.2   0.98
         0.3   0.99
         0.4   1.00
         0.5   1.04
         0.6   1.01
         0.7   0.99
         0.8   1.01
         0.9   1.00
         1.0   1.00
         1.1   1.00
      </FACTOR>
      <COEFFICIENT NAME="CD0" TYPE="VECTOR">
         Drag_at_zero_lift
         5
         aero/alpha-rad
         aero/qbar-psf|metrics/Sw-sqft
         -1.57       1.500
         -0.26       0.048
          0.00       0.024
          0.26       0.048
          1.57       1.500
      </COEFFICIENT>
      <!-- Roskam -->
      <COEFFICIENT NAME="CDalpha" TYPE="VALUE">
         Drag_due_to_alpha
         aero/qbar-psf|metrics/Sw-sqft|aero/alpha-rad
         0.384
      </COEFFICIENT>
      <COEFFICIENT NAME="CDmach" TYPE="VECTOR">
         Drag_due_to_mach
         4
         velocities/mach-norm
         aero/qbar-psf|metrics/Sw-sqft
         0.0       0.000
         0.81      0.000
         1.1       0.023
         1.8       0.015
      </COEFFICIENT>
      <COEFFICIENT NAME="CDflap" TYPE="VALUE">
         Drag_due_to_flaps
         aero/qbar-psf|metrics/Sw-sqft|fcs/components/flaps-control/output-norm
         0.075
      </COEFFICIENT>
    </GROUP>
    <COEFFICIENT NAME="CDgear" TYPE="VALUE">
       Drag_due_to_gear
       aero/qbar-psf|metrics/Sw-sqft|gear/gear-pos-norm
       0.02
    </COEFFICIENT>
    <COEFFICIENT NAME="CDsb" TYPE="VALUE">
       Drag_due_to_speedbrakes
       aero/qbar-psf|metrics/Sw-sqft|fcs/speedbrake-pos-rad
       0.024
    </COEFFICIENT>
    <COEFFICIENT NAME="CDbeta" TYPE="VECTOR">
       Drag_due_to_sideslip
       5
       aero/beta-rad
       aero/qbar-psf|metrics/Sw-sqft
       -1.57       1.230
       -0.26       0.050
        0.00       0.00
        0.26       0.050
        1.57       1.230
    </COEFFICIENT>
    <COEFFICIENT NAME="CDde" TYPE="VALUE">
       Drag_due_to_Elevator_Deflection
       aero/qbar-psf|metrics/Sw-sqft|fcs/elevator-pos-norm
       0.075
    </COEFFICIENT>
  </AXIS>
  <AXIS NAME="SIDE">
    <!-- H-912 -->
    <COEFFICIENT NAME="CYb" TYPE="VECTOR">
       Side_force_due_to_beta
       8
       aero/alpha-rad
       aero/qbar-psf|metrics/Sw-sqft|aero/beta-rad
       -0.0349  -0.32
        0       -0.28
        0.0349  -0.26
        0.0698  -0.25
        0.1047  -0.25
        0.1396  -0.26
        0.1745  -0.27
        0.2094  -0.28
    </COEFFICIENT>
    <!-- H-912 -->
    <COEFFICIENT NAME="DCYbdf" TYPE="VALUE">
       Delta_Side_force_due_to_beta_due_to_gear
       aero/qbar-psf|metrics/Sw-sqft|aero/beta-rad|gear/gear-pos-norm
       -0.2478
    </COEFFICIENT>
    <!-- Roskam -->
<!--
    <COEFFICIENT NAME="CYp" TYPE="VALUE">
       Side_force_due_to_roll_rate
       aero/qbar-psf|metrics/Sw-sqft|aero/bi2vel|velocities/p-aero-rad_sec
       -0.0827
    </COEFFICIENT>
-->
    <!-- Roskam -->
<!--
    <COEFFICIENT NAME="CYr" TYPE="VALUE">
       Side_force_due_to_yaw_rate
       aero/qbar-psf|metrics/Sw-sqft|aero/bi2vel|velocities/r-aero-rad_sec
       0.3
    </COEFFICIENT>
-->
    <!-- H-912 -->
    <COEFFICIENT NAME="CYdr" TYPE="TABLE">
       Side_force_due_to_rudder
       8 2
       aero/alpha-rad
       fcs/components/flaps-control/output-norm
       aero/qbar-psf|metrics/Sw-sqft|fcs/rudder-pos-rad
                0      1
       -0.0349  0.052  0.057
        0       0.052  0.092
        0.0349  0.097  0.109
        0.0698  0.115  0.103
        0.1047  0.103  0.092
        0.1396  0.103  0.092
        0.1745  0.103  0.103
        0.2094  0.103  0.109
    </COEFFICIENT>
    <!-- H-912 -->
    <COEFFICIENT NAME="CYda" TYPE="TABLE">
       Side_force_due_to_aileron
       7 2
       aero/alpha-rad
       fcs/components/flaps-control/output-norm
       aero/qbar-psf|metrics/Sw-sqft|fcs/left-aileron-pos-rad
                 0        1
       -0.0349   0       -0.046
        0       -0.0458  -0.046
        0.0349  -0.0544  -0.046
        0.0698  -0.0573  -0.046
        0.1047  -0.0573  -0.046
        0.1396  -0.0573  -0.046
        0.1745  -0.0517  -0.046
    </COEFFICIENT>
  </AXIS>
  <AXIS NAME="ROLL">
    <!-- H-912 -->
    <COEFFICIENT NAME="Clb" TYPE="TABLE">
       Roll_moment_due_to_beta
       8 2
       aero/alpha-rad
       fcs/components/flaps-control/output-norm
       aero/qbar-psf|metrics/Sw-sqft|metrics/bw-ft|aero/mag-beta-rad
                 0       1
       -0.0349  -0.03   -0.02
        0       -0.05   -0.04
        0.0349  -0.07   -0.04
        0.0698  -0.06   -0.05
        0.1047  -0.06   -0.05
        0.1396  -0.07   -0.056
        0.1745  -0.08   -0.06
        0.2094  -0.08   -0.07
    </COEFFICIENT>
    <!-- H-912 -->
    <COEFFICIENT NAME="Clp" TYPE="TABLE">
       Roll_moment_due_to_roll_rate
       8 2
       aero/alpha-rad
       fcs/components/flaps-control/output-norm
       aero/qbar-psf|metrics/Sw-sqft|metrics/bw-ft|aero/bi2vel|velocities/p-aero-rad_sec
                 0       1
       -0.0349  -0.74   -0.55
        0       -0.59   -0.49
        0.0349  -0.60   -0.48
        0.0698  -0.53   -0.51
        0.1047  -0.50   -0.51
        0.1396  -0.45   -0.51
        0.1745  -0.44   -0.50
        0.2094  -0.42   -0.49
    </COEFFICIENT>
    <!-- H-912 -->
    <COEFFICIENT NAME="Clr" TYPE="VECTOR">
       Roll_moment_due_to_yaw_rate
       7
       aero/alpha-rad
       aero/qbar-psf|metrics/Sw-sqft|metrics/bw-ft|aero/bi2vel|velocities/r-aero-rad_sec
        0        0.2
        0.0349   0.0
        0.0698   0.4
        0.1047   0.6
        0.1396   0.8
        0.1745   0.8
        0.2094   0.8
    </COEFFICIENT>
    <!-- H-912 -->
    <COEFFICIENT NAME="DClrDg" TYPE="VALUE">
       Roll_moment_due_to_yaw_rate_due_to_gear
       aero/qbar-psf|metrics/Sw-sqft|metrics/bw-ft|aero/bi2vel|velocities/r-aero-rad_sec|gear/gear-pos-norm
       0.1
    </COEFFICIENT>
    <!-- H-912 -->
    <COEFFICIENT NAME="DClrDf" TYPE="VALUE">
       Delta_Roll_moment_due_to_yaw_rate_due_to_flaps
       aero/qbar-psf|metrics/Sw-sqft|metrics/bw-ft|aero/bi2vel|velocities/r-aero-rad_sec|fcs/components/flaps-control/output-norm
       0.18
    </COEFFICIENT>
    <!-- H-912 -->
    <COEFFICIENT NAME="Clda" TYPE="TABLE">
       Roll_moment_due_to_aileron
       8 2
       aero/alpha-rad
       gear/gear-pos-norm
       aero/qbar-psf|metrics/Sw-sqft|metrics/bw-ft|fcs/left-aileron-pos-rad
                 0      1
       -0.0349   0.206  0.189
        0        0.212  0.189
        0.0349   0.229  0.189
        0.0698   0.218  0.189
        0.1047   0.201  0.189
        0.1396   0.201  0.189
        0.1745   0.206  0.189
        0.2094   0.212  0.155
    </COEFFICIENT>
    <!-- aeromatic -->
<!--
    <COEFFICIENT NAME="DCldaM" TYPE="VALUE">
       Delta_Roll_moment_due_to_aileron_due_to_mach
       aero/qbar-psf|metrics/Sw-sqft|metrics/bw-ft|fcs/left-aileron-pos-rad|velocities/mach-norm
       -0.0705
    </COEFFICIENT>
-->
    <!-- H-912 -->
    <COEFFICIENT NAME="DCldaDf" TYPE="VALUE">
       Delta_Roll_moment_due_to_aileron_due_to_flaps
       aero/qbar-psf|metrics/Sw-sqft|metrics/bw-ft|fcs/left-aileron-pos-rad|fcs/components/flaps-control/output-norm
       -0.02
    </COEFFICIENT>
    <!-- H-912 -->
    <COEFFICIENT NAME="Cldr" TYPE="VECTOR">
       Roll_moment_due_to_rudder
       7
       aero/alpha-rad
       aero/qbar-psf|metrics/Sw-sqft|metrics/bw-ft|fcs/rudder-pos-rad
       -0.0349   0.03438
        0        0.01146
        0.0349   0.00573
        0.0698   0.00000
        0.1047   0.00573
        0.1396   0.02292
        0.1745   0.04584
    </COEFFICIENT>
  </AXIS>
  <AXIS NAME="PITCH">
    <!-- H-912 -->
    <COEFFICIENT NAME="Cmalpha" TYPE="TABLE">
       Pitch_moment_due_to_alpha
       8 2
       aero/alpha-rad
       gear/gear-pos-norm
       aero/qbar-psf|metrics/Sw-sqft|metrics/cbarw-ft
                 0        1
       -0.0349   -0.2292  -0.2292
        0        -0.2578  -0.2292
        0.0349   -0.3724  -0.2292
        0.0698   -0.4011  -0.2292
        0.1047   -0.3953  -0.2865
        0.1396   -0.3610  -0.3896
        0.1745   -0.3896  -0.4756
        0.2094   -0.4584  -0.6016
    </COEFFICIENT>
    <!-- Roskam -->
<!--
    <COEFFICIENT NAME="Cmadot" TYPE="VALUE">
       Pitch_moment_due_to_alpha_rate
       aero/qbar-psf|metrics/Sw-sqft|metrics/cbarw-ft|aero/ci2vel|aero/alphadot-rad_sec
       -6.95
    </COEFFICIENT>
-->
    <!-- H-912 -->
    <COEFFICIENT NAME="Cmde" TYPE="TABLE">
       Pitch_moment_due_to_elevator
       8 2
       aero/alpha-rad
       gear/gear-pos-norm
       aero/qbar-psf|metrics/Sw-sqft|metrics/cbarw-ft|fcs/elevator-pos-rad
                  0        1
       -0.0349   -0.1318  -0.1318
        0        -0.1174  -0.1174
        0.0349   -0.1175  -0.1140
        0.0698   -0.1249  -0.1140
        0.1047   -0.1249  -0.1129
        0.1396   -0.1203  -0.1060
        0.1745   -0.1175  -0.0974
        0.2094   -0.0974  -0.0917
    </COEFFICIENT>
    <!-- H-912 -->
    <COEFFICIENT NAME="DCmdeDf" TYPE="VECTOR">
       Delta_Pitch_moment_due_to_elevator_due_to_flaps
       7
       aero/alpha-rad
       aero/qbar-psf|metrics/Sw-sqft|metrics/cbarw-ft|fcs/elevator-pos-rad|fcs/components/flaps-control/output-norm
       -0.0349   0.0057
        0        0.0023
        0.0349   0.0086
        0.0698   0.0218
        0.1047   0.0132
        0.1396   0.0052
        0.1745   0.0046
    </COEFFICIENT>
    <!-- aeromatic -->
<!--
    <COEFFICIENT NAME="CmdeM" TYPE="VALUE">
       Pitch_moment_due_to_elevator
       aero/qbar-psf|metrics/Sw-sqft|metrics/cbarw-ft|fcs/elevator-pos-rad|velocities/mach-norm
       0.46
    </COEFFICIENT>
-->
    <!-- H-912 -->
    <COEFFICIENT NAME="DCmdf" TYPE="VECTOR">
       Delta_Pitch_moment_due_to_flaps
       8
       aero/alpha-rad
       aero/qbar-psf|metrics/Sw-sqft|metrics/cbarw-ft|fcs/components/flaps-control/output-norm
       -0.0349  -0.2406
        0       -0.0945
        0.0349  -0.0372
        0.0698  -0.0298
        0.1047  -0.0871
        0.1396  -0.1031
        0.1745  -0.1117
        0.2094  -0.1891
    </COEFFICIENT>
    <!-- H-912, Culp advises -50.0, Roskam defines -14.9 -->
    <COEFFICIENT NAME="Cmq" TYPE="TABLE">
       Pitch_moment_due_to_pitch_rate
       8 2
       aero/alpha-rad
       gear/gear-pos-norm
       aero/qbar-psf|metrics/Sw-sqft|metrics/cbarw-ft|aero/ci2vel|velocities/q-aero-rad_sec
                  0      1
       -0.0349   -25    -26
        0        -21    -26
        0.0349   -20    -26
        0.0698   -22    -26
        0.1047   -21    -22
        0.1396   -19.5  -17
        0.1745   -17    -16
        0.2094   -13    -14
    </COEFFICIENT>
  </AXIS>
  <AXIS NAME="YAW">
    <!-- H-912 -->
    <COEFFICIENT NAME="Cnb" TYPE="VECTOR">
       Yaw_moment_due_to_beta
       7
       aero/alpha-rad
       aero/qbar-psf|metrics/Sw-sqft|metrics/bw-ft|aero/mag-beta-rad
       -0.0349   0.092
        0        0.093
        0.0349   0.093
        0.0698   0.097
        0.1047   0.096
        0.1396   0.097
        0.1745   0.097
    </COEFFICIENT>
    <!-- H-912 -->
    <COEFFICIENT NAME="DCnbDg" TYPE="VALUE">
       Delta_Yaw_moment_due_to_beta_due_to_gear
       aero/qbar-psf|metrics/Sw-sqft|metrics/bw-ft|aero/mag-beta-rad|gear/gear-pos-norm
       -0.00963
    </COEFFICIENT>
    <!-- H-912 -->
    <COEFFICIENT NAME="DCnbDf" TYPE="VALUE">
       Delta_Yaw_moment_due_to_beta_due_to_flaps
       aero/qbar-psf|metrics/Sw-sqft|metrics/bw-ft|aero/mag-beta-rad|fcs/components/flaps-control/output-norm
       -0.00882
    </COEFFICIENT>
    <!-- H-912 -->
    <COEFFICIENT NAME="Cnp" TYPE="VECTOR">
       Yaw_moment_due_to_roll_rate
       5
       aero/alpha-rad
       aero/qbar-psf|metrics/Sw-sqft|metrics/bw-ft|aero/bi2vel|velocities/p-aero-rad_sec
       -0.0349   0.00
        0       -0.05
        0.0349  -0.07
        0.0698  -0.10
        0.1047  -0.12
    </COEFFICIENT>
    <!-- H-912 -->
    <COEFFICIENT NAME="DCnpDf" TYPE="VALUE">
       Delta_Yaw_moment_due_to_roll_rate_due_to_flaps
       aero/qbar-psf|metrics/Sw-sqft|metrics/bw-ft|aero/bi2vel|velocities/p-aero-rad_sec
       -0.02
    </COEFFICIENT>
    <!-- H-912 -->
    <COEFFICIENT NAME="Cnr" TYPE="TABLE">
       Yaw_moment_due_to_yaw_rate
       5 2
       aero/alpha-rad
       fcs/components/flaps-control/output-norm
       aero/qbar-psf|metrics/Sw-sqft|metrics/bw-ft|aero/bi2vel|velocities/r-aero-rad_sec
                 0      1
       -0.0349  -0.24   -0.16
        0       -0.23   -0.13
        0.0349  -0.18   -0.13
        0.0698  -0.16   -0.14
        0.1047  -0.15   -0.15
    </COEFFICIENT>
    <!-- H-912 -->
    <COEFFICIENT NAME="Cndr" TYPE="VECTOR">
       Yaw_moment_due_to_rudder
       6
       aero/alpha-rad
       aero/qbar-psf|metrics/Sw-sqft|metrics/bw-ft|fcs/rudder-pos-rad
       -0.0349   -0.08
        0        -0.07
        0.0349   -0.06
        0.0698   -0.05
        0.1047   -0.05
        0.1396   -0.06
    </COEFFICIENT>
    <!-- H-912 -->
    <COEFFICIENT NAME="DCndrDf" TYPE="VALUE">
       Delta_Yaw_moment_due_to_rudder_due_to_flaps
       aero/qbar-psf|metrics/Sw-sqft|metrics/bw-ft|fcs/rudder-pos-rad|fcs/components/flaps-control/output-norm
       0.002
    </COEFFICIENT>
    <!-- H-912 -->
    <COEFFICIENT NAME="Cnda" TYPE="VALUE">
       Adverse_yaw
       aero/qbar-psf|metrics/Sw-sqft|metrics/bw-ft|fcs/left-aileron-pos-rad
       0.0254
    </COEFFICIENT>
  </AXIS>
 </AERODYNAMICS>
  <OUTPUT NAME="JSBoutT37.csv" TYPE="NONE">
    RATE_IN_HZ       20
    SIMULATION       OFF
    ATMOSPHERE       ON
    MASSPROPS        ON
    AEROSURFACES     ON
    RATES            ON
    VELOCITIES       ON
    FORCES           ON
    MOMENTS          ON
    POSITION         ON
    COEFFICIENTS     ON
    GROUND_REACTIONS ON
    FCS              ON
    PROPULSION       ON
  </OUTPUT>
</FDM_CONFIG>
