<?xml version="1.0"?>
<?xml-stylesheet type="text/xsl" href="http://jsbsim.sourceforge.net/JSBSim.xsl"?>
<fdm_config name="T38" version="2.0" release="ALPHA">
 <fileheader>
  <author>Aeromatic v 0.8, DPC</author>
  <filecreationdate>now</filecreationdate>
  <description>Models a T38</description>
  <reference refID="None" author="n/a" title="n/a" date="n/a" />
 </fileheader>

<!--
  File:     T38.xml
  Inputs:
    name:          T38
    type:          two-engine transonic/supersonic fighter
    max weight:    12500.0 lb
    wing span:     25.25 ft
    length:        46.3 ft
    wing area:     170.0 sq-ft
    gear type:     tricycle
    retractable?:  yes
    # engines:     2
    engine type:   turbine
    engine layout: aft fuselage
    yaw damper?    yes
  Outputs:
    wing loading:  73.53 lb/sq-ft
    CL-alpha:      3.6 per radian
    CL-0:          0.08
    CL-max:        1
    CD-0:          0.024
    K:             0.09

-->

    <metrics>
        <wingarea unit="FT2"> 170 </wingarea>
        <wingspan unit="FT"> 25.25 </wingspan>
        <chord unit="FT"> 6.73 </chord>
        <htailarea unit="FT2"> 34 </htailarea>
        <htailarm unit="FT"> 13 </htailarm>
        <vtailarea unit="FT2"> 47 </vtailarea>
        <vtailarm unit="FT"> 0 </vtailarm>
        <location name="AERORP" unit="IN">
            <x> 320 </x>
            <y> 0 </y>
            <z> 0 </z>
        </location>
        <location name="EYEPOINT" unit="IN">
            <x> 154 </x>
            <y> 0 </y>
            <z> 36 </z>
        </location>
        <location name="VRP" unit="IN">
            <x> 0 </x>
            <y> 0 </y>
            <z> 0 </z>
        </location>
    </metrics>

    <mass_balance>
        <ixx unit="SLUG*FT2"> 7806 </ixx>
        <iyy unit="SLUG*FT2"> 36075 </iyy>
        <izz unit="SLUG*FT2"> 31319 </izz>
        <ixz unit="SLUG*FT2"> -0 </ixz>
        <iyz unit="SLUG*FT2"> -0 </iyz>
        <ixy unit="SLUG*FT2"> -0 </ixy>
        <emptywt unit="LBS"> 7574 </emptywt>
        <location name="CG" unit="IN">
            <x> 314 </x>
            <y> 0 </y>
            <z> -10 </z>
        </location>
    </mass_balance>

    <ground_reactions>
        <contact type="BOGEY" name="NOSE_LG">
            <location unit="IN">
                <x> 140 </x>
                <y> 0 </y>
                <z> -60 </z>
            </location>
            <static_friction> 0.8 </static_friction>
            <dynamic_friction> 0.5 </dynamic_friction>
            <rolling_friction> 0.02 </rolling_friction>
            <spring_coeff unit="LBS/FT"> 5000 </spring_coeff>
            <damping_coeff unit="LBS/FT/SEC"> 500 </damping_coeff>
            <max_steer unit="DEG"> 5 </max_steer>
            <brake_group> NONE </brake_group>
            <retractable>1</retractable>
        </contact>
        <contact type="BOGEY" name="LEFT_MLG">
            <location unit="IN">
                <x> 335 </x>
                <y> -65 </y>
                <z> -60 </z>
            </location>
            <static_friction> 0.8 </static_friction>
            <dynamic_friction> 0.5 </dynamic_friction>
            <rolling_friction> 0.02 </rolling_friction>
            <spring_coeff unit="LBS/FT"> 37870 </spring_coeff>
            <damping_coeff unit="LBS/FT/SEC"> 3787 </damping_coeff>
            <max_steer unit="DEG"> 0.0 </max_steer>
            <brake_group> LEFT </brake_group>
            <retractable>1</retractable>
        </contact>
        <contact type="BOGEY" name="RIGHT_MLG">
            <location unit="IN">
                <x> 335 </x>
                <y> 65 </y>
                <z> -60 </z>
            </location>
            <static_friction> 0.8 </static_friction>
            <dynamic_friction> 0.5 </dynamic_friction>
            <rolling_friction> 0.02 </rolling_friction>
            <spring_coeff unit="LBS/FT"> 37870 </spring_coeff>
            <damping_coeff unit="LBS/FT/SEC"> 3787 </damping_coeff>
            <max_steer unit="DEG"> 0.0 </max_steer>
            <brake_group> RIGHT </brake_group>
            <retractable>1</retractable>
        </contact>
    </ground_reactions>
    <propulsion>
        <engine file="J85-GE-5">
            <location unit="IN">
                <x> 452 </x>
                <y> -20 </y>
                <z> 0 </z>
            </location>
            <orient unit="DEG">
                <roll> 0 </roll>
                <pitch> 0 </pitch>
                <yaw> 0 </yaw>
            </orient>
            <feed>0</feed>
            <thruster file="direct">
                <location unit="IN">
                    <x> 551 </x>
                    <y> -20 </y>
                    <z> 0 </z>
                </location>
                <orient unit="DEG">
                    <roll> 0.0 </roll>
                    <pitch> 0.0 </pitch>
                    <yaw> 0.0 </yaw>
                </orient>
            </thruster>
        </engine>
        <engine file="J85-GE-5">
            <location unit="IN">
                <x> 452 </x>
                <y> 20 </y>
                <z> 0 </z>
            </location>
            <orient unit="DEG">
                <roll> 0.0 </roll>
                <pitch> 0 </pitch>
                <yaw> 0 </yaw>
            </orient>
            <feed>1</feed>
            <thruster file="direct">
                <location unit="IN">
                    <x> 551 </x>
                    <y> 20 </y>
                    <z> 0 </z>
                </location>
                <orient unit="DEG">
                    <roll> 0.0 </roll>
                    <pitch> 0.0 </pitch>
                    <yaw> 0.0 </yaw>
                </orient>
            </thruster>
        </engine>
        <tank type="FUEL">    <!-- Tank number 0 -->
            <location unit="IN">
                <x> 298 </x>
                <y> 0 </y>
                <z> 0 </z>
            </location>
            <capacity unit="LBS"> 1953 </capacity>
            <contents unit="LBS"> 1900 </contents>
        </tank>
        <tank type="FUEL">    <!-- Tank number 1 -->
            <location unit="IN">
                <x> 370 </x>
                <y> 0 </y>
                <z> 0 </z>
            </location>
            <capacity unit="LBS"> 2029 </capacity>
            <contents unit="LBS"> 2000 </contents>
        </tank>
    </propulsion>
    <flight_control name="FCS: T38-FCS">
        <channel name="Pitch">
            <component name="Pilot Pitch Sum" type="SUMMER">
                <input>fcs/elevator-cmd-norm</input>
                <input>fcs/pitch-trim-cmd-norm</input>
                <clip>
                    <min>-1</min>
                    <max>1</max>
                </clip>
            </component>

            <component name="Pitch Feel" type="SCHEDULED_GAIN">
                <input>fcs/pilot-pitch-sum</input>
                <table>
                  <independentVar>velocities/mach-norm</independentVar>
                    <tableData>
                        0.0000	1.0000
                        0.6000	1.0000
                        1.2000	0.7000
                    </tableData>
                </table>
            </component>

            <component name="Elevator Control" type="AEROSURFACE_SCALE">
                <input>fcs/pitch-feel</input>
                <range>
                    <min>-0.3</min>
                    <max>0.175</max>
                </range>
                <output>fcs/elevator-pos-rad</output>
            </component>
        </channel>
        <channel name="Roll">
            <component name="Pilot Roll Sum" type="SUMMER">
                <input>fcs/aileron-cmd-norm</input>
                <input>fcs/roll-trim-cmd-norm</input>
                <clip>
                    <min>-1</min>
                    <max>1</max>
                </clip>
            </component>

            <component name="Roll Feel" type="SCHEDULED_GAIN">
                <input>fcs/pilot-roll-sum</input>
                <table>
                  <independentVar>velocities/mach-norm</independentVar>
                    <tableData>
                        0.0000	1.0000
                        0.6000	1.0000
                        1.2000	0.7000
                    </tableData>
                </table>
            </component>

            <component name="Left Aileron Control" type="AEROSURFACE_SCALE">
                <input>fcs/roll-feel</input>
                <range>
                    <min>-0.35</min>
                    <max>0.26</max>
                </range>
                <output>fcs/left-aileron-pos-rad</output>
            </component>

            <component name="Right Aileron Control" type="AEROSURFACE_SCALE">
                <input>-fcs/roll-feel</input>
                <range>
                    <min>-0.35</min>
                    <max>0.26</max>
                </range>
                <output>fcs/right-aileron-pos-rad</output>
            </component>
        </channel>
        <channel name="Yaw">
            <component name="Rudder Command Sum" type="SUMMER">
                <input>fcs/rudder-cmd-norm</input>
                <input>fcs/yaw-trim-cmd-norm</input>
                <clip>
                    <min>-1</min>
                    <max>1</max>
                </clip>
            </component>

            <component name="Yaw SAS Rate" type="SCHEDULED_GAIN">
                <input>velocities/r-aero-rad_sec</input>
                <table>
                  <independentVar>velocities/mach-norm</independentVar>
                    <tableData>
                        0.0000	0.0000
                        0.1000	0.0000
                        0.1100	1.0000
                    </tableData>
                </table>
            </component>

            <component name="Yaw SAS Beta" type="SCHEDULED_GAIN">
                <input>aero/beta-rad</input>
                <table>
                  <independentVar>velocities/mach-norm</independentVar>
                    <tableData>
                        0.0000	0.0000
                        1.2000	0.0000
                    </tableData>
                </table>
            </component>

            <component name="Yaw SAS Sum" type="SUMMER">
                <input>fcs/yaw-sas-rate</input>
                <input>fcs/yaw-sas-beta</input>
                <clip>
                    <min>-0.1</min>
                    <max>0.1</max>
                </clip>
            </component>

            <component name="Rudder Sum" type="SUMMER">
                <input>fcs/rudder-command-sum</input>
                <input>fcs/yaw-sas-sum</input>
                <clip>
                    <min>-1</min>
                    <max>1</max>
                </clip>
            </component>

            <component name="Rudder Control" type="AEROSURFACE_SCALE">
                <input>fcs/rudder-sum</input>
                <range>
                    <min>-0.35</min>
                    <max>0.35</max>
                </range>
                <output>fcs/rudder-pos-rad</output>
            </component>
        </channel>
        <channel name="Flaps">
<!--
        <component name="Throttle1" type="PURE_GAIN">
            <input>fcs/throttle-cmd-norm</input>
            <gain>2</gain>
            <output>fcs/throttle-pos-norm</output>
        </component>

        <component name="Throttle2" type="PURE_GAIN">
            <input>fcs/throttle-cmd-norm[1]</input>
            <gain>2</gain>
            <output>fcs/throttle-pos-norm[1]</output>
        </component>
-->

            <component name="Flaps Control" type="KINEMAT">
                <input>fcs/flap-cmd-norm</input>
                <traverse>
                    <setting>
                        <position>0</position>
                        <time>0</time>
                    </setting>
                    <setting>
                        <position>24</position>
                        <time>5</time>
                    </setting>
                    <setting>
                        <position>40</position>
                        <time>3</time>
                    </setting>
                </traverse>
                <output>fcs/flap-pos-deg</output>
            </component>
        </channel>
        <channel name="Landing Gear">
            <component name="Gear Control" type="KINEMAT">
                <input>gear/gear-cmd-norm</input>
                <traverse>
                    <setting>
                        <position>0</position>
                        <time>0</time>
                    </setting>
                    <setting>
                        <position>1</position>
                        <time>3</time>
                    </setting>
                </traverse>
                <output>gear/gear-pos-norm</output>
            </component>
        </channel>
        <channel name="Speedbrake">
            <component name="Speedbrake Control" type="KINEMAT">
                <input>fcs/speedbrake-cmd-norm</input>
                <traverse>
                    <setting>
                        <position>0</position>
                        <time>0</time>
                    </setting>
                    <setting>
                        <position>1</position>
                        <time>1</time>
                    </setting>
                </traverse>
                <output>fcs/speedbrake-pos-norm</output>
            </component>
        </channel>
    </flight_control>
    <aerodynamics>

        <axis name="DRAG">
            <function name="aero/coefficient/CD0">
                <description>Drag_at_zero_lift</description>
                <product>
                    <property>aero/qbar-psf</property>
                    <property>metrics/Sw-sqft</property>
                      <table>
                          <independentVar>aero/alpha-rad</independentVar>
                          <tableData>
                              -1.5700	1.5000
                              -0.2600	0.0320
                              0.0000	0.0160
                              0.2600	0.0320
                              1.5700	1.5000
                          </tableData>
                      </table>
                </product>
            </function>
            <function name="aero/coefficient/CDi">
                <description>Induced_drag</description>
                <product>
                    <property>aero/qbar-psf</property>
                    <property>metrics/Sw-sqft</property>
                    <property>aero/cl-squared-norm</property>
                    <value>0.1000</value>
                </product>
            </function>
            <function name="aero/coefficient/CDmach">
                <description>Drag_due_to_mach</description>
                <product>
                    <property>aero/qbar-psf</property>
                    <property>metrics/Sw-sqft</property>
                      <table>
                          <independentVar>velocities/mach-norm</independentVar>
                          <tableData>
                              0.0000	0.0000
                              0.8100	0.0000
                              1.1000	0.0240
                              1.8000	0.0110
                          </tableData>
                      </table>
                </product>
            </function>
            <function name="aero/coefficient/CDflap">
                <description>Drag_due_to_flaps</description>
                <product>
                    <property>aero/qbar-psf</property>
                    <property>metrics/Sw-sqft</property>
                    <property>fcs/flap-pos-deg</property>
                    <value>0.00225</value>
                </product>
            </function>
            <function name="aero/coefficient/CDgear">
                <description>Drag_due_to_gear</description>
                <product>
                    <property>aero/qbar-psf</property>
                    <property>metrics/Sw-sqft</property>
                    <property>gear/gear-pos-norm</property>
                    <value>0.0150</value>
                </product>
            </function>
            <function name="aero/coefficient/CDsb">
                <description>Drag_due_to_speedbrakes</description>
                <product>
                    <property>aero/qbar-psf</property>
                    <property>metrics/Sw-sqft</property>
                    <property>fcs/speedbrake-pos-norm</property>
                    <value>0.0250</value>
                </product>
            </function>
            <function name="aero/coefficient/CDbeta">
                <description>Drag_due_to_sideslip</description>
                <product>
                    <property>aero/qbar-psf</property>
                    <property>metrics/Sw-sqft</property>
                      <table>
                          <independentVar>aero/beta-rad</independentVar>
                          <tableData>
                              -1.5700	1.2300
                              -0.2600	0.0500
                              0.0000	0.0000
                              0.2600	0.0500
                              1.5700	1.2300
                          </tableData>
                      </table>
                </product>
            </function>
            <function name="aero/coefficient/CDde">
                <description>Drag_due_to_Elevator_Deflection</description>
                <product>
                    <property>aero/qbar-psf</property>
                    <property>metrics/Sw-sqft</property>
                    <property>fcs/elevator-pos-norm</property>
                    <value>0.0300</value>
                </product>
            </function>
        </axis>

        <axis name="SIDE">
            <function name="aero/coefficient/CYb">
                <description>Side_force_due_to_beta</description>
                <product>
                    <property>aero/qbar-psf</property>
                    <property>metrics/Sw-sqft</property>
                    <property>aero/beta-rad</property>
                    <value>-1.0000</value>
                </product>
            </function>
        </axis>

        <axis name="LIFT">
            <function name="aero/coefficient/CLalpha">
                <description>Lift_due_to_alpha</description>
                <product>
                    <property>aero/qbar-psf</property>
                    <property>metrics/Sw-sqft</property>
                      <table>
                          <independentVar lookup="row">aero/alpha-rad</independentVar>
                          <independentVar lookup="column">fcs/flap-pos-deg</independentVar>
                          <tableData>
                                        0.0000 40.0000
                             -0.2000   -0.5710	0.1000
                              0.0000	0.0000	0.6000
                              0.2500	0.7160	1.3000
                              0.3300	0.9450	0.3000
                              0.6000	0.1740	0.0000
                          </tableData>
                      </table>
                </product>
            </function>
            <function name="aero/coefficient/CLde">
                <description>Lift_due_to_Elevator_Deflection</description>
                <product>
                    <property>aero/qbar-psf</property>
                    <property>metrics/Sw-sqft</property>
                    <property>fcs/elevator-pos-rad</property>
                    <value>0.2000</value>
                </product>
            </function>
        </axis>

        <axis name="ROLL">
            <function name="aero/coefficient/Clb">
                <description>Roll_moment_due_to_beta</description>
                <product>
                    <property>aero/qbar-psf</property>
                    <property>metrics/Sw-sqft</property>
                    <property>metrics/bw-ft</property>
                    <property>aero/beta-rad</property>
                      <table>
                          <independentVar>aero/alpha-rad</independentVar>
                          <tableData>
                              0.0000	-0.0500
                              0.5200	-0.1200
                          </tableData>
                      </table>
                </product>
            </function>
            <function name="aero/coefficient/Clp">
                <description>Roll_moment_due_to_roll_rate</description>
                <product>
                    <property>aero/qbar-psf</property>
                    <property>metrics/Sw-sqft</property>
                    <property>metrics/bw-ft</property>
                    <property>aero/bi2vel</property>
                    <property>velocities/p-aero-rad_sec</property>
                    <value>-0.4000</value>
                </product>
            </function>
            <function name="aero/coefficient/Clr">
                <description>Roll_moment_due_to_yaw_rate</description>
                <product>
                    <property>aero/qbar-psf</property>
                    <property>metrics/Sw-sqft</property>
                    <property>metrics/bw-ft</property>
                    <property>aero/bi2vel</property>
                    <property>velocities/r-aero-rad_sec</property>
                    <value>0.1200</value>
                </product>
            </function>
            <function name="aero/coefficient/CldaL">
                <description>Roll_moment_due_to_left_aileron</description>
                <product>
                    <property>aero/qbar-psf</property>
                    <property>metrics/Sw-sqft</property>
                    <property>metrics/bw-ft</property>
                    <property>fcs/left-aileron-pos-rad</property>
                    <value>0.0550</value>
                </product>
            </function>
            <function name="aero/coefficient/CldaR">
                <description>Roll_moment_due_to_right_aileron</description>
                <product>
                    <property>aero/qbar-psf</property>
                    <property>metrics/Sw-sqft</property>
                    <property>metrics/bw-ft</property>
                    <property>fcs/right-aileron-pos-rad</property>
                    <value>-0.0550</value>
                </product>
            </function>
            <function name="aero/coefficient/Cldr">
                <description>Roll_moment_due_to_rudder</description>
                <product>
                    <property>aero/qbar-psf</property>
                    <property>metrics/Sw-sqft</property>
                    <property>metrics/bw-ft</property>
                    <property>fcs/rudder-pos-rad</property>
                    <value>0.0060</value>
                </product>
            </function>
        </axis>

        <axis name="PITCH">
            <function name="aero/coefficient/Cmalpha">
                <description>Pitch_moment_due_to_alpha</description>
                <product>
                    <property>aero/qbar-psf</property>
                    <property>metrics/Sw-sqft</property>
                    <property>metrics/cbarw-ft</property>
                    <property>aero/alpha-rad</property>
                    <value>-0.3000</value>
                </product>
            </function>
            <function name="aero/coefficient/Cmde">
                <description>Pitch_moment_due_to_elevator</description>
                <product>
                    <property>aero/qbar-psf</property>
                    <property>metrics/Sw-sqft</property>
                    <property>metrics/cbarw-ft</property>
                    <property>fcs/elevator-pos-rad</property>
                    <value>-0.6500</value>
                </product>
            </function>
            <function name="aero/coefficient/Cmq">
                <description>Pitch_moment_due_to_pitch_rate</description>
                <product>
                    <property>aero/qbar-psf</property>
                    <property>metrics/Sw-sqft</property>
                    <property>metrics/cbarw-ft</property>
                    <property>aero/ci2vel</property>
                    <property>velocities/q-aero-rad_sec</property>
                    <value>-18.0000</value>
                </product>
            </function>
            <function name="aero/coefficient/Cmadot">
                <description>Pitch_moment_due_to_alpha_rate</description>
                <product>
                    <property>aero/qbar-psf</property>
                    <property>metrics/Sw-sqft</property>
                    <property>metrics/cbarw-ft</property>
                    <property>aero/ci2vel</property>
                    <property>aero/alphadot-rad_sec</property>
                    <value>-9.0000</value>
                </product>
            </function>
            <function name="aero/coefficient/Cmflaps">
                <description>Pitch_moment_due_to_flaps</description>
                <product>
                    <property>aero/qbar-psf</property>
                    <property>metrics/Sw-sqft</property>
                    <property>metrics/cbarw-ft</property>
                    <property>fcs/flap-pos-deg</property>
                    <value>-0.0025</value>
                </product>
            </function>
        </axis>

        <axis name="YAW">
            <function name="aero/coefficient/Cnb">
                <description>Yaw_moment_due_to_beta</description>
                <product>
                    <property>aero/qbar-psf</property>
                    <property>metrics/Sw-sqft</property>
                    <property>metrics/bw-ft</property>
                    <property>aero/beta-rad</property>
                    <value>0.1000</value>
                </product>
            </function>
            <function name="aero/coefficient/Cnr">
                <description>Yaw_moment_due_to_yaw_rate</description>
                <product>
                    <property>aero/qbar-psf</property>
                    <property>metrics/Sw-sqft</property>
                    <property>metrics/bw-ft</property>
                    <property>aero/bi2vel</property>
                    <property>velocities/r-aero-rad_sec</property>
                    <value>-0.1500</value>
                </product>
            </function>
            <function name="aero/coefficient/Cndr">
                <description>Yaw_moment_due_to_rudder</description>
                <product>
                    <property>aero/qbar-psf</property>
                    <property>metrics/Sw-sqft</property>
                    <property>metrics/bw-ft</property>
                    <property>fcs/rudder-pos-rad</property>
                    <value>-0.0200</value>
                </product>
            </function>
        </axis>
    </aerodynamics>
    <output name="T38.csv" type="CSV">
        <propulsion> ON </propulsion>
    </output>
</fdm_config>
