<?xml version="1.0"?>
<?xml-stylesheet type="text/xsl" href="http://jsbsim.sourceforge.net/JSBSim.xsl"?>
<fdm_config xmlns:xsi="http://www.w3.org/2001/XMLSchema-instance" name="dflyer" version="2.0" release="ALPHA" xsi:noNamespaceSchemaLocation="http://jsbsim.sourceforge.net/JSBSim.xsd">
  <fileheader>
    <author>Matt Vacanti</author>
    <filecreationdate> 2020-01-04 </filecreationdate>
    <version>0.0 </version>
    <description> Hexarotor X</description>
  </fileheader>
  <metrics>
    <wingarea unit="M2">   0.017</wingarea>
    <wingspan unit="M">   0.13 </wingspan>
    <chord unit="FT">  0.0 </chord>
    <htailarea unit="FT2">  0.0 </htailarea>
    <htailarm unit="FT">  0.0 </htailarm>
    <vtailarea unit="FT2">  0.0 </vtailarea>
    <vtailarm unit="FT">  0.0 </vtailarm>
    <location name="AERORP" unit="IN">
      <x>   0.00 </x>
      <y>   0.00 </y>
      <z>   0.00 </z>
    </location>
    <location name="EYEPOINT" unit="IN">
      <x>  0.0 </x>
      <y>  0.0 </y>
      <z>  0.0 </z>
    </location>
    <location name="VRP" unit="IN">
      <x>0</x>
      <y>0</y>
      <z>0</z>
    </location>
  </metrics>
  <mass_balance>
    <!--roughtly approximating this as a solid sphere with correct mass-->
    <ixx unit="KG*M2"> 0.985 </ixx>
    <iyy unit="KG*M2"> 0.985 </iyy>
    <izz unit="KG*M2"> 0.985 </izz>
    <emptywt unit="KG"> 11.632 </emptywt>
    <location name="CG" unit="M">
      <x>  0.0 </x>
      <y>  0.0 </y>
      <z>  0.0 </z>
    </location>
    <pointmass name="Payload">
      <weight unit="KG"> 0.0 </weight>
      <location unit="IN">
        <x>  0.0 </x>
        <y>  0.0 </y>
        <z>  0.0 </z>
      </location>
    </pointmass>
  </mass_balance>
  <ground_reactions>
    <contact type="STRUCTURE" name="frontbase">
      <location unit="M">
        <x>  -0.283 </x>
        <y>   0.00 </y>
        <z>  -0.033</z>
      </location>
      <static_friction>  5 </static_friction>
      <dynamic_friction> 5 </dynamic_friction>
      <spring_coeff unit="N/M">420</spring_coeff>
      <damping_coeff unit="N/M/SEC">140</damping_coeff>
    </contact>
    <contact type="STRUCTURE" name="rearbase">
      <location unit="M">
        <x>   0.283 </x>
        <y>   0.00 </y>
        <z>  -0.033</z>
      </location>
      <static_friction>  5 </static_friction>
      <dynamic_friction> 5 </dynamic_friction>
      <spring_coeff unit="N/M">420</spring_coeff>
      <damping_coeff unit="N/M/SEC">140</damping_coeff>
    </contact>
    <contact type="STRUCTURE" name="leftbase">
      <location unit="M">
        <x>   0.00 </x>
        <y>   0.283 </y>
        <z>  -0.033</z>
      </location>
      <static_friction>  5 </static_friction>
      <dynamic_friction> 5 </dynamic_friction>
      <spring_coeff unit="N/M">420</spring_coeff>
      <damping_coeff unit="N/M/SEC">140</damping_coeff>
    </contact>
    <contact type="STRUCTURE" name="rightbase">
      <location unit="M">
        <x>   0.00 </x>
        <y>  -0.283 </y>
        <z>  -0.033</z>
      </location>
      <static_friction>  5 </static_friction>
      <dynamic_friction> 5 </dynamic_friction>
      <spring_coeff unit="N/M">420</spring_coeff>
      <damping_coeff unit="N/M/SEC">140</damping_coeff>
    </contact>
  </ground_reactions>
  <!-- the front and rear motors spin clockwise, and the left and right motors spin counter-clockwise. -->
  <propulsion>
    <!-- Validation Config 1 & 2
    <engine file="XMotor-3536CA-8T" name="PX4_1">
      <location unit="M">
        <x>   0.0 </x>
        <y>   0.0 </y>
        <z>   0.0 </z>
      </location>
      <orient unit="DEG">
        <pitch>  0.00 </pitch>
        <roll>   0.00 </roll>
        <yaw>    0.00 </yaw>
      </orient>
      <feed>0</feed>
      <thruster file="APC_11x55E_8K">
        <location unit="M">
          <x>   0.0 </x>
          <y>   0.0 </y>
          <z>   0.0 </z>
        </location>
        <orient unit="DEG">
          <pitch> 0.00 </pitch>
          <roll>  0.00 </roll>
          <yaw>   0.00 </yaw>
        </orient>
    -->
    <!-- Validation Config 3 & 4
    <engine file="EP-2814-900.xml" name="PX4_1">
      <location unit="M">
        <x>   0.0 </x>
        <y>   0.0 </y>
        <z>   0.0 </z>
      </location>
      <orient unit="DEG">
        <pitch>  0.00 </pitch>
        <roll>   0.00 </roll>
        <yaw>    0.00 </yaw>
      </orient>
      <feed>0</feed>
      <thruster file="APC_13x8E_6K">
        <location unit="M">
          <x>   0.0 </x>
          <y>   0.0 </y>
          <z>   0.0 </z>
        </location>
        <orient unit="DEG">
          <pitch> 0.00 </pitch>
          <roll>  0.00 </roll>
          <yaw>   0.00 </yaw>
        </orient>
    -->
    <!-- Validation Config 5 & 6
    <engine file="E-max-BL2210" name="PX4_1">
      <location unit="M">
        <x>   0.0 </x>
        <y>   0.0 </y>
        <z>   0.0 </z>
      </location>
      <orient unit="DEG">
        <pitch>  0.00 </pitch>
        <roll>   0.00 </roll>
        <yaw>    0.00 </yaw>
      </orient>
      <feed>0</feed>
      <thruster file="APC_7x5E_11K">
        <location unit="M">
          <x>   0.0 </x>
          <y>   0.0 </y>
          <z>   0.0 </z>
        </location>
        <orient unit="DEG">
          <pitch> 0.00 </pitch>
          <roll>  0.00 </roll>
          <yaw>   0.00 </yaw>
        </orient>
    -->
    <!-- Validation Config 7 & 8
    <engine file="E-max-BL2205" name="PX4_1">
      <location unit="M">
        <x>   0.0 </x>
        <y>   0.0 </y>
        <z>   0.0 </z>
      </location>
      <orient unit="DEG">
        <pitch>  0.00 </pitch>
        <roll>   0.00 </roll>
        <yaw>    0.00 </yaw>
      </orient>
      <feed>0</feed>
      <thruster file="APC_6x4E_14K">
        <location unit="M">
          <x>   0.0 </x>
          <y>   0.0 </y>
          <z>   0.0 </z>
        </location>
        <orient unit="DEG">
          <pitch> 0.00 </pitch>
          <roll>  0.00 </roll>
          <yaw>   0.00 </yaw>
        </orient>
    -->
    <!-- Validation Config 9 & 10 -->
    <engine file="DJI-3510-380" name="PX4_1">
      <location unit="M">
        <x>   0.0 </x>
        <y>   0.0 </y>
        <z>   0.0 </z>
      </location>
      <orient unit="DEG">
        <pitch>  0.00 </pitch>
        <roll>   0.00 </roll>
        <yaw>    0.00 </yaw>
      </orient>
      <feed>0</feed>
      <thruster file="APC_13x8E_6K">
        <location unit="M">
          <x>   0.0 </x>
          <y>   0.0 </y>
          <z>   0.0 </z>
        </location>
        <orient unit="DEG">
          <pitch> 0.00 </pitch>
          <roll>  0.00 </roll>
          <yaw>   0.00 </yaw>
        </orient>

    <!-- BLDC Ramp Config
    <engine file="DJI-3510-380" name="PX4_1">
      <location unit="M">
        <x>   0.0 </x>
        <y>   0.0 </y>
        <z>   0.0 </z>
      </location>
      <orient unit="DEG">
        <pitch>  0.00 </pitch>
        <roll>   0.00 </roll>
        <yaw>    0.00 </yaw>
      </orient>
      <feed>0</feed>
      <thruster file="APC_13x8E_6K">
        <location unit="M">
          <x>   0.0 </x>
          <y>   0.0 </y>
          <z>   0.0 </z>
        </location>
        <orient unit="DEG">
          <pitch> 0.00 </pitch>
          <roll>  0.00 </roll>
          <yaw>   0.00 </yaw>
        </orient>
      -->

      </thruster>
    </engine>
    <tank type="FUEL" number="0">
      <location unit="M">
        <x>   0.00 </x>
        <y>   0.00 </y>
        <z>  -0.07 </z>
      </location>
      <!--have to have a fuel capacity, so setting it small-->
      <capacity unit="KG"> 0.00000000001 </capacity>
      <contents unit="KG"> 0.0 </contents>
    </tank>
  </propulsion>
  <aerodynamics>
    <axis name="LIFT">
        </axis>
    <axis name="DRAG">
      <function name="aero/coefficient/CD0">
        <description>Overall Drag</description>
        <product>
          <property>aero/qbar-psf</property>
          <property>metrics/Sw-sqft</property>
          <value>1</value>
        </product>
      </function>
    </axis>
    <axis name="SIDE">
        </axis>
    <axis name="ROLL">
        </axis>
    <axis name="PITCH">
        </axis>
    <axis name="YAW">
        </axis>
  </aerodynamics>

  <output name="prop_perf.csv" type="CSV" rate="250">
  	<property>propulsion/engine/propeller-rpm</property>
  	<property>propulsion/engine[0]/thrust-lbs</property>
	<property>propulsion/engine[0]/prop_torque_ftlbs</property>
	<property>propulsion/engine/power-hp</property>

  </output>
</fdm_config>
