<FDM_CONFIG NAME="F-16" VERSION="1.65" RELEASE="ALPHA">

<!--                                                                                       -
  File:        f16.xml
  Author:      Erik Hofman
  CVS Version: $Id: f16-afd.xml,v 1.5 2004/05/26 12:30:00 jberndt Exp $

  Function: Models an F-16A Block-32 (Basic US configuration)

  (C) 2001-2003 Erik Hofman

   This configuration file is Freeware; you can redistribute it
   and/or modify it under the terms of the GNU General Public
   License version 2, as published by the Free Software Foundation.

   This file is distributed in the hope that it will be useful, but
   WITHOUT ANY WARRANTY; without even the implied warranty of
   MERCHANTABILITY or FITNESS FOR A PARTICULAR PURPOSE.  See the GNU
   General Public License for more details.

-->

  <METRICS>

    AC_WINGAREA   300.0
    AC_WINGSPAN    30.0 <!-- 31.0 w. tip missile launchers and 32.83 w. missiles also -->
    AC_CHORD       11.32
    AC_HTAILAREA   63.7
    AC_HTAILARM   190.43
    AC_VTAILAREA   54.75
    AC_LV         190.43
    AC_IXX       9496.0
    AC_IYY      55814.0
    AC_IZZ      63100.0
    AC_IXZ        982.0
    AC_EMPTYWT  17400.0 <!-- w. oil, oxygen, unusable fuel and tip missile launchers -->
    AC_CGLOC      210.0  0.0   0.0
    AC_AERORP     227.0  0.0   0.0
    AC_EYEPTLOC   379.8  0.0  29.8
    AC_POINTMASS  230.0 383.8  0.0  6.1 <!-- pilot -->

  </METRICS>

  <UNDERCARRIAGE>

    <!--   Legenda:
       -    LG   Landing Gear       MLG   Main Landing Gear
       -    WT   Wing Tip           VFT   Ventral Fin Tip
       -    VS   Vertical Stabilizer
      -->
    AC_GEAR NOSE_LG   328.6    0.0 -73.0  2200   800 0.5 0.8 0.2 STEERABLE NOSE 72.0 RETRACT
    AC_GEAR LEFT_MLG  173.0  -46.7 -73.0 22704 10000 0.5 0.8 0.2 FIXED     LEFT  0   RETRACT
    AC_GEAR RIGHT_MLG 173.0   46.7 -73.0 22704 10000 0.5 0.8 0.2 FIXED     RIGHT 0   RETRACT
<!--
    AC_GEAR LEFT_WT   173.0 -197.0   0.0 10000  2000 0.2 0.2 0.2 FIXED     NONE  0   FIXED
    AC_GEAR RIGHT_WT  173.0  197.0   0.0 10000  2000 0.2 0.2 0.2 FIXED     NONE  0   FIXED
    AC_GEAR TOP_VS      0.0    0.0 127.5 10000  2000 0.2 0.2 0.2 FIXED     NONE  0   FIXED
    AC_GEAR LEFT_VFT  111.1  -24.0 -51.3   200  5000 0.2 0.2 0.2 FIXED     NONE  0   FIXED
    AC_GEAR RIGHT_VFT 111.1   24.0 -51.3   200  5000 0.2 0.2 0.2 FIXED     NONE  0   FIXED
    AC_GEAR INTAKE    350.7    0.0 -41.0 10000  2000 0.2 0.2 0.2 FIXED     NONE  0   FIXED
    AC_GEAR RADOME    525.0    0.0 -13.0 10000  2000 0.2 0.2 0.2 FIXED     NONE  0   FIXED
-->

  </UNDERCARRIAGE>

  <PROPULSION>

    <AC_ENGINE FILE="low_bypass_turbofan">
      XLOC        0.0
      YLOC        0.0
      ZLOC        0.0
      PITCH       0.0
      YAW         0.0
      FEED          0
      FEED          1
      <AC_THRUSTER FILE="direct">
        XLOC        0.0
        YLOC        0.0
        ZLOC        0.0
        PITCH       0.0
        YAW         0.0
      </AC_THRUSTER>
    </AC_ENGINE>

    <AC_TANK TYPE="FUEL" NUMBER="1">
      XLOC      173.0
      YLOC      127.5
      ZLOC        0.0
      RADIUS     78.8
      CAPACITY 3486.0
      CONTENTS 3486.0
    </AC_TANK>

    <AC_TANK TYPE="FUEL" NUMBER="2">
      XLOC      173.0
      YLOC     -127.5
      ZLOC        0.0
      RADIUS     78.8
      CAPACITY 3486.0
      CONTENTS 3486.0
    </AC_TANK>

  </PROPULSION>

  <FLIGHT_CONTROL NAME="F-16 Direct">
    <COMPONENT NAME="Pitch Trim Sum" TYPE="SUMMER">
       INPUT        fcs/elevator-cmd-norm
       INPUT        fcs/pitch-trim-cmd-norm
       CLIPTO       -1 1
    </COMPONENT>
    <COMPONENT NAME="Elevator Control" TYPE="AEROSURFACE_SCALE">
       INPUT         fcs/pitch-trim-sum
       MIN          -25
       MAX           25
       OUTPUT        fcs/elevator-pos-rad
       GAIN          0.01745
     </COMPONENT>
     <COMPONENT NAME="Roll Trim Sum" TYPE="SUMMER">
       INPUT         fcs/aileron-cmd-norm
       INPUT         fcs/roll-trim-cmd-norm
       CLIPTO        -1 1
     </COMPONENT>
     <COMPONENT NAME="Left Aileron Control" TYPE="AEROSURFACE_SCALE">
       INPUT         fcs/roll-trim-sum
       MIN          -21.5
       MAX           21.5
       GAIN          0.01745
       OUTPUT        fcs/left-aileron-pos-rad
     </COMPONENT>
      <COMPONENT NAME="Right Aileron Control" TYPE="AEROSURFACE_SCALE">
       INPUT         fcs/roll-trim-sum
       MIN          -21.5
       MAX           21.5
       GAIN          -0.01745
       OUTPUT        fcs/right-aileron-pos-rad
     </COMPONENT>
     <COMPONENT NAME="Yaw Trim Sum" TYPE="SUMMER">
       INPUT        fcs/rudder-cmd-norm
       INPUT        fcs/yaw-trim-cmd-norm
       CLIPTO       -1 1
     </COMPONENT>
     <COMPONENT NAME="Rudder Control" TYPE="AEROSURFACE_SCALE">
       INPUT        fcs/yaw-trim-sum
       MIN         -30
       MAX          30
       GAIN         0.01745
       OUTPUT       fcs/rudder-pos-rad
     </COMPONENT>
  </FLIGHT_CONTROL>

  <AERODYNAMICS>

    AC_ALPHALIMITS -0.3491 1.5708

    <AXIS NAME="LIFT">

      <GROUP NAME="CLb">
        Basic_lift

        <COEFFICIENT NAME="CLalpha" TYPE="TABLE">
          Lift_due_to_alpha
          20 7
          aero/alpha-rad aero/mag-beta-rad
          aero/qbar-psf|metrics/Sw-sqft
                   0.0000  0.0873  0.1745  0.2618  0.3491  0.4363  0.5236
          -0.3491 -1.0168 -1.0614 -1.0921 -1.0729 -1.0521 -1.0036 -0.9544
          -0.2618 -0.9010 -0.9011 -0.9143 -0.9207 -0.9050 -0.8830 -0.8504
          -0.1745 -0.6644 -0.6746 -0.6806 -0.6839 -0.6815 -0.6874 -0.6858
          -0.0873 -0.2791 -0.2848 -0.2667 -0.2563 -0.2541 -0.2435 -0.2504
           0.0000  0.0250  0.0288  0.0350  0.0490  0.0435  0.0315  0.0060
           0.0873  0.3650  0.3656  0.3643  0.3672  0.3513  0.3238  0.2823
           0.1745  0.7471  0.7388  0.7247  0.7126  0.6771  0.6214  0.5548
           0.2618  1.1019  1.0958  1.0659  1.0338  0.9799  0.9076  0.8243
           0.3491  1.3764  1.3719  1.3408  1.2982  1.2398  1.1741  1.0868
           0.4363  1.5576  1.5551  1.5328  1.4815  1.4268  1.3632  1.2955
           0.5236  1.8158  1.8023  1.7382  1.6697  1.5809  1.4738  1.3787
           0.6109  1.8942  1.8619  1.7609  1.6645  1.5699  1.4624  1.3731
           0.6981  1.8831  1.8393  1.7814  1.6731  1.5815  1.4903  1.3957
           0.7854  1.7318  1.7163  1.6592  1.5554  1.4244  1.2210  1.2622
           0.8727  1.5933  1.5543  1.5082  1.4240  1.3372  1.2399  1.1191
           0.9599  1.3900  1.3539  1.3372  1.2622  1.2194  1.1935  1.1154
           1.0472  1.2033  1.1744  1.1565  1.0871  1.0812  1.0686  1.0338
           1.2217  0.8262  0.8173  0.7674  0.7448  0.7618  0.7509  0.7443
           1.3963  0.4288  0.4301  0.4180  0.4298  0.4332  0.4324  0.4255
           1.5708  0.0864  0.0841  0.0830  0.0811  0.0785  0.0800  0.0834
         </COEFFICIENT>

         <FACTOR NAME="kCLDe" TYPE="TABLE">
           Change_in_lift_due_to_Elevator_Deflection
           20 5
           aero/alpha-rad fcs/elevator-pos-rad
           none
                   -25.0   -10.0    0.0     10.0    25.0
           -0.3491  1.0986  1.0624  1.0000  0.9297  0.6105
           -0.2618  1.1451  1.0737  1.0000  0.8817  0.4737
           -0.1745  1.2138  1.1194  1.0000  0.8543  0.2595
           -0.0873  1.5876  1.2264  1.0000  0.6713  0.3449
            0.0000 -5.8694 -3.1182  1.0000  4.1679  8.2152
            0.0873  0.4688  0.7656  1.0000  1.3015  1.5059
            0.1745  0.6799  0.8575  1.0000  1.0993  1.1903
            0.2618  0.7434  0.8739  1.0000  1.0463  1.0936
            0.3491  0.7994  0.9151  1.0000  1.0041  1.0495
            0.4363  0.8625  0.9636  1.0000  1.0451  1.0384
            0.5236  0.8531  0.9316  1.0000  1.0122  1.0022
            0.6109  0.8924  0.9648  1.0000  1.0504  0.9967
            0.6981  0.8891  0.9646  1.0000  1.0267  0.9739
            0.7854  0.9154  0.9962  1.0000  0.9773  0.9756
            0.8727  0.8919  0.9416  1.0000  0.9928  0.9480
            0.9599  0.9365  0.9421  1.0000  0.9643  0.9301
            1.0472  0.9407  0.9431  1.0000  0.9635  0.9377
            1.2217  1.0035  0.9750  1.0000  0.9639  0.8937
            1.3963  1.1094  1.0491  1.0000  0.9029  0.7474
            1.5708  1.9889  1.5129  1.0000  0.5558 -0.2386
         </FACTOR>

      </GROUP>

      <COEFFICIENT NAME="CLq" TYPE="VECTOR">
         Lift_due_to_pitch_rate
         20
         aero/alpha-rad
         aero/qbar-psf|metrics/Sw-sqft|aero/ci2vel|velocities/q-aero-rad_sec
        -0.3491  22.1327
        -0.2618  22.8390
        -0.1745  23.3714
        -0.0873  29.2527
         0.0000  29.5000
         0.0873  30.5983
         0.1745  31.3315
         0.2618  29.9285
         0.3491  26.9735
         0.4363  26.4243
         0.5236  25.8647
         0.6109  25.2654
         0.6981  30.5158
         0.7854  25.8165
         0.8727  21.7809
         0.9599  16.9775
         1.0472  13.3881
         1.2217  12.5603
         1.3963  2.2312
         1.5708  0.2730
     </COEFFICIENT>

    </AXIS>

    <AXIS NAME="DRAG">

      <GROUP NAME="CDb">
        Basic_drag

          <COEFFICIENT NAME="CDalpha" TYPE="TABLE">
            Drag_due_to_alpha
            20 7
            aero/alpha-rad aero/mag-beta-rad
            aero/qbar-psf|metrics/Sw-sqft
                     0.0000  0.0873  0.1745  0.2618  0.3491  0.4363  0.5236
            -0.3491  0.4694  0.4893  0.5080  0.5023  0.4982  0.4733  0.4566
            -0.2618  0.3427  0.3418  0.3454  0.3504  0.3490  0.3442  0.3324
            -0.1745  0.2169  0.2118  0.2114  0.2130  0.2123  0.2131  0.2079
            -0.0873  0.1031  0.1016  0.0951  0.0877  0.0850  0.0800  0.0755
             0.0000  0.0489  0.0471  0.0442  0.0408  0.0396  0.0373  0.0347
             0.0873  0.0386  0.0374  0.0350  0.0313  0.0293  0.0283  0.0264
             0.1745  0.0820  0.0793  0.0767  0.0759  0.0729  0.0634  0.0614
             0.2618  0.1843  0.1830  0.1792  0.1756  0.1661  0.1557  0.1401
             0.3491  0.3644  0.3609  0.3525  0.3452  0.3230  0.2973  0.2712
             0.4363  0.5829  0.5765  0.5663  0.5437  0.5168  0.4863  0.4658
             0.5236  0.8710  0.8643  0.8383  0.8060  0.7709  0.7132  0.6820
             0.6109  1.1304  1.1121  1.0610  1.0113  0.9546  0.8971  0.8442
             0.6981  1.3775  1.3485  1.3144  1.2419  1.1769  1.0942  1.0249
             0.7854  1.5364  1.5269  1.4754  1.3841  1.2535  1.0545  1.0907
             0.8727  1.6995  1.6584  1.6090  1.5197  1.4143  1.2982  1.1620
             0.9599  1.7759  1.7277  1.7054  1.6066  1.5481  1.5027  1.4011
             1.0472  1.8548  1.8040  1.7814  1.6731  1.6540  1.6330  1.5832
             1.2217  1.9702  1.9401  1.8448  1.7988  1.8277  1.7976  1.7797
             1.3963  1.9593  1.9712  1.9389  1.9957  2.0098  1.9937  1.9345
             1.5708  2.1400  2.1216  2.0665  2.0420  1.9690  2.0190  2.0100
           </COEFFICIENT>

           <FACTOR NAME="kCDDe" TYPE="TABLE">
             Change_in_drag_due_to_elevator_Deflection
             20 5
             aero/alpha-rad fcs/elevator-pos-rad
             none
                     -25.0   -10.0    0.0     10.0    25.0
             -0.3491  1.2663  1.1124  1.0000  0.9345  0.7310
             -0.2618  1.3547  1.1151  1.0000  0.9266  0.7377
             -0.1745  1.4975  1.1462  1.0000  0.9703  0.8096
             -0.0873  1.8558  1.1768  1.0000  1.0458  1.3797
              0.0000  2.4815  1.2994  1.0000  1.2737  2.2924
              0.0873  2.3140  1.1024  1.0000  1.6828  3.4192
              0.1745  1.2539  0.8989  1.0000  1.4176  2.2902
              0.2618  0.9103  0.8271  1.0000  1.2192  1.6353
              0.3491  0.8532  0.8709  1.0000  1.1045  1.3612
              0.4363  0.8722  0.9319  1.0000  1.1281  1.2423
              0.5236  0.8437  0.9021  1.0000  1.0765  1.1531
              0.6109  0.8685  0.9364  1.0000  1.1070  1.1092
              0.6981  0.8537  0.9338  1.0000  1.0753  1.0689
              0.7854  0.8712  0.9657  1.0000  1.0138  1.0669
              0.8727  0.8356  0.9054  1.0000  1.0117  1.0157
              0.9599  0.8753  0.9102  1.0000  0.9854  0.9949
              1.0472  0.8736  0.9105  1.0000  0.9875  1.0126
              1.2217  0.9019  0.9260  1.0000  0.9859  0.9824
              1.3963  0.9175  0.9499  1.0000  0.9848  0.9705
              1.5708  0.9451  0.9702  1.0000  0.9805  0.9616
            </FACTOR>

            <FACTOR NAME="kCDDa" TYPE="VECTOR">
              Change_in_drag_due_to_aileron_Deflection
              3
              aero/alpha-rad
              none
              -0.5236   1.3756
               0.0000   1.0000
               0.5236   1.3756
            </FACTOR>

            <FACTOR NAME="kCDDr" TYPE="VECTOR">
              Drag_due_to_rudder_Deflection
              3
              aero/beta-rad
              none
              -0.5236   1.4061
               0.0000   1.0000
               0.5236   1.4061
            </FACTOR>

      </GROUP>

      <COEFFICIENT NAME="CDq" TYPE="VECTOR">
         Drag_due_to_pitch_rate
         20
         aero/alpha-rad
         aero/qbar-psf|metrics/Sw-sqft|velocities/q-aero-rad_sec|aero/ci2vel
        -0.3491 -9.0698
        -0.2618 -7.1063
        -0.1745 -5.0887
        -0.0873 -4.1152
         0.0000 -1.9000
         0.0873  0.2076
         0.1745  2.5595
         0.2618  4.6029
         0.3491  6.8804
         0.4363  10.0599
         0.5236  13.2010
         0.6109  15.8720
         0.6981  23.2169
         0.7854  24.1053
         0.8727  23.8883
         0.9599  21.4394
         1.0472  21.3688
         1.2217  24.4805
         1.3963  9.1008
         1.5708  2.1600
      </COEFFICIENT>

    </AXIS>

    <AXIS NAME="SIDE">

      <COEFFICIENT NAME="CYo" TYPE="VECTOR">
        Side_force_offset
        20
        aero/alpha-rad
        aero/qbar-psf|metrics/Sw-sqft|aero/beta-rad
        -0.3491  0.0319
        -0.2618  0.0253
        -0.1745  0.0171
        -0.0873  0.0068
         0.0000  0.0000
         0.0873 -0.0006
         0.1745  0.0085
         0.2618  0.0277
         0.3491  0.0439
         0.4363  0.0549
         0.5236  0.0768
         0.6109  0.0921
         0.6981  0.0998
         0.7854  0.0977
         0.8727  0.0981
         0.9599  0.0983
         1.0472  0.0993
         1.2217  0.0963
         1.3963  0.0809
         1.5708  0.0864
      </COEFFICIENT>

      <GROUP NAME="CYb">
        Basic_side_force

          <COEFFICIENT NAME="CYbeta" TYPE="VECTOR">
            Side_force_due_to_beta
            19
            aero/beta-rad
            aero/qbar-psf|metrics/Sw-sqft
            -0.5236  0.6518
            -0.4363  0.5493
            -0.3491  0.4279
            -0.2618  0.3112
            -0.1745  0.2017
            -0.1396  0.1597
            -0.1047  0.1124
            -0.0698  0.0759
            -0.0349  0.0324
             0.0000 -0.0006
             0.0349 -0.0388
             0.0698 -0.0821
             0.1047 -0.1233
             0.1396 -0.1702
             0.1745 -0.2167
             0.2618 -0.3144
             0.3491 -0.4411
             0.4363 -0.5485
             0.5236 -0.6491
           </COEFFICIENT>

           <FACTOR NAME="kCYalpha" TYPE="VECTOR">
             Change_in_side_force_due_to_alpha
             20
             aero/alpha-rad
             none
             -0.3491  0.5558
             -0.2618  0.5676
             -0.1745  0.6427
             -0.0873  0.9133
              0.0000  0.9804
              0.0873  0.9992
              0.1745  0.9691
              0.2618  0.8872
              0.3491  0.7783
              0.4363  0.7236
              0.5236  0.5601
              0.6109  0.4270
              0.6981  0.3691
              0.7854  0.3825
              0.8727  0.3224
              0.9599  0.3151
              1.0472  0.2662
              1.2217  0.1552
              1.3963  0.0928
              1.5708  0.0032
            </FACTOR>

      </GROUP>

      <COEFFICIENT NAME="CYDa" TYPE="VECTOR">
        Side_force_due_to_aileron
        20
        aero/alpha-rad
        aero/qbar-psf|metrics/Sw-sqft|fcs/left-aileron-pos-rad
        -0.3491  0.0088
        -0.2618 -0.0211
        -0.1745  0.0034
        -0.0873  0.0009
         0.0000 -0.0664
         0.0873 -0.1297
         0.1745 -0.0687
         0.2618 -0.0916
         0.3491 -0.0917
         0.4363  0.0424
         0.5236  0.1143
         0.6109  0.0793
         0.6981  0.1881
         0.7854  0.2391
         0.8727  0.1846
         0.9599  0.1397
         1.0472  0.0870
         1.2217  0.0210
         1.3963  0.0041
         1.5708  0.0015
      </COEFFICIENT>

      <COEFFICIENT NAME="CYDr" TYPE="VECTOR">
        Side_force_due_to_rudder
        20
        aero/alpha-rad
        aero/qbar-psf|metrics/Sw-sqft|fcs/rudder-pos-rad
        -0.3491  0.1470
        -0.2618  0.1693
        -0.1745  0.1592
        -0.0873  0.1500
         0.0000  0.1619
         0.0873  0.1754
         0.1745  0.1679
         0.2618  0.1389
         0.3491  0.1722
         0.4363  0.1556
         0.5236  0.0947
         0.6109  0.0715
         0.6981  0.0428
         0.7854 -0.0224
         0.8727 -0.0172
         0.9599 -0.0104
         1.0472  0.0030
         1.2217 -0.0012
         1.3963 -0.0024
         1.5708 -0.0068
      </COEFFICIENT>

    </AXIS>

    <AXIS NAME="ROLL">

      <GROUP NAME="Clb">
        Basic_roll

          <COEFFICIENT NAME="Clbeta" TYPE="TABLE">
            Roll_moment_due_to_beta
            20 7
            aero/alpha-rad aero/mag-beta-rad
            aero/qbar-psf|metrics/Sw-sqft|metrics/bw-ft
                     0.0000  0.0873  0.1745  0.2618  0.3491  0.4363  0.5236
            -0.3491  0.0000 -0.1013 -0.0490 -0.0588 -0.0162  0.0143  0.0361
            -0.2618  0.0000 -0.0651 -0.0332 -0.0583 -0.0239  0.0049  0.0240
            -0.1745  0.0000 -0.0695 -0.0292 -0.0514 -0.0269  0.0030  0.0201
            -0.0873  0.0000 -0.1191 -0.0533 -0.0751 -0.0537 -0.0355 -0.0174
             0.0000  0.0000 -0.1025 -0.0521 -0.0785 -0.0566 -0.0432 -0.0297
             0.0873  0.0000 -0.1231 -0.0599 -0.1022 -0.0837 -0.0694 -0.0600
             0.1745  0.0000 -0.1946 -0.0922 -0.1604 -0.1407 -0.1159 -0.0965
             0.2618  0.0000 -0.2645 -0.1232 -0.2179 -0.1808 -0.1538 -0.1381
             0.3491  0.0000 -0.2538 -0.1261 -0.2193 -0.1968 -0.1855 -0.1699
             0.4363  0.0000 -0.2421 -0.1155 -0.2051 -0.1911 -0.1803 -0.1686
             0.5236  0.0000 -0.1667 -0.0710 -0.0898 -0.0934 -0.1366 -0.1741
             0.6109  0.0000 -0.0710  0.0032 -0.0246 -0.1026 -0.1326 -0.1448
             0.6981  0.0000 -0.1394 -0.0424 -0.0519 -0.1004 -0.1426 -0.1467
             0.7854  0.0000 -0.1635 -0.0590 -0.1018 -0.0996 -0.1357 -0.1453
             0.8727  0.0000 -0.1389 -0.0636 -0.1052 -0.0858 -0.1028 -0.1091
             0.9599  0.0000 -0.1160 -0.0576 -0.1045 -0.0954 -0.0997 -0.1146
             1.0472  0.0000 -0.1219 -0.0539 -0.1071 -0.1050 -0.1055 -0.1202
             1.2217  0.0000 -0.1396 -0.0630 -0.1125 -0.1173 -0.1204 -0.1242
             1.3963  0.0000 -0.1110 -0.0533 -0.1199 -0.1200 -0.1244 -0.1283
             1.5708  0.0000 -0.1012 -0.0441 -0.1022 -0.1102 -0.1165 -0.1290
           </COEFFICIENT>

           <COEFFICIENT NAME="ClDa" TYPE="VECTOR">
             Roll_moment_due_to_aileron
             20
             aero/alpha-rad
             aero/qbar-psf|metrics/Sw-sqft|metrics/bw-ft|fcs/left-aileron-pos-rad
             -0.3491  0.0702
             -0.2618  0.0816
             -0.1745  0.0972
             -0.0873  0.1146
              0.0000  0.1360
              0.0873  0.1420
              0.1745  0.1383
              0.2618  0.1346
              0.3491  0.1205
              0.4363  0.1030
              0.5236  0.0816
              0.6109  0.0639
              0.6981  0.0475
              0.7854  0.0370
              0.8727  0.0248
              0.9599  0.0266
              1.0472  0.0285
              1.2217  0.0302
              1.3963  0.0146
              1.5708  0.0047
           </COEFFICIENT>

           <FACTOR NAME="kClDa" TYPE="VECTOR">
             Change_in_roll_moment_due_to_aileron_due_to_beta
             19
             aero/beta-rad
             none
             -0.5236  1.1275
             -0.4363  1.2671
             -0.3491  1.0240
             -0.2618  0.9523
             -0.1745  0.6657
             -0.1396  1.0075
             -0.1047  0.7482
             -0.0698  0.9616
             -0.0349  1.0401
              0.0000  1.0077
              0.0349  1.0157
              0.0698  1.0257
              0.1047  1.0486
              0.1396  1.0834
              0.1745  0.7857
              0.2618  0.9156
              0.3491  1.0705
              0.4363  1.1236
              0.5236  0.8564
            </FACTOR>

      </GROUP>

      <COEFFICIENT NAME="ClDr" TYPE="VECTOR">
        Roll_moment_due_to_rudder
        20
        aero/alpha-rad
        aero/qbar-psf|metrics/Sw-sqft|metrics/bw-ft|fcs/rudder-pos-rad
        -0.3491  0.0417
        -0.2618  0.0375
        -0.1745  0.0359
        -0.0873  0.0296
         0.0000  0.0281
         0.0873  0.0285
         0.1745  0.0279
         0.2618  0.0261
         0.3491  0.0263
         0.4363  0.0233
         0.5236  0.0064
         0.6109  0.0243
         0.6981  0.0114
         0.7854  0.0084
         0.8727  0.0001
         0.9599  0.0011
         1.0472  0.0053
         1.2217  0.0064
         1.3963  0.0013
         1.5708  0.0062
      </COEFFICIENT>

      <COEFFICIENT NAME="Clp" TYPE="VECTOR">
        Roll_moment_due_to_roll_rate_(roll_damping)
        20
        aero/alpha-rad
        aero/qbar-psf|metrics/Sw-sqft|aero/bi2vel|velocities/p-aero-rad_sec
        -0.3491 -0.3660
        -0.2618 -0.3660
        -0.1745 -0.3660
        -0.0873 -0.3770
         0.0000 -0.3450
         0.0873 -0.4340
         0.1745 -0.4080
         0.2618 -0.3880
         0.3491  0.3290
         0.4363 -0.2940
         0.5236 -0.2300
         0.6109 -0.2100
         0.6981 -0.1200
         0.7854 -0.1000
         0.8727 -0.1000
         0.9599 -0.1200
         1.0472 -0.1400
         1.2217 -0.1000
         1.3963 -0.1500
         1.5708 -0.2000
      </COEFFICIENT>

      <COEFFICIENT NAME="Clr" TYPE="VECTOR">
        Roll_moment_due_to_yaw_rate
        20
        aero/alpha-rad
        aero/qbar-psf|metrics/Sw-sqft|aero/bi2vel|velocities/r-aero-rad_sec
        -0.3491 -0.1550
        -0.2618 -0.1550
        -0.1745 -0.1550
        -0.0873 -0.2010
         0.0000 -0.0024
         0.0873  0.0880
         0.1745  0.2050
         0.2618  0.2200
         0.3491  0.3190
         0.4363  0.4370
         0.5236  0.6800
         0.6109  0.1000
         0.6981  0.4470
         0.7854 -0.3300
         0.8727 -0.0680
         0.9599  0.1180
         1.0472  0.0802
         1.2217  0.0529
         1.3963  0.0868
         1.5708 -0.0183
      </COEFFICIENT>

    </AXIS>

    <AXIS NAME="PITCH">

      <COEFFICIENT NAME="Cmalpha" TYPE="TABLE">
        Pitch_moment_due_to_alpha
        20 7
        aero/alpha-rad aero/mag-beta-rad
        aero/qbar-psf|metrics/Sw-sqft|metrics/cbarw-ft
                 0.0000  0.0873  0.1745  0.2618  0.3491  0.4363  0.5236
        -0.3491  0.0127  0.0025  0.0116  0.0490  0.0681  0.0780  0.1039
        -0.2618 -0.0755 -0.0533 -0.0264  0.0137  0.0242  0.0334  0.0510
        -0.1745 -0.1025 -0.0644 -0.0417 -0.0095  0.0187  0.0154  0.0331
        -0.0873 -0.0744 -0.0787 -0.0764 -0.0561 -0.0395 -0.0246 -0.0250
         0.0000 -0.0598 -0.0618 -0.0641 -0.0623 -0.0589 -0.0472 -0.0534
         0.0873 -0.0498 -0.0512 -0.0526 -0.0533 -0.0557 -0.0630 -0.0556
         0.1745 -0.0437 -0.0466 -0.0497 -0.0532 -0.0558 -0.0620 -0.0664
         0.2618 -0.0407 -0.0449 -0.0510 -0.0563 -0.0645 -0.0743 -0.0642
         0.3491 -0.0342 -0.0439 -0.0517 -0.0570 -0.0663 -0.0755 -0.0615
         0.4363 -0.0507 -0.0520 -0.0554 -0.0660 -0.0766 -0.0884 -0.0637
         0.5236 -0.0459 -0.0532 -0.0731 -0.0884 -0.0885 -0.1011 -0.0407
         0.6109 -0.0605 -0.0633 -0.0771 -0.0905 -0.0947 -0.0748 -0.0250
         0.6981 -0.0835 -0.0920 -0.0889 -0.0834 -0.0750 -0.0176  0.0236
         0.7854 -0.0923 -0.1037 -0.1085 -0.1077 -0.0749 -0.0670 -0.0152
         0.8727 -0.0826 -0.0980 -0.1001 -0.0785 -0.0511 -0.0389 -0.0357
         0.9599 -0.0738 -0.0824 -0.0739 -0.0803 -0.0901 -0.0385 -0.0779
         1.0472 -0.1414 -0.1327 -0.1521 -0.1715 -0.1736 -0.1478 -0.1836
         1.2217 -0.3216 -0.3101 -0.3678 -0.3678 -0.3633 -0.3787 -0.3637
         1.3963 -0.4678 -0.4762 -0.4836 -0.5041 -0.5261 -0.5163 -0.4809
         1.5708 -0.6184 -0.6157 -0.6091 -0.6185 -0.6185 -0.6326 -0.6356
      </COEFFICIENT>

      <COEFFICIENT NAME="CmDh" TYPE="TABLE">
        Pitch_moment_due_to_elevator_Deflection
        20 5
        aero/alpha-rad fcs/elevator-pos-rad
        aero/qbar-psf|metrics/Sw-sqft|metrics/cbarw-ft
                -25.0   -10.0    0.0     10.0    25.0
        -0.3491  0.1470  0.0668  0.0000 -0.0818 -0.1885
        -0.2618  0.1685  0.0781  0.0000 -0.0851 -0.2062
        -0.1745  0.1780  0.0726  0.0000 -0.1016 -0.2107
        -0.0873  0.1885  0.0814  0.0000 -0.1026 -0.1796
         0.0000  0.1928  0.0975  0.0000 -0.0885 -0.1684
         0.0873  0.1981  0.0987  0.0000 -0.0912 -0.1690
         0.1745  0.2130  0.0919  0.0000 -0.0814 -0.1579
         0.2618  0.2356  0.1074  0.0000 -0.0839 -0.1408
         0.3491  0.2373  0.0970  0.0000 -0.0682 -0.1351
         0.4363  0.2311  0.0912  0.0000 -0.0714 -0.1235
         0.5236  0.2179  0.0860  0.0000 -0.0783 -0.1010
         0.6109  0.1887  0.0678  0.0000 -0.0830 -0.0820
         0.6981  0.1658  0.0546  0.0000 -0.0640 -0.0507
         0.7854  0.1489  0.0395  0.0000 -0.0631 -0.0238
         0.8727  0.0948  0.0409  0.0000 -0.0418 -0.0460
         0.9599  0.0786  0.0394  0.0000 -0.0193 -0.0513
         1.0472  0.0768  0.0451  0.0000 -0.0138 -0.0098
         1.2217  0.0919  0.0237  0.0000  0.0211  0.0231
         1.3963  0.1269  0.0471  0.0000 -0.0077  0.0169
         1.5708  0.1116  0.0332  0.0000  0.0066  0.0347
      </COEFFICIENT>

      <COEFFICIENT NAME="Cmq" TYPE="VECTOR">
        Pitch_moment_due_to_pitch_rate
        20
        aero/alpha-rad
        aero/qbar-psf|metrics/Sw-sqft|aero/ci2vel|velocities/q-aero-rad_sec
        -0.3491 -6.8400
        -0.2618 -6.8400
        -0.1745 -6.8400
        -0.0873 -3.4200
         0.0000 -5.4800
         0.0873 -5.4500
         0.1745 -6.0200
         0.2618 -6.7000
         0.3491 -5.6900
         0.4363 -6.0000
         0.5236 -6.2000
         0.6109 -6.4000
         0.6981 -6.6000
         0.7854 -6.0000
         0.8727 -5.5000
         0.9599 -5.0000
         1.0472 -4.5000
         1.2217 -3.5000
         1.3963 -5.6000
         1.5708 -4.0400
      </COEFFICIENT>

    </AXIS>

    <AXIS NAME="YAW">

      <COEFFICIENT NAME="Cnb" TYPE="VECTOR">
        Yaw_moment_due_to_beta
        20
        aero/alpha-rad
        aero/qbar-psf|metrics/Sw-sqft|metrics/bw-ft|aero/beta-rad
        -0.3491  0.0853
        -0.2618  0.1172
        -0.1745  0.1489
        -0.0873  0.2017
         0.0000  0.2234
         0.0873  0.2278
         0.1745  0.2210
         0.2618  0.1946
         0.3491  0.1320
         0.4363  0.1128
         0.5236 -0.0136
         0.6109 -0.1389
         0.6981 -0.1750
         0.7854 -0.2548
         0.8727 -0.1561
         0.9599 -0.0414
         1.0472  0.0504
         1.2217  0.0463
         1.3963 -0.0614
         1.5708 -0.0346
      </COEFFICIENT>

      <COEFFICIENT NAME="CnDa" TYPE="VECTOR">
        Yaw_moment_due_to_aileron
        20
        aero/alpha-rad
        aero/qbar-psf|metrics/Sw-sqft|metrics/bw-ft|fcs/left-aileron-pos-rad
        -0.3491  0.0389
        -0.2618  0.0294
        -0.1745  0.0292
        -0.0873  0.0324
         0.0000  0.0355
         0.0873  0.0320
         0.1745  0.0271
         0.2618  0.0228
         0.3491  0.0093
         0.4363 -0.0130
         0.5236 -0.0186
         0.6109 -0.0332
         0.6981 -0.0263
         0.7854  0.0040
         0.8727 -0.0076
         0.9599 -0.0203
         1.0472 -0.0385
         1.2217 -0.0589
         1.3963 -0.0463
         1.5708 -0.0383
      </COEFFICIENT>

      <COEFFICIENT NAME="CnDr" TYPE="VECTOR">
        Yaw_moment_due_to_rudder
        20
        aero/alpha-rad
        aero/qbar-psf|metrics/Sw-sqft|metrics/bw-ft|fcs/rudder-pos-rad
        -0.3491 -0.0469
        -0.2618 -0.0419
        -0.1745 -0.0423
        -0.0873 -0.0411
         0.0000 -0.0406
         0.0873 -0.0409
         0.1745 -0.0400
         0.2618 -0.0391
         0.3491 -0.0426
         0.4363 -0.0399
         0.5236 -0.0326
         0.6109 -0.0279
         0.6981 -0.0213
         0.7854 -0.0219
         0.8727 -0.0175
         0.9599 -0.0115
         1.0472 -0.0055
         1.2217 -0.0004
         1.3963 -0.0016
         1.5708 -0.0040
      </COEFFICIENT>

      <COEFFICIENT NAME="Cnr" TYPE="VECTOR">
        Yaw_moment_due_to_yaw_rate
        20
        aero/alpha-rad
        aero/qbar-psf|metrics/Sw-sqft|aero/bi2vel|velocities/r-aero-rad_sec
        -0.3491 -0.5170
        -0.2618 -0.5170
        -0.1745 -0.5170
        -0.0873 -0.4610
         0.0000 -0.4140
         0.0873 -0.3970
         0.1745 -0.3730
         0.2618 -0.4550
         0.3491 -0.5500
         0.4363 -0.5820
         0.5236 -0.5950
         0.6109 -0.6370
         0.6981 -1.0200
         0.7854 -0.8400
         0.8727 -0.5410
         0.9599 -0.3500
         1.0472 -0.3500
         1.2217 -0.0700
         1.3963 -0.1500
         1.5708 -0.1500
      </COEFFICIENT>

      <COEFFICIENT NAME="Cnp" TYPE="VECTOR">
        Yaw_moment_due_to_roll_rate
        20
        aero/alpha-rad
        aero/qbar-psf|metrics/Sw-sqft|aero/bi2vel|velocities/p-aero-rad_sec
        -0.3491 -0.0006
        -0.2618 -0.0006
        -0.1745 -0.0006
        -0.0873  0.0424
         0.0000 -0.0075
         0.0873 -0.0214
         0.1745 -0.0320
         0.2618 -0.0320
         0.3491  0.0500
         0.4363  0.1500
         0.5236  0.1300
         0.6109  0.1580
         0.6981  0.2400
         0.7854  0.1500
         0.8727  0.0000
         0.9599 -0.2000
         1.0472 -0.3000
         1.2217  0.1500
         1.3963  0.0000
         1.5708  0.0000
      </COEFFICIENT>

    </AXIS>

  </AERODYNAMICS>

  <OUTPUT NAME="f16.csv" TYPE="NONE">
    RATE_IN_HZ       20
    SIMULATION       ON
    ATMOSPHERE       OFF
    MASSPROPS        OFF
    AEROSURFACES     ON
    RATES            ON
    VELOCITIES       ON
    FORCES           ON
    MOMENTS          ON
    POSITION         ON
    COEFFICIENTS     OFF
    GROUND_REACTIONS ON
    FCS              ON
    PROPULSION       ON
  </OUTPUT>

</FDM_CONFIG>
