<?xml version="1.0"?>
<?xml-stylesheet type="text/xsl" href="http://jsbsim.sourceforge.net/JSBSim.xsl"?>
<fdm_config name="General Dynamics F-16A" version="2.0" release="PRODUCTION"
    xmlns:xsi="http://www.w3.org/2001/XMLSchema-instance"
    xsi:noNamespaceSchemaLocation="http://jsbsim.sourceforge.net/JSBSim.xsd">

    <fileheader>
             <author>Erik Hofman </author>
             <filecreationdate> 2004-01-01 </filecreationdate>
            <version> $Revision: 1.3 $ </version>
            <description> Models an F-22A Raptor </description>
            <license>
             <licenseName>GPL (General Public License)</licenseName>
             <licenseURL>http://www.gnu.org/licenses/gpl.html</licenseURL>
            </license>
            <note>
             This model was created using data that is, or has been, publically
             available by means of technical reports, textbooks, image graphs or
             published code. This aircraft description file is in no way related
             to the manufacturer of the real aircraft.
            Neither the name of (any of) the authors nor the names of (any of) the
             manufacturers may be used to endorse or promote products derived from
             this file.

             The data is provided ''as is'' and any express or implied
             warranties, including, but not limitted to the implied warranties of
             merchantability and fitness for a particular purpose are disclaimed.
            </note>
        </fileheader>

        <metrics>
            <wingarea unit="FT2"> 840.0 </wingarea>
            <wingspan unit="FT"> 44.49 </wingspan>
            <chord unit="FT"> 23.06 </chord>
            <htailarea unit="FT2"> 238.9 </htailarea>
            <htailarm unit="FT"> 18.66 </htailarm>
            <vtailarea unit="FT2"> 158.2 </vtailarea>
            <vtailarm unit="FT"> 0 </vtailarm>
            <location name="AERORP" unit="IN">
                <x> 417.6 </x>
                <y> 0 </y>
                <z> 0 </z>
            </location>
            <location name="EYEPOINT" unit="IN">
                <x> 148.8 </x>
                <y> 0 </y>
                <z> 38 </z>
            </location>
            <location name="VRP" unit="IN">
                <x> 100 </x>
                <y> 0 </y>
                <z> 0 </z>
            </location>
        </metrics>

        <mass_balance>
            <ixx unit="SLUG*FT2"> 40843 </ixx>
            <iyy unit="SLUG*FT2"> 204751 </iyy>
            <izz unit="SLUG*FT2"> 258201 </izz>
            <ixz unit="SLUG*FT2"> 520 </ixz>
            <emptywt unit="LBS"> 43430 </emptywt>
            <location name="CG" unit="IN">
                <x> 445.7 </x>
                <y> 0 </y>
                <z> -18.6 </z>
            </location>
            <pointmass name="Pilot">
                <weight unit="LBS"> 230 </weight>
                <location name="POINTMASS" unit="IN">
                    <x> 148.8 </x>
                    <y> 0 </y>
                    <z> 20 </z>
                </location>
            </pointmass>
        </mass_balance>

        <ground_reactions>
            <contact type="BOGEY" name="NOSE_LG">
                <location unit="IN">
                    <x> 96.7 </x>
                    <y> 0 </y>
                    <z> -89.3 </z>
                </location>
                <static_friction> 0.8 </static_friction>
                <dynamic_friction> 0.5 </dynamic_friction>
                <rolling_friction> 0.02 </rolling_friction>
                <spring_coeff unit="LBS/FT"> 18603.4 </spring_coeff>
                <damping_coeff unit="LBS/FT/SEC"> 6201.1 </damping_coeff>
                <max_steer unit="DEG"> 80 </max_steer>
               <brake_group> NONE </brake_group>
                <retractable>1</retractable>
            </contact>
            <contact type="BOGEY" name="LEFT_MLG">
                <location unit="IN">
                    <x> 468.8 </x>
                    <y> -48 </y>
                    <z> -89.3 </z>
               </location>
                <static_friction> 0.8 </static_friction>
                <dynamic_friction> 0.5 </dynamic_friction>
               <rolling_friction> 0.02 </rolling_friction>
               <spring_coeff unit="LBS/FT"> 62011.2 </spring_coeff>
               <damping_coeff unit="LBS/FT/SEC"> 12402.2 </damping_coeff>
               <max_steer unit="DEG"> 0.0 </max_steer>
               <brake_group> LEFT </brake_group>
               <retractable>1</retractable>
           </contact>
           <contact type="BOGEY" name="RIGHT_MLG">
               <location unit="IN">
                   <x> 468.8 </x>
                   <y> 48 </y>
                   <z> -89.3 </z>
               </location>
               <static_friction> 0.8 </static_friction>
               <dynamic_friction> 0.5 </dynamic_friction>
               <rolling_friction> 0.02 </rolling_friction>
               <spring_coeff unit="LBS/FT"> 62011.2 </spring_coeff>
               <damping_coeff unit="LBS/FT/SEC"> 12402.2 </damping_coeff>
               <max_steer unit="DEG"> 0.0 </max_steer>
               <brake_group> RIGHT </brake_group>
               <retractable>1</retractable>
           </contact>
       </ground_reactions>
    <propulsion>
           <engine file="F119-PW-1">
               <location unit="IN">
                   <x> 684.131 </x>
                   <y> -20 </y>
                   <z> 0 </z>
               </location>
               <orient unit="DEG">
                   <roll> 0.0 </roll>
                   <pitch> 0 </pitch>
                   <yaw> 0 </yaw>
               </orient>
               <feed>0</feed>
                        <feed>1</feed>
               <thruster file="direct">
                   <location unit="IN">
                       <x> 684.131 </x>
                       <y>-20 </y>
                      <z> 0 </z>
                   </location>
                   <orient unit="DEG">
                       <roll> 0.0 </roll>
                       <pitch> 0.0 </pitch>
                       <yaw> 0.0 </yaw>
                   </orient>
               </thruster>
           </engine>
           <engine file="F119-PW-1">
               <location unit="IN">
                   <x> 684.131 </x>
                   <y> 20 </y>
                   <z> 0 </z>
               </location>
               <orient unit="DEG">
                   <roll> 0.0 </roll>
                   <pitch> 0 </pitch>
                   <yaw> 0 </yaw>
               </orient>
               <feed>0</feed>
                        <feed>1</feed>
               <thruster file="direct">
                   <location unit="IN">
                       <x> 684.131 </x>
                       <y> 20 </y>
                       <z> 0 </z>
                  </location>
                   <orient unit="DEG">
                       <roll> 0.0 </roll>
                       <pitch> 0.0 </pitch>
                       <yaw> 0.0 </yaw>
                   </orient>
               </thruster>
           </engine>
        <tank type="FUEL">
               <location unit="IN">
                   <x> 446.478 </x>
                   <y> 0 </y>
                   <z> -18.6033 </z>
               </location>
               <capacity unit="LBS"> 9350 </capacity>
               <contents unit="LBS"> 9350 </contents>
           </tank>
           <tank type="FUEL">
               <location unit="IN">
                   <x> 446.478 </x>
                   <y> 0 </y>
                   <z> -18.6033 </z>
               </location>
               <capacity unit="LBS"> 9350 </capacity>
               <contents unit="LBS"> 9350 </contents>
           </tank>

    </propulsion>
    <flight_control name="F-22 FC">

      <!-- Declare some interface properties -->
        <property>fcs/alpha-norm</property>
                <property>fcs/tvc-pos-norm</property>
                <property>fcs/tvc-pos-rad</property>
                <property>fcs/thrust-norm</property>
                <property>fcs/lef-pos-rad</property>
                <channel name="Lateral">

                        <!-- Normalize the u-velocity to m/s-->
                        <pure_gain name="u velocity norm">
                                <input>velocities/u-fps</input>
                                <gain>0.3048</gain>
                        </pure_gain>

                        <summer name="aileron cmd limiter">
                                <input>fcs/aileron-cmd-norm</input>
                                <input>fcs/roll-trim-cmd-norm</input>
                                <clipto>
                                        <min>-1</min>
                                        <max>1</max>
                                </clipto>
                        </summer>

                         <switch name="roll rate limit">
                          <default value="4"/>
                          <test logic="AND" value=".4">
                                 aero/alpha-deg gt 40
                                 aero/alpha-deg lt -25
                     </test>
                           <test logic="OR" value=".67">
                         velocities/mach le .2
                     </test>
                     <test logic="OR" value="1">
                         velocities/mach le .25
                                 aero/alpha-deg gt 35
                                 aero/alpha-deg lt -20
                     </test>
                           <test logic="OR" value="1.3">
                         velocities/mach le .27
                                aero/alpha-deg gt 30
                                aero/alpha-deg lt -10
                     </test>
                           <test logic="OR" value="1.5">
                         velocities/mach le .3
                                aero/alpha-deg gt 25
                     </test>
                           <test logic="OR" value="2.1">
                         velocities/mach le .35
                                velocities/mach ge 1.3
                                aero/alpha-deg gt 20
                     </test>
                     <test logic="OR" value="2.617">
                         velocities/mach le .45
                                velocities/mach ge 1.1
                                aero/alpha-deg gt 15
                     </test>
                     <test logic="OR" value="3.14">
                         velocities/mach le .5
                                 aero/alpha-deg gt 10
                     </test>
                     <test logic="AND" value="3.66">
                         velocities/mach le .6
                     </test>
<!-- limit high alpha rolls. Currently not working
                                <test logic="AND" value="-0.1">
                         attitude/roll-rad gt 3
                                 aero/alpha-deg gt 30
                             </test>
                            <test logic="AND" value="-0.1">
                         attitude/roll-rad gt 1.53
                                 aero/alpha-deg gt 35
                     </test>
                                <test logic="AND" value="-0.1">
                         attitude/roll-rad gt .47
                                 aero/alpha-deg gt 40
                     </test>
-->
                    </switch>


                        <!-- Calculate the normalized commanded roll rate absolutely limited to +230 deg/s -230 deg/s-->
                        <pure_gain name="roll rate cmd">
                                <input>fcs/aileron-cmd-limiter</input>
                                <gain>fcs/roll-rate-limit</gain>
                                  <clipto>
                                        <min>-4</min>
                                        <max>4</max>
                                </clipto>
                        </pure_gain>


                        <summer name="roll rate error">
                                <input>fcs/roll-rate-cmd</input>
                                <input>-velocities/p-aero-rad_sec</input>
                        </summer>


                        <integrator name="roll rate integrator">

                                <input>fcs/roll-rate-error</input>
                                <c1> 1 </c1>
                        </integrator>


                        <!-- Normalize the v-velocity to m/s-->
                        <pure_gain name="v velocity norm">
                                <input>velocities/v-fps</input>
                                <gain>0.3048</gain>
                        </pure_gain>

                        <pure_gain name="rudder cmd limiter">
                                <input>fcs/rudder-cmd-norm</input>
                                <clipto>
                                        <min>-1</min>
                                        <max>1</max>
                                </clipto>
                        </pure_gain>

                        <!-- Calculate the normalized commanded yaw rate limited to +30 deg/s -30 deg/s -->
                        <switch name="yaw limiter">
                          <default value="-.5236"/>
                     <test logic="OR" value="0">
                       velocities/r-aero-rad_sec gt 0.5
                                aero/beta-rad gt 0.5236
                     </test>
                                <test logic="OR" value="0">
                       velocities/r-aero-rad_sec lt -0.5
                                aero/beta-rad lt -0.5236
                     </test>
                     </switch>
<!-- Rudder over-ride system to limit Beta. Still testing -->
                        <switch name="rudder override">
                          <default value="0"/>
                     <test logic="OR" value=".1">
                       velocities/r-aero-rad_sec gt 0.53
                                aero/beta-rad gt 0.5236
                     </test>
                                <test logic="OR" value="-.1">
                       velocities/r-aero-rad_sec lt -0.53
                                aero/beta-rad lt -0.5236
                     </test>
                     </switch>


                        <pure_gain name="yaw rate cmd">
                                <input>fcs/rudder-cmd-limiter</input>
                                <gain>fcs/yaw-limiter</gain>
                        </pure_gain>

                        <summer name="yaw rate error">
                                <input>fcs/yaw-rate-cmd</input>
                                <input>-velocities/r-aero-rad_sec</input>
                                <input>fcs/rudder-override</input>

                        </summer>

                        <integrator name="yaw rate integrator">
                                <input>fcs/yaw-rate-error</input>
                                <c1> 1 </c1>
                        </integrator>

                        <!-- aileron control -->
                        <fcs_function name="roll cmd">

                                <function>
                                          <sum>

                                                <product>
                                                        <property>fcs/roll-rate-integrator</property>

                                                        <table>
                                                                <independentVar lookup="row">velocities/vc-kts</independentVar>
                                                                <independentVar lookup="column">position/h-sl-ft</independentVar>
                                                                <tableData>
                                                                        3000  30000        50000
                                                                        150        0.4   0.4   0.4
                                                                        200        0.45        0.4        0.4
                                                                        250        0.5   0.45   0.4
                                                                        300        0.55   0.55   0.55
                                                                           350        0.65   0.65   0.6
                                                                        375        0.75   .75   0.7
                                                                           400        0.9   0.85        0.8
                                                                           425        1           0.9   0.8
                                                                           550        1           0.9   0.8


                                                                </tableData>
                                                        </table>

                                                        <table>
                                                                <independentVar lookup="row">velocities/vc-kts</independentVar>
                                                                <independentVar lookup="column">position/h-sl-ft</independentVar>
                                                                <tableData>
                                                                                3000 30000        50000
                                                                        150        94.0974   92.1478   92.1478
                                                                        250        94.0974   92.1478   92.1478
                                                                           350        94.0974   92.1478   92.1478
                                                                           400        73.6737   80.9187   90.8647
                                                                           450        66.6098   66.6098   70.0925
                                                                           550        62.1315   62.1315   62.1315


                                                                </tableData>
                                                        </table>
                                                </product>

                                                <product>
                                                        <property>fcs/yaw-rate-integrator</property>

                                                        <table>
                                                                <independentVar lookup="row">velocities/vc-kts</independentVar>
                                                                <independentVar lookup="column">position/h-sl-ft</independentVar>
                                                                <tableData>
                                                                                3000  30000        50000
                                                                        150        5.5281    6.2373    6.2373
                                                                        250        5.5281    6.2373    6.2373
                                                                            350        5.5281    6.2373    6.2373
                                                                            400        3.3472    3.7187    4.2666
                                                                            450        2.8013    2.8013    3.0051
                                                                            550        3.5473    3.5473    3.5473


                                                                </tableData>
                                                        </table>
                                                </product>

                                                <product>

                                                        <property>fcs/v-velocity-norm</property>

                                                        <table>
                                                                <independentVar lookup="row">velocities/vc-kts</independentVar>
                                                                <independentVar lookup="column">position/h-sl-ft</independentVar>
                                                                <tableData>
                                                                                3000  30000        50000
                                                                        150        -0.0036    0.0029    0.0029
                                                                        250        -0.0036    0.0029    0.0029
                                                                           350        -0.0036    0.0029    0.0029
                                                                           400        -0.0045   -0.0045   -0.0045
                                                                           450        -0.0015   -0.0015   -0.0015
                                                                           550        -0.0048   -0.0048   -0.0048


                                                                </tableData>
                                                        </table>
                                                </product>

                                                <product>
                                                        <property>velocities/p-aero-rad_sec</property>
                                                        <value>1</value>
                                                        <table>
                                                                <independentVar lookup="row">velocities/vc-kts</independentVar>
                                                                <independentVar lookup="column">position/h-sl-ft</independentVar>
                                                                <tableData>
                                                                                3000  30000        50000
                                                                        150        -40.8010  -44.1877  -44.1877
                                                                        250        -40.8010  -44.1877  -44.1877
                                                                          350        -40.8010  -44.1877  -44.1877
                                                                          400        -32.4476  -35.6877  -40.1360
                                                                          450        -29.1660  -29.1660  -30.7231
                                                                          550        -28.4368  -28.4368  -28.4368


                                                                </tableData>
                                                        </table>
                                                </product>
                                                <product>
                                                        <property>velocities/r-aero-rad_sec</property>

                                                        <table>
                                                                <independentVar lookup="row">velocities/vc-kts</independentVar>
                                                                <independentVar lookup="column">position/h-sl-ft</independentVar>
                                                                <tableData>
                                                                        3000  30000        50000
                                                                        150        -20.0898  -22.4372  -22.4372
                                                                        250        -20.0898  -22.4372  -22.4372
                                                                          350        -20.0898  -22.4372  -22.4372
                                                                          400        -12.5133  -13.8069  -15.7125
                                                                          450        -10.0492  -10.0492  -10.7566
                                                                          550         -6.6819   -6.6819   -6.6819

                                                                </tableData>
                                                        </table>
                                                </product>

                                                <product>
                                                        <property>attitude/roll-rad</property>

                                                        <table>
                                                                <independentVar lookup="row">velocities/vc-kts</independentVar>
                                                                <independentVar lookup="column">position/h-sl-ft</independentVar>
                                                                <tableData>
                                                                        3000  30000        50000
                                                                        150        -0.0089   -4.6675   -4.6675
                                                                        250        -0.0089   -4.6675   -4.6675
                                                                           350        -0.0089   -4.6675   -4.6675
                                                                           400        -0.0079   -0.0071   -0.0063
                                                                           450        -0.0008   -0.0008   -0.0007
                                                                           550        -1.2414   -1.2414   -1.2414

                                                                </tableData>
                                                        </table>
                                                </product>
                                        </sum>
                                </function>
                        </fcs_function>


                        <aerosurface_scale name="roll reg scale">
                                <input> fcs/roll-cmd </input>
                                <domain>
                                        <min> -5 </min>
                                        <max> 5 </max>
                                </domain>
                                <range>
                                        <min> -1 </min>
                                        <max> 1 </max>
                                </range>
                        </aerosurface_scale >

<!--
                        <kinematic name="aileron rate">
                                <input>fcs/roll-reg-scale</input>
                                <traverse>
                                        <setting>
                                                <position>-1</position>
                                                <time>0.357</time>
                                        </setting>
                                        <setting>
                                                <position>1</position>
                                                <time>0.357</time>
                                        </setting>
                                </traverse>
                                <output>fcs/left-aileron-pos-norm</output>
                        </kinematic>

        -->

                        <actuator name="left aileron pos rad">
                                <input> fcs/roll-reg-scale</input>
                                <lag> 0.00 </lag>
                                <rate_limit> 1.22 </rate_limit>

                                <clipto>

                                        <min> -0.4363 </min>
                                        <max> 0.4363 </max>
                                </clipto>
                                <output>fcs/left-aileron-pos-rad</output>
                        </actuator>


                        <aerosurface_scale name="Left Aileron Control">
                                <input>fcs/left-aileron-pos-rad</input>
                                <domain>
                                        <min>-0.436</min>
                                        <max>0.436</max>
                                </domain>
                                <range>
                                        <min>-1</min>
                                        <max>1</max>
                                </range>
                                <output>fcs/left-aileron-pos-norm</output>
                        </aerosurface_scale>

                        <aerosurface_scale name="Right Aileron Control">
                                <input>-fcs/left-aileron-pos-norm</input>
                                <range>
                                        <min>-1.0</min>
                                        <max>1.0</max>
                                </range>
                                <output>fcs/right-aileron-pos-norm</output>
                        </aerosurface_scale>


                        <!-- version 1 rudder control "weak rudder" with no roll command input. Needs work-->
                        <fcs_function name="yaw cmd">

                                <function>
                                   <product>
                                        <sum>
                                                <product>
                                                        <property>fcs/roll-rate-integrator</property>
                                                        <value>-1</value>
                                                        <table>
                                                                <independentVar lookup="row">velocities/vc-kts</independentVar>
                                                                <independentVar lookup="column">position/h-sl-ft</independentVar>
                                                                <tableData>
                                                                        3000  30000        50000
                                                                        150        -4.2404        -4.2404        -4.2404
                                                                        250        -26.2505  -23.6881  -23.6881
                                                                          350        -21.9894  -24.0517  -24.0517
                                                                          400        -10.6942  -11.9818  -13.9546
                                                                           450        -6.9281   -6.9281   -7.4736
                                                                           550        -8.2870   -8.2870   -8.2870


                                                                </tableData>
                                                        </table>
                                                </product>

                                                <product>
                                                        <property>fcs/yaw-rate-integrator</property>
                                                        <value>-2</value>
                                                        <table>
                                                                <independentVar lookup="row">velocities/vc-kts</independentVar>
                                                                <independentVar lookup="column">position/h-sl-ft</independentVar>
                                                                <tableData>
                                                                        3000  30000        50000
                                                                        150        49.2433        49.2433        49.2433
                                                                        250        48.7979   43.9395   43.9395
                                                                           350        42.0933   39.9357   39.9357
                                                                           400        25.4844   28.4765   32.8514
                                                                           450        20.5395   20.5395   22.0092
                                                                           550        15.5471   15.5471   15.5471


                                                                </tableData>
                                                        </table>
                                                </product>

                                                <product>

                                                        <property>fcs/v-velocity-norm</property>
                                                        <value>-1</value>
                                                        <table>
                                                                <independentVar lookup="row">velocities/vc-kts</independentVar>
                                                                <independentVar lookup="column">position/h-sl-ft</independentVar>
                                                                <tableData>
                                                                        3000  30000        50000
                                                                        150        -0.0400        -0.0400        -0.0400
                                                                        250        0.0131    0.0776    0.0776
                                                                            350        0.0132    0.0785    0.0785
                                                                           400        -0.0020   -0.0020   -0.0020
                                                                           450        -0.0016   -0.0016   -0.0016
                                                                           550        -0.0225   -0.0225   -0.0225


                                                                </tableData>
                                                        </table>
                                                </product>

                                                <product>
                                                        <property>velocities/p-aero-rad_sec</property>
                                                        <value>-1</value>
                                                        <table>
                                                                <independentVar lookup="row">velocities/vc-kts</independentVar>
                                                                <independentVar lookup="column">position/h-sl-ft</independentVar>
                                                                <tableData>
                                                                        3000  30000        50000
                                                                        150        1.9094        1.9094        1.9094
                                                                        250        10.7155    8.0669    8.0669
                                                                            350        8.8234    8.5358    8.5358
                                                                            400        3.9297    4.4873    5.3475
                                                                            450        2.6756    2.6756    2.9165
                                                                            550        1.7591    1.7591    1.7591


                                                                </tableData>
                                                        </table>
                                                </product>
                                                <product>
                                                        <property>velocities/r-aero-rad_sec</property>
                                                        <value>-1</value>
                                                        <table>
                                                                <independentVar lookup="row">velocities/vc-kts</independentVar>
                                                                <independentVar lookup="column">position/h-sl-ft</independentVar>
                                                                <tableData>
                                                                        3000  30000        50000
                                                                        150        -171.8201        -171.8201        -171.8201
                                                                        250        -171.5500 -165.0937 -165.0937
                                                                         350        -148.3478 -151.6033 -151.6033
                                                                          400        -91.2442 -101.6274 -116.8036
                                                                          450        -72.0533  -72.0533  -77.1489
                                                                          550        -44.6475  -44.6475  -44.6475


                                                                </tableData>
                                                        </table>
                                                </product>

                                                <product>
                                                        <property>attitude/roll-rad</property>
                                                        <value>-1</value>
                                                        <table>
                                                                <independentVar lookup="row">velocities/vc-kts</independentVar>
                                                                <independentVar lookup="column">position/h-sl-ft</independentVar>
                                                                <tableData>
                                                                        3000  30000        50000
                                                                        150        -0.3216        -0.3216        -0.3216
                                                                        250        -0.0212   -1.7964   -1.7964
                                                                           350        -0.0244   -1.2265   -1.2265
                                                                           400        -0.0202   -0.0185   -0.0166
                                                                           450        -0.0029   -0.0029   -0.0027
                                                                           550        -3.4245   -3.4245   -3.4245


                                                                </tableData>
                                                        </table>
                                                </product>
                                        </sum>
                                        <value>.004</value>
                                        </product>
                                </function>

                        </fcs_function>

                        <aerosurface_scale name="yaw reg scale">
                                <input> fcs/yaw-cmd </input>
                                <domain>
                                        <min> -5 </min>
                                        <max> 5 </max>
                                </domain>
                                <range>
                                        <min> -1 </min>
                                        <max> 1 </max>
                                </range>
                        </aerosurface_scale >
<!--
                        <kinematic name="rudder rate">
                                <input>fcs/yaw-reg-scale</input>
                                <traverse>
                                        <setting>
                                                <position>-1</position>
                                                <time>0.375</time>
                                        </setting>
                                        <setting>
                                                <position>1</position>
                                                <time>0.375</time>
                                        </setting>
                                </traverse>
                                <output>fcs/rudder-pos-norm</output>
                        </kinematic>
        -->
                        <actuator name="rudder pos rad">
                                <input> fcs/yaw-reg-scale</input>
                                <lag> 0 </lag>
                                <rate_limit> 1.4 </rate_limit>

                                <clipto>

                                        <min> -0.5236 </min>
                                        <max> 0.5236 </max>
                                </clipto>
                                <output>fcs/rudder-pos-rad</output>
                        </actuator>

                        <aerosurface_scale name="rudder position">
                                <input>fcs/rudder-pos-rad</input>
                                <domain>
                                        <min>-0.5236</min>
                                        <max>0.5236</max>
                                </domain>
                                <range>
                                        <min>-1</min>
                                        <max>1</max>
                                </range>
                                <output>fcs/rudder-pos-norm</output>
                        </aerosurface_scale>
                </channel>

                <channel name="Pitch">

                        <!--
              - accelerations/n-pilot-z-norm has the disadvantage that it
              - has an offset of 1G when positioned horizontal (and -1G
              - when upside down). To calculate the difference between the
              - commanded pitch-rate and actual pitch-rate this offset has
              - to be eliminated. The following function calculates an offset
              - to compensate for the earth's gravity.
              -->
                        <fcs_function name="n pilot z correction">
                                <function>
                                        <product>
                                                <cos>
                                                        <property>attitude/pitch-rad</property>
                                                </cos>
                                                <cos>
                                                        <property>attitude/roll-rad</property>
                                                </cos>
                                        </product>
                                </function>
                        </fcs_function>

                        <summer name="g load corrected">
                                <input>accelerations/n-pilot-z-norm</input>
                                <input>-fcs/n-pilot-z-correction</input>
                        </summer>

                        <pure_gain name="g load norm">
                                <input>fcs/g-load-corrected</input>
                                <gain>-1.0</gain>
                        </pure_gain>

                <!-- Normalize the u-velocity to m/s -->
                        <pure_gain name="u vel norm">
                                <input>velocities/u-fps</input>
                                <gain>0.3048</gain>
                        </pure_gain>

                        <summer name="elevator cmd limiter">
                                <input>fcs/elevator-cmd-norm</input>
                                <input>fcs/pitch-trim-cmd-norm</input>
                                <clipto>
                                        <min>-1</min>
                                        <max>0.45</max>
                                </clipto>
                        </summer>

                        <!-- Calculate the normalized current pitch rate limited to +50 deg/s -20 deg/s

-->
                        <pure_gain name="pitch rate cmd">
                                <input>fcs/elevator-cmd-limiter</input>
                                <gain>-0.8727</gain>
                        </pure_gain>

                        <!--        G-limiter/Pitch Rate Limiter -->
                        <switch name="pitch limit hi">
                          <default value="1"/>
                     <test logic="OR" value=".01">
                         fcs/g-load-norm ge 9.25
                                 fcs/g-load-norm le -3.5
                     </test>
                           <test logic="AND" value=".01">
                         fcs/g-load-norm ge 7
                                 velocities/mach ge 1.2
                     </test>
                                <test logic="AND" value=".3">
                         gear/gear-cmd-norm gt 0
                     </test>

                    </switch>

                        <switch name="tvc inhibit">
                          <default value="1"/>
                     <test logic="AND" value="0">
                         gear/gear-cmd-norm gt 0
                     </test>
                        </switch>
                        <pure_gain name="g limiter">
                                <input>fcs/pitch-rate-cmd</input>
                                <gain> fcs/pitch-limit-hi </gain>
                                <clipto>
                                        <min>-1</min>
                                        <max>1</max>
                                </clipto>

                        </pure_gain>

            <!--
              - Calculated the difference between the commanded pitch-rate
              - (elevator-scheduler) and the current pitch-rate and g-load.
              - The difference has to be compensated for straight flight.
              -->
            <summer name="pitch rate error">
              <input>fcs/g-limiter</input>
              <input>-velocities/q-aero-rad_sec</input>

            </summer>

                        <integrator name="pitch rate integrator">

                                <input>fcs/pitch-rate-error</input>
                                <c1> 1 </c1>
                        </integrator>


                <!-- Normalize the w-velocity to m/s -->
            <pure_gain name="w velocity norm">
              <input>velocities/w-fps</input>
              <gain>0.3048</gain>
            </pure_gain>

             <!-- Normalize the height to meters -->
            <pure_gain name="h to meters">
              <input>position/h-sl-ft</input>
              <gain>0.3048</gain>
            </pure_gain>

                        <fcs_function name="el pitch cmd">
                                <description>elevator control lqr regulator</description>
                                <function>
                                        <sum>

                                                <product>
                                                        <property>fcs/pitch-rate-integrator</property>
                                                        <value>-1</value>
                                                        <table>
                                                                <independentVar lookup="row">fcs/u-vel-norm</independentVar>
                                                                <independentVar lookup="column">aero/alpha-deg</independentVar>
                                                                <tableData>
                                                                        19        25        35
                                                                        110        58.8840   25.9906   25.9906
                                                                           120        58.8840   25.9906   25.9906
                                                                           130        81.9605   58.8840   25.9906
                                                                           200        63.4645   56.8517   34.4889
                                                                           270        61.1371   58.5955   33.0386
                                                                           500        48.8597   42.1147   42.1147

                                                                </tableData>
                                                        </table>

                                                </product>

                                                <product>

                                                        <property>fcs/u-vel-norm</property>
                                                        <value>-1</value>
                                                        <table>
                                                                <independentVar lookup="row">fcs/u-vel-norm</independentVar>
                                                                <independentVar lookup="column">aero/alpha-deg</independentVar>
                                                                <tableData>
                                                                        19        25        35
                                                                        110        -0.0000   -0.0001   -0.0001
                                                                           120        -0.0000   -0.0001   -0.0001
                                                                            130        0.0001   -0.0000   -0.0001
                                                                            200        0.0008    0.0006    0.0005
                                                                            270        0.0033    0.0024    0.0017
                                                                           500        -0.0002   -0.0001   -0.0001

                                                                </tableData>
                                                        </table>
                                                </product>

                                                <product>
                                                        <property>fcs/w-velocity-norm</property>
                                                        <value>-1</value>
                                                        <table>
                                                                <independentVar lookup="row">fcs/u-vel-norm</independentVar>
                                                                <independentVar lookup="column">aero/alpha-deg</independentVar>
                                                                <tableData>
                                                                        19        25        35
                                                                        110        -0.0231   -0.0119   -0.0119
                                                                           120        -0.0231   -0.0119   -0.0119
                                                                           130        -0.0406   -0.0231   -0.0119
                                                                           200        -0.0244   -0.0195   -0.0159
                                                                           270        -0.0115   -0.0085   -0.0061
                                                                          500         -0.0045   -0.0029   -0.0029

                                                                </tableData>
                                                        </table>
                                                </product>
                                                <product>
                                                        <property>velocities/q-aero-rad_sec</property>
                                                        <value>-1</value>
                                                        <table>
                                                                <independentVar lookup="row">fcs/u-vel-norm</independentVar>
                                                                <independentVar lookup="column">aero/alpha-deg</independentVar>
                                                                <tableData>
                                                                        19        25        35
                                                                        110        -44.0297  -19.6316  -19.6316
                                                                          120        -44.0297  -19.6316  -19.6316
                                                                          130        -62.1151  -44.0297  -19.6316
                                                                          200        -47.3350  -42.1836  -26.0436
                                                                          270        -45.4195  -43.0593  -24.6616
                                                                          500        -35.7627  -30.5733  -30.5733
                                                                </tableData>
                                                        </table>
                                                </product>

                                                <product>
                                                        <property>attitude/pitch-rad</property>
                                                        <value>-1</value>
                                                        <table>
                                                                <independentVar lookup="row">fcs/u-vel-norm</independentVar>
                                                                <independentVar lookup="column">aero/alpha-deg</independentVar>
                                                                <tableData>
                                                                        19        25        35
                                                                        110        -0.1661   -0.1164   -0.1164
                                                                           120        -0.1661   -0.1164   -0.1164
                                                                           130        -0.2131   -0.1661   -0.1164
                                                                           200        -0.1573   -0.1525   -0.1781
                                                                           270        -0.9159   -0.6913   -0.6918
                                                                           500        -0.0259   -0.0195   -0.0195

                                                                </tableData>
                                                        </table>
                                                </product>

                                                <product>
                                                        <property>fcs/h-to-meters</property>
                                                        <value>-1</value>
                                                        <table>
                                                                <independentVar lookup="row">fcs/u-vel-norm</independentVar>
                                                                <independentVar lookup="column">aero/alpha-deg</independentVar>
                                                                <tableData>
                                                                        19        25        35
                                                                        110        -0.0007   -0.0004   -0.0004
                                                                           120        -0.0007   -0.0004   -0.0004
                                                                           130        -0.0013   -0.0007   -0.0004
                                                                           200        -0.0002   -0.0001   -0.0001
                                                                           270        -0.0003   -0.0002   -0.0002
                                                                           500        -0.0001   -0.0001   -0.0001

                                                                </tableData>
                                                        </table>
                                                        <value>0.001</value>
                                                </product>
                                        </sum>

                                </function>

                        </fcs_function>

                        <aerosurface_scale name="el reg scale">
                                <input> fcs/el-pitch-cmd </input>
                                <domain>
                                        <min> -5 </min>
                                        <max> 5 </max>
                                </domain>
                                <range>
                                        <min> -1 </min>
                                        <max> 1 </max>
                                </range>
                        </aerosurface_scale >
        <!--
            <kinematic name="elevator rate">
                <input>fcs/el-reg-scale</input>
                <traverse>
                    <setting>
                        <position>-1</position>
                        <time>0.3</time>
                    </setting>
                    <setting>
                        <position>1</position>
                        <time>0.3</time>
                    </setting>
                </traverse>
                <output>fcs/elevator-pos-norm</output>
            </kinematic>
-->
            <aerosurface_scale name="elevator position">
              <input>fcs/elevator-pos-rad</input>
              <domain>
                <min>-0.5236</min>
                <max>0.5236</max>
              </domain>
                                <range>
                                        <min>-1</min>
                                        <max>1</max>
                                </range>
              <output>fcs/elevator-pos-norm</output>
            </aerosurface_scale>

               <actuator name="elevator pos rad">
                                <input> fcs/el-reg-scale</input>
                                <lag> 0.0 </lag>
                                <rate_limit> 1.047 </rate_limit>

                                <clipto>

                                        <min> -0.5236 </min>
                                        <max> 0.5236 </max>
                                </clipto>
                                <output>fcs/elevator-pos-rad</output>
                        </actuator>


                        <summer name="dht left pos rad">
              <input>-fcs/elevator-pos-rad</input>
              <input>-fcs/left-aileron-pos-rad</input>
              <clipto>
                <min>-0.5236</min>
                <max>0.5236</max>
              </clipto>
             </summer>

             <summer name="dht right pos rad">
              <input>fcs/elevator-pos-rad</input>
              <input>fcs/right-aileron-pos-rad</input>
              <clipto>
                <min>-0.5236</min>
                <max>0.5236</max>
              </clipto>
             </summer>

                        <!-- TVC control -->
                        <fcs_function name="tvc pitch cmd">
                                <description>thrust vector control lqr regulator</description>
                                <function>
                                        <product>
                                        <sum>

                                                <product>
                                                        <property>fcs/pitch-rate-integrator</property>
                                                        <value>-1</value>
                                                        <table>
                                                                <independentVar lookup="row">fcs/u-vel-norm</independentVar>
                                                                <independentVar lookup="column">aero/alpha-deg</independentVar>
                                                                <tableData>
                                                                        12        20        30
                                                                        110        95.6705   95.6705   95.6705
                                                                           120        67.9777   95.6705   95.6705
                                                                            130             0   67.9777   95.6705
                                                                            200             0   56.0773   75.1918
                                                                            270             0   49.6594   70.1697
                                                                            500             0   34.2680   34.2680

                                                                </tableData>
                                                        </table>
                                                </product>

                                                <product>

                                                        <property>fcs/u-vel-norm</property>
                                                        <value>-1</value>
                                                        <table>
                                                                <independentVar lookup="row">fcs/u-vel-norm</independentVar>
                                                                <independentVar lookup="column">aero/alpha-deg</independentVar>
                                                                <tableData>
                                                                        12        20        30
                                                                        110        0.0003    0.0003    0.0003
                                                                            120        0.0003    0.0003    0.0003
                                                                            130             0    0.0003    0.0003
                                                                            200             0    0.0008    0.0014
                                                                            270             0    0.0021    0.0038
                                                                            500             0   -0.0001   -0.0001

                                                                </tableData>
                                                        </table>
                                                </product>

                                                <product>
                                                        <property>fcs/w-velocity-norm</property>
                                                        <value>-1</value>
                                                        <table>
                                                                <independentVar lookup="row">fcs/u-vel-norm</independentVar>
                                                                <independentVar lookup="column">aero/alpha-deg</independentVar>
                                                                <tableData>
                                                                        12        20        30
                                                                        110        -0.0444   -0.0444   -0.0444
                                                                           120        -0.0271   -0.0444   -0.0444
                                                                           130              0   -0.0271   -0.0444
                                                                           200              0   -0.0195   -0.0349
                                                                           270              0   -0.0073   -0.0130
                                                                           500              0   -0.0024   -0.0024
                                                                </tableData>
                                                        </table>
                                                </product>
                                                <product>
                                                        <property>velocities/q-aero-rad_sec</property>
                                                        <value>-1</value>
                                                        <table>
                                                                <independentVar lookup="row">fcs/u-vel-norm</independentVar>
                                                                <independentVar lookup="column">aero/alpha-deg</independentVar>
                                                                <tableData>
                                                                        12        20        30
                                                                        110        -72.1205  -72.1205  -72.1205
                                                                         120         -50.7416  -72.1205  -72.1205
                                                                         130                0  -50.7416  -72.1205
                                                                          200               0  -41.5043  -56.5934
                                                                          270               0  -36.1358  -51.7437
                                                                          500               0  -24.8715  -24.8715

                                                                </tableData>
                                                        </table>
                                                </product>

                                                <product>
                                                        <property>attitude/pitch-rad</property>
                                                        <value>-1</value>
                                                        <table>
                                                                <independentVar lookup="row">fcs/u-vel-norm</independentVar>
                                                                <independentVar lookup="column">aero/alpha-deg</independentVar>
                                                                <tableData>
                                                                        12        20        30
                                                                        110        -0.1220   -0.1220   -0.1220
                                                                          120         -0.0019   -0.1220   -0.1220
                                                                          130               0   -0.0019   -0.1220
                                                                          200               0    0.0491   -0.0384
                                                                          270               0   -0.0521   -0.5270
                                                                          500       0    0.0000    0.0000

                                                                </tableData>
                                                        </table>
                                                </product>

                                                <product>
                                                        <property>fcs/h-to-meters</property>
                                                        <value>-1</value>
                                                        <table>
                                                                <independentVar lookup="row">fcs/u-vel-norm</independentVar>
                                                                <independentVar lookup="column">aero/alpha-deg</independentVar>
                                                                <tableData>
                                                                        12        20        30
                                                                        110        -0.0014   -0.0014   -0.0014
                                                                          120         -0.0008   -0.0014   -0.0014
                                                                           130      0   -0.0008   -0.0014
                                                                           200      0   -0.0001   -0.0002
                                                                           270      0   -0.0001   -0.0003
                                                                           500      0   -0.0000   -0.0000

                                                                </tableData>
                                                        </table>
                                                        <value>0.001</value>
                                                </product>
                                        </sum>
                                        <value>fcs/tvc-inhibit</value>
                                        </product>
                                </function>

                        </fcs_function>

                <!--TVC used for trim in high altitude supersonic flight. Not currently used-->
                <!--fcs_function name="mach pitch trim">

                    <function>
                     <product>

                        <sum>
                         <product>
                          <value>-3.0666</value>
                          <property>fcs/pitch-rate-integrator</property>
                         </product>
                         <product>
                          <value>0.0004</value>
                          <property>fcs/u-vel-norm</property>
                         </product>
                         <product>
                          <value>0.0012</value>
                          <property>fcs/w-velocity-norm</property>
                         </product>
                         <product>
                          <value>2.8973</value>
                          <property>velocities/q-aero-rad_sec</property>
                         </product>
                         <product>
                          <value>0.3183</value>
                          <property>attitude/pitch-rad</property>
                         </product>
                         <product>
                          <value>0.0004</value>
                          <property>fcs/h-to-meters</property>
                         </product>
                        </sum>
                        <table>
                             <independentVar lookup="row">velocities/mach</independentVar>
                                        <independentVar lookup="column">position/h-sl-ft</independentVar>
                             <tableData>
                                                35000        55000
                              1.00   0        0
                                      1.10   0        0.003
                                       1.15   0        0.008
                                       1.20   0        0.016
                                       1.25   0        0.020
                                       1.30   0        0.025
                                       1.35   0        0.025
                                       1.40   0        0.025
                                       1.45   0        0.025
                                       1.50   0        0.025
                                       1.55   0        0.026
                                       1.60   0        0.026

                             </tableData>
                         </table>
                       </product>
                     </function>
                        <clipto>
                                        <min>-0.2</min>
                                        <max>0.2</max>
                                </clipto>

                 </fcs_function-->

                        <summer name="tvc summer">
                              <input>fcs/tvc-pitch-cmd</input>
                              <!--input>fcs/mach-pitch-trim</input-->
                        </summer>

                        <aerosurface_scale name="tvc reg scale">
                                <input> fcs/tvc-summer</input>
                                <domain>
                                        <min> -5 </min>
                                        <max> 5 </max>
                                </domain>
                                <range>
                                        <min> -1 </min>
                                        <max> 1 </max>
                                </range>
                        </aerosurface_scale >
<!--
                        <kinematic name="tvc rate">
                                <input>fcs/tvc-reg-scale</input>
                                <traverse>
                                        <setting>
                                                <position>-1</position>
                                                <time>0.5</time>
                                        </setting>
                                        <setting>
                                                <position>1</position>
                                                <time>0.5</time>
                                        </setting>
                                </traverse>
                                <output>fcs/tvc-pos-norm</output>
                        </kinematic>
-->
                        <aerosurface_scale name="tvc position">
                                <input>fcs/tvc-pos-rad</input>
                                <domain>
                                        <min>-0.349</min>
                                        <max>0.349</max>
                                </domain>
                                <range>
                                        <min>-1</min>
                                        <max>1</max>
                                </range>
                                <output>fcs/tvc-pos-norm</output>
                        </aerosurface_scale>

                        <actuator name="tvc pos rad">
                                <input> fcs/tvc-reg-scale</input>
                                <lag> 0.00 </lag>
                                <rate_limit> 0.7 </rate_limit>

                                <clipto>

                                        <min> -0.349 </min>
                                        <max> 0.349 </max>
                                </clipto>
                                <output>fcs/tvc-pos-rad</output>
                        </actuator>

                </channel>


        <channel name="Leading Edge Flap">

            <pure_gain name="lef alpha gain">
                <input>aero/alpha-deg</input>
                <gain>1.38</gain>
            </pure_gain>

            <lead_lag_filter name="lef alpha filter">
                <input>fcs/lef-alpha-gain</input>
                 <c1> 2 </c1>
                 <c2> 7.25 </c2>
                 <c3> 1 </c3>
                 <c4> 7.25 </c4>
             </lead_lag_filter>

            <fcs_function name="lef transfer function">
                <function>
                 <description>leading edge flap control function</description>
                   <sum>
                      <property> fcs/lef-alpha-filter </property>
                          <product>
                           <quotient>
                                 <property>aero/qbar-psf</property>
                          <property>atmosphere/P-psf</property>
                           </quotient>
                       <value>-9.05</value>
                    </product>
                       <value>1.45</value>
                      </sum>

              </function>
             </fcs_function>
            <pure_gain name="lef deg to rad">
                <input>fcs/lef-transfer-function</input>
                <gain>0.01745</gain>
                        <clipto>
                        <min> -0.001 </min>
                        <max> 0.6108 </max>
                    </clipto>
            </pure_gain>

                <switch name="lef pos">
                <default value="0.0"/>
                <test logic="AND" value="0">
                    fcs/gear-wow eq 1
                    gear/gear-pos-norm gt 0
                </test>
                <test value="fcs/lef-deg-to-rad">
                    gear/gear-pos-norm == 0
                </test>
                <test logic="AND" value="0">
                    velocities/mach gt 0.9
                </test>
            </switch>

            <pure_gain name="lef norm">
              <input>fcs/lef-pos</input>
              <gain>1.637197</gain>

            </pure_gain>

            <kinematic name="lef control">
                <input>fcs/lef-norm</input>
                <traverse>
                        <setting>
                        <position>-1.0</position>
                        <time>0.55</time>
                    </setting>

                    <setting>
                        <position>1.0</position>
                        <time>0.55</time>
                    </setting>
                </traverse>
            </kinematic>

            <aerosurface_scale name="lef deg">
              <input>fcs/lef-control</input>
              <domain>
                <min>-1.0</min>
                <max>1.0</max>
              </domain>
              <range>
                <min>0</min>
                <max>35</max>
              </range>
                                <output>fcs/lef-pos-deg</output>
            </aerosurface_scale>

                        <aerosurface_scale name="lef pos rad">
                                <input>fcs/lef-control</input>
                                <domain>
                                        <min>-1.0</min>
                                        <max>1.0</max>
                                </domain>
                                <range>
                                        <min>0</min>
                                        <max>0.6108</max>
                                </range>
                        </aerosurface_scale>


        </channel>

        <channel name="Throttle">

            <pure_gain name="Throttle1">
                <input>fcs/throttle-cmd-norm</input>
                <gain>1.001</gain>
                <output>fcs/throttle-pos-norm</output>
            </pure_gain>
                        <pure_gain name="Throttle2">
                                <input>fcs/throttle-cmd-norm[1]</input>
                                <gain>1.001</gain>
                                <output>fcs/throttle-pos-norm[1]</output>
                        </pure_gain>

                        <fcs_function name="thrust norm">
                                <description>Normalized thrust output</description>
                                <function>
                                        <quotient>
                                                <property>propulsion/engine[1]/thrust-lbs</property>
                                                <value>28000</value>
                                        </quotient>
                                </function>
                                <clipto>
                                        <min> 0 </min>
                                        <max> 1.2 </max>
                                    </clipto>

                        </fcs_function>

        </channel>

        <channel name="Flaps">

            <switch name="tef pos">
                <default value="0.0"/>
                <test logic="AND" value="0.5235">
                    velocities/vc-kts lt 210
                          velocities/mach lt 0.85
                </test>

                <test logic="AND" value="0.26175">
                    velocities/vc-kts lt 235
                          velocities/mach lt 0.87
                </test>
                    <test logic="AND" value="0.13">
                    velocities/vc-kts lt 260
                          velocities/mach lt 0.9
                </test>
                    <test logic="AND" value="0.065">
                    velocities/vc-kts lt 285
                          velocities/mach lt 0.92
                </test>

            </switch>

            <pure_gain name="tef norm">
              <input>fcs/tef-pos</input>
              <gain>1.91</gain>
            </pure_gain>

            <kinematic name="flap pos norm">
                <input>fcs/tef-norm</input>
                <traverse>
                    <setting>
                        <position>0</position>
                        <time>0</time>
                    </setting>

                    <setting>
                        <position>0.5</position>
                        <time>3.0</time>
                    </setting>

                    <setting>
                        <position>1.0</position>
                        <time>3.0</time>
                    </setting>
                </traverse>
                                <output>fcs/flap-pos-norm</output>
            </kinematic>

            <aerosurface_scale name="flap pos deg">
              <input>fcs/flap-pos-norm</input>
              <domain>
                <min>0</min>
                <max>1.0</max>
              </domain>
              <range>
                <min>0</min>
                <max>30</max>
              </range>
                                <output>fcs/tef-pos-deg</output>
            </aerosurface_scale>

        </channel>

<!-- Speedbrake currently borrowed from F-16 -->
        <channel name="Speedbrake">
            <!--
              - To prevent deep stall the Flight Computer commands speedbrake
              - deflection at high angle of attack (alpha) and low speeds. This
              - will provide just enough pitch down moment to keep the aircraft
              - under control.
              -->
            <switch name="speedbrake alpha limiter">
                <default value="0"/>
                <test logic="AND" value="1">
                    aero/alpha-deg ge 120
                    velocities/v-fps le 10
                </test>
            </switch>

            <switch name="speedbrake initiate">
                <default value="0"/>
                <test logic="OR" value="1">
                    fcs/speedbrake-alpha-limiter eq 1
                    fcs/speedbrake-cmd-norm eq 1
                </test>
            </switch>

            <!--
              - Speedbrake deflection is limited to 43 degrees (instead of 60
              - degrees) when the gear is extended to prevent physical
              - speedbrake damage on touchdown.
              -->
            <scheduled_gain name="speedbrake scheduler">
                <input>fcs/speedbrake-initiate</input>
                <table>
                    <independentVar>gear/gear-cmd-norm</independentVar>
                    <tableData>
                        0    1.0
                        1    0.71667
                    </tableData>
                </table>
                <output>fcs/steer-pos-deg</output>
            </scheduled_gain>

            <kinematic name="Speedbrake Control">
                <input>fcs/speedbrake-scheduler</input>
                <traverse>
                    <setting>
                        <position>0</position>
                        <time>0</time>
                    </setting>
                    <setting>
                        <position>60</position>
                        <time>1</time>
                    </setting>
                </traverse>
                <output>fcs/speedbrake-pos-deg</output>
            </kinematic>

           <aerosurface_scale name="Speedbrake Position Normalizer">
              <input>fcs/speedbrake-control</input>
              <domain>
                <min>0</min>
                <max>60</max>
              </domain>
              <range>
                <min>0</min>
                <max>1</max>
              </range>
              <output>fcs/speedbrake-pos-norm</output>
            </aerosurface_scale>

        </channel>
        <channel name="Landing Gear">

            <switch name="gear-wow">
                <default value="0"/>
                <test logic="AND" value="1">
                    gear/unit[1]/WOW eq 1
                    gear/unit[2]/WOW eq 1
                </test>
            </switch>

            <kinematic name="Gear Control">
                <input>gear/gear-cmd-norm</input>
                <traverse>
                    <setting>
                        <position>0</position>
                        <time>0</time>
                    </setting>
                    <setting>
                        <position>1</position>
                        <time>5</time>
                    </setting>
                </traverse>
                <output>gear/gear-pos-norm</output>
            </kinematic>

            <scheduled_gain name="Scheduled Steer Pos Deg">
                <input>fcs/steer-cmd-norm</input>
                <table>
                    <independentVar>velocities/vg-fps</independentVar>
                    <tableData>
                        10.0        80
                        50.0        15
                        150.0       2
                    </tableData>
                </table>
                <output>fcs/steer-pos-deg</output>
            </scheduled_gain>

        </channel>

    </flight_control>
        <aerodynamics>
           <function name="aero/function/kCLge">
               <description>Change_in_lift_due_to_ground_effect</description>
               <product>
                     <table>
                         <independentVar>aero/h_b-mac-ft</independentVar>
                         <tableData>
                           0.0000  1.3893
                           0.1000  1.2108
                           0.1500  1.1972
                           0.2000  1.2108
                           0.3000  1.1785
                           0.4000  1.0697
                           0.5000  1.0578
                           0.6000  1.0323
                           0.7000  1.0136
                           0.8000  1.0051
                           0.9000  1.0017
                           1.0000  1.0000
                           1.1000  1.0000
                         </tableData>
                     </table>
               </product>
           </function>
           <function name="aero/function/kCDge">
               <description>Change_in_drag_due_to_ground_effect</description>
               <product>
                     <table>
                         <independentVar>aero/h_b-mac-ft</independentVar>
                         <tableData>
                           0.0000  0.5235
                           0.1000  0.4759
                           0.1500  0.5250
                           0.2000  0.5388
                           0.3000  0.5924
                           0.4000  0.6471
                           0.5000  0.6941
                           0.6000  0.7624
                           0.7000  0.8253
                           0.8000  0.8812
                           0.9000  0.9412
                           1.0000  1.0000
                           1.1000  1.0000
                         </tableData>
                     </table>
               </product>
           </function>

           <axis name="DRAG">
               <function name="aero/coefficient/CD0">
                   <description>Drag_at_zero_lift</description>
                   <product>
                       <property>aero/qbar-psf</property>
                       <property>metrics/Sw-sqft</property>
                       <property>aero/function/kCDge</property>
                         <table>
                             <independentVar>aero/alpha-rad</independentVar>
                             <tableData>
                                 -1.5700    1.5000
                                 -0.2600    0.0480
                                 0.0000    0.0200
                                 0.2600    0.0480
                                 1.5700    1.5000
                             </tableData>
                         </table>
                   </product>
               </function>
                <function name="aero/coefficient/CDi">
                   <description>Induced_drag</description>
                   <product>
                       <property>aero/qbar-psf</property>
                       <property>metrics/Sw-sqft</property>
                       <property>aero/cl-squared</property>
                       <property>aero/function/kCDge</property>
                       <value>0.0900</value>
                   </product>
               </function>
               <function name="aero/coefficient/CDmach">
                  <description>Drag_due_to_mach</description>
                  <product>
                       <property>aero/qbar-psf</property>
                       <property>metrics/Sw-sqft</property>
                         <table>
                             <independentVar>velocities/mach</independentVar>
                             <tableData>
                                 0.0000    0.0000
                                 0.8100    0.0000
                                 1.1000    0.0230
                                 1.8000    0.0150
                                            2.4000    0.020
                             </tableData>
                         </table>
                   </product>
               </function>
               <function name="aero/coefficient/CDflap">
                   <description>Drag_due_to_flaps</description>
                   <product>
                       <property>aero/qbar-psf</property>
                       <property>metrics/Sw-sqft</property>
                       <property>fcs/flap-pos-norm</property>
                       <property>aero/function/kCDge</property>
                       <value>0.0750</value>
                   </product>
               </function>
               <function name="aero/coefficient/CDgear">
                   <description>Drag_due_to_gear</description>
                   <product>
                       <property>aero/qbar-psf</property>
                       <property>metrics/Sw-sqft</property>
                       <property>gear/gear-pos-norm</property>
                       <value>0.0200</value>
                   </product>
               </function>
               <function name="aero/coefficient/CDsb">
                  <description>Drag_due_to_speedbrakes</description>
                   <product>
                       <property>aero/qbar-psf</property>
                       <property>metrics/Sw-sqft</property>
                       <property>fcs/speedbrake-pos-norm</property>
                       <value>0.0240</value>
                   </product>
               </function>
               <function name="aero/coefficient/CDbeta">
                   <description>Drag_due_to_sideslip</description>
                   <product>
                       <property>aero/qbar-psf</property>
                       <property>metrics/Sw-sqft</property>
                       <property>aero/function/kCDge</property>
                         <table>
                             <independentVar>aero/beta-rad</independentVar>
                             <tableData>
                                 -1.5700    1.2300
                                 -0.2600    0.0500
                                 0.0000    0.0000
                                 0.2600    0.0500
                                 1.5700    1.2300
                             </tableData>
                         </table>
                   </product>
               </function>
               <function name="aero/coefficient/CDde">
                   <description>Drag_due_to_Elevator_Deflection</description>
                   <product>
                       <property>aero/qbar-psf</property>
                       <property>metrics/Sw-sqft</property>
                       <property>aero/function/kCDge</property>
                        <table>
                             <independentVar>fcs/elevator-pos-rad</independentVar>
                             <tableData>
                                -0.5236               0.075
                                -0.218               0.0375
                                0                0.010
                                0.218                0.0375
                                0.5236                0.077
                             </tableData>
                       </table>
                   </product>
              </function>

             <function name="aero/coefficient/CDDlef">
                   <description>Drag_due_to_leading_edge_flap_deflection</description>
                   <product>
                       <property>aero/qbar-psf</property>
                       <property>metrics/Sw-sqft</property>
                       <property>aero/function/kCDge</property>
                        <property>fcs/lef-pos-rad</property>
                        <table>
                             <independentVar>aero/alpha-rad</independentVar>
                             <tableData>
                                -0.175  0.003
                                -0.087  0.001
                                 0.000  0.000
                                 0.087  0.001
                                 0.175  0.002
                                 0.262  0.004
                                 0.349  0.007
                                 0.436  0.011
                                 0.524  0.015
                                 0.611  0.019
                                 0.698  0.023
                                 0.785  0.024
                             </tableData>
                       </table>
                   </product>
              </function>
                <function name="aero/coefficient/CDq">
                   <description>Drag_due_to_pitch_rate</description>
                   <product>
                       <property>aero/qbar-psf</property>
                       <property>metrics/Sw-sqft</property>
                       <property>velocities/q-aero-rad_sec</property>
                        <property>aero/ci2vel</property>
                        <table>
                             <independentVar>aero/alpha-rad</independentVar>
                             <tableData>
                                -0.175 -1.265
                                -0.087 -2.139
                                 0.000 -0.308
                                 0.087  1.402
                                 0.175  3.369
                                 0.262  5.135
                                 0.349  6.880
                                 0.436  8.060
                                 0.524 11.201
                                 0.611 13.872
                                 0.698 19.217
                                 0.785 22.105
                             </tableData>
                       </table>
                   </product>
              </function>
                <function name="aero/coefficient/CDq_Dlef">
                    <description>Drag_due_to_pitch_rate_and_leading_edge_flap_deflection</description>
                   <product>
                       <property>aero/qbar-psf</property>
                       <property>metrics/Sw-sqft</property>
                       <property>velocities/q-aero-rad_sec</property>
                        <property>aero/ci2vel</property>
                        <property>fcs/lef-pos-rad</property>
                        <table>
                             <independentVar>aero/alpha-rad</independentVar>
                             <tableData>
                                -0.175  0.067
                                -0.087  0.034
                                 0.000  0.028
                                 0.087  0.029
                                 0.175  0.033
                                 0.262  0.059
                                 0.349  0.061
                                 0.436  0.027
                                 0.524  0.036
                                 0.611  0.047
                                 0.698  0.029
                                 0.785  0.015
                             </tableData>
                       </table>
                   </product>
              </function>
           </axis>

           <axis name="SIDE">
               <function name="aero/coefficient/CYb">
                   <description>Side_force_due_to_beta</description>
                   <product>
                       <property>aero/qbar-psf</property>
                       <property>metrics/Sw-sqft</property>
                       <property>aero/beta-rad</property>
                       <value>-1.7875</value>
                   </product>
               </function>
                <function name="aero/coefficient/CYb_M">
                   <description>Side_force_due_to_beta_due_to_mach</description>
                   <product>
                       <property>aero/qbar-psf</property>
                       <property>metrics/Sw-sqft</property>
                       <property>aero/beta-rad</property>
                       <table>
                             <independentVar>velocities/mach</independentVar>
                             <tableData>
                                        0.4            0.0
                                       1.2      0.0573
                                       1.6     -0.1719
                             </tableData>
                        </table>
                   </product>
               </function>
               <function name="aero/coefficient/CYbdot">
                   <description>Side_force_due_to_beta_rate</description>
                   <product>
                       <property>aero/qbar-psf</property>
                       <property>metrics/Sw-sqft</property>
                       <property>aero/betadot-rad_sec</property>
                       <value>-0.0458</value>
                   </product>
               </function>
                <function name="aero/coefficient/CYDa">
                   <description>Side_force_due_to_aileron</description>
                   <product>
                       <property>aero/qbar-psf</property>
                       <property>metrics/Sw-sqft</property>
                       <property>fcs/left-aileron-pos-rad</property>
                       <value>-1.1516e-3</value>
                   </product>
               </function>
               <function name="aero/coefficient/CYDr">
                   <description>Side_force_due_to_rudder</description>
                   <product>
                       <property>aero/qbar-psf</property>
                       <property>metrics/Sw-sqft</property>
                       <property>fcs/rudder-pos-rad</property>
                       <value>0.0619</value>
                   </product>
              </function>
               <function name="aero/coefficient/CYp">
                   <description>Side_force_due_to_roll_rate</description>
                   <product>
                       <property>aero/qbar-psf</property>
                       <property>metrics/Sw-sqft</property>
                       <property>aero/bi2vel</property>
                       <property>velocities/p-aero-rad_sec</property>
                       <value>0.0399</value>
                   </product>
               </function>
               <function name="aero/coefficient/CYr">
                   <description>Side_force_due_to_yaw_rate</description>
                   <product>
                       <property>aero/qbar-psf</property>
                       <property>metrics/Sw-sqft</property>
                       <property>aero/bi2vel</property>
                       <property>velocities/r-aero-rad_sec</property>
                       <value>0.1218</value>
                   </product>
               </function>
           </axis>

           <axis name="LIFT">
<!-- Replaced with table CLDDh based on F-16.xml table-->
               <function name="aero/coefficient/CLalpha">
                   <description>Lift_due_to_alpha</description>
                   <product>
                       <property>aero/qbar-psf</property>
                       <property>metrics/Sw-sqft</property>
                         <table>
                             <independentVar>aero/alpha-rad</independentVar>
                             <tableData>
                                 -0.1745    -0.4279
                                 0.7854    2.3000
                                 1.3963    1.0726
                             </tableData>
                        </table>
                   </product>
               </function>

                <function name="aero/coefficient/CLDlef">
                   <description>Lift_due_to_leading_edge_flap_deflection</description>
                   <product>
                       <property>aero/qbar-psf</property>
                       <property>metrics/Sw-sqft</property>
                        <property>fcs/lef-pos-rad</property>
                        <property>aero/function/kCLge</property>
                         <table>
                             <independentVar>aero/alpha-rad</independentVar>
                             <tableData>
                                 -0.1750  -0.0120
                              -0.0870  -0.0040
                              0.0000  0.0020
                              0.0870  0.0070
                              0.1750  0.0120
                              0.2620  0.0180
                              0.3490  0.0220
                              0.4360  0.0250
                              0.5240  0.0260
                              0.6110  0.0280
                              0.6980  0.0300
                              0.7850  0.032
                                    0.8727   0.03
                                    1.0472   0.028
                                    1.2217   0.025
                                    1.3963   0.02
                             </tableData>
                        </table>
                   </product>
               </function>
               <function name="aero/coefficient/CLadot">
                   <description>Lift_due_to_alpha_rate</description>
                   <product>
                       <property>aero/qbar-psf</property>
                       <property>metrics/Sw-sqft</property>
                       <property>aero/alphadot-rad_sec</property>
                       <property>aero/ci2vel</property>
                       <value>2.5602</value>
                   </product>
               </function>
               <function name="aero/coefficient/CLq">
                   <description>Lift_due_to_pitch_rate</description>
                   <product>
                       <property>aero/qbar-psf</property>
                       <property>metrics/Sw-sqft</property>
                        <property>velocities/q-aero-rad_sec</property>
                        <property>aero/ci2vel</property>
                        <property>aero/function/kCLge</property>
                         <table>
                             <independentVar>aero/alpha-rad</independentVar>
                             <tableData>
                                -0.175  8.7127
                                 -0.087 25.7114
                                  0.000 28.9000
                                  0.087 31.3973
                                  0.175 31.0872
                                  0.262 30.4071
                                  0.349 28.9735
                                  0.436 28.4242
                                  0.524 27.8647
                                  0.611 27.2654
                                  0.698 30.5158
                                  0.785 27.8165
                             </tableData>
                        </table>
                   </product>
               </function>
               <function name="aero/coefficient/dCLflap">
                   <description>Delta_Lift_due_to_flaps</description>
                   <product>
                       <property>aero/qbar-psf</property>
                       <property>metrics/Sw-sqft</property>
                       <property>fcs/flap-pos-norm</property>
                        <property>aero/function/kCLge</property>
                       <value>0.3500</value>
                   </product>
               </function>
               <function name="aero/coefficient/dCLsb">
                   <description>Delta_Lift_due_to_speedbrake</description>
                   <product>
                       <property>aero/qbar-psf</property>
                       <property>metrics/Sw-sqft</property>
                      <property>fcs/speedbrake-pos-norm</property>
                        <property>aero/function/kCLge</property>
                       <value>0.3500</value>
                   </product>
               </function>
<!--
                    <function name="aero/coefficient/CLDh">
                <description>Lift_due_to_horizontal_tail_deflection</description>
                <product>
                    <property>aero/qbar-psf</property>
                    <property>metrics/Sw-sqft</property>
                    <property>aero/function/kCLge</property>
                      <table>
                          <independentVar lookup="row">aero/alpha-rad</independentVar>
                          <independentVar lookup="column">fcs/elevator-pos-rad</independentVar>
                          <tableData>
                              -0.1745        -0.4279
                                        0.0000        0.1346
                                        0.7854        2.00
                                        1.3963        1.0726

                          </tableData>
                      </table>
                </product>
            </function>

               <function name="aero/coefficient/CLDh">
                <description>Lift_due_to_horizontal_tail_deflection</description>
                <product>
                    <property>aero/qbar-psf</property>
                    <property>metrics/Sw-sqft</property>
                    <property>aero/function/kCLge</property>
                      <table>
                          <independentVar lookup="row">aero/alpha-rad</independentVar>
                          <independentVar lookup="column">fcs/elevator-pos-rad</independentVar>
                          <tableData>

           -0.175  -0.428
           -0.087  -0.135
            0.000  0.135
            0.087   0.414
            0.175  0.725
            0.262  1.041
            0.349  1.327
            0.436  1.547
            0.524  1.737
            0.611  1.829
            0.698  1.930
            0.785  2.000
                0.8727 1.982
            1.0472 1.830
            1.2217 1.548
            1.3963 1.073
                          </tableData>
                      </table>
                </product>
            </function>
-->
                <function name="aero/coefficient/CLde">
                   <description>Lift_due_to_elevator</description>
                   <product>
                       <property>aero/qbar-psf</property>
                       <property>metrics/Sw-sqft</property>
                      <property>fcs/elevator-pos-rad</property>
                        <property>aero/function/kCLge</property>
                       <value>0.190</value>
                   </product>
               </function>
           </axis>

           <axis name="ROLL">
              <function name="aero/coefficient/Clb">
                   <description>Roll_moment_due_to_beta</description>
                   <product>
                       <property>aero/qbar-psf</property>
                       <property>metrics/Sw-sqft</property>
                       <property>metrics/bw-ft</property>
                       <property>aero/beta-rad</property>
                         <table>
                             <independentVar>aero/alpha-rad</independentVar>
                             <tableData>
                                 -0.0873    0.0189
                                 0.0000    0.0176
                                 0.0873    0.0119
                                 0.1745    0.0050
                                 0.2618    0.0049
                                 0.3491    0.0028
                                 0.4363    0.0084
                                 0.5236    0.0171
                                 0.6109    0.0044
                             </tableData>
                         </table>
                   </product>
               </function>
                <function name="aero/coefficient/Clda_M">
                   <description>Change_in_Roll_moment_due_to_aileron_due_to_mach</description>
                   <product>
                       <property>aero/qbar-psf</property>
                       <property>metrics/Sw-sqft</property>
                       <property>metrics/bw-ft</property>
                       <property>aero/alpha-rad</property>
                                   <property>fcs/left-aileron-pos-rad</property>
                         <table>
                             <independentVar>velocities/mach</independentVar>
                             <tableData>
                                 0.6      0.0
                                       1.2     -0.063
                                       1.6     -0.063
                             </tableData>
                         </table>
                   </product>
               </function>
                <function name="aero/coefficient/Cldr_M">
                   <description>Change_in_Roll_moment_due_to_rudder_due_to_mach</description>
                   <product>
                       <property>aero/qbar-psf</property>
                       <property>metrics/Sw-sqft</property>
                       <property>metrics/bw-ft</property>
                       <property>aero/alpha-rad</property>
                                    <property>fcs/rudder-pos-rad</property>
                         <table>
                             <independentVar>velocities/mach</independentVar>
                             <tableData>
                                 0.6      0.0
                                        1.6     -0.0201
                             </tableData>
                         </table>
                   </product>
               </function>
               <function name="aero/coefficient/Clbdot">
                  <description>Roll_moment_due_to_beta_rate</description>
                   <product>
                       <property>aero/qbar-psf</property>
                       <property>metrics/Sw-sqft</property>
                       <property>metrics/bw-ft</property>
                       <property>aero/bi2vel</property>
                       <property>aero/betadot-rad_sec</property>
                       <value>-0.0037</value>
                   </product>
               </function>
              <function name="aero/coefficient/Clp">
                   <description>Roll_moment_due_to_roll_rate</description>
                   <product>
                       <property>aero/qbar-psf</property>
                       <property>metrics/Sw-sqft</property>
                       <property>metrics/bw-ft</property>
                      <property>aero/bi2vel</property>
                       <property>velocities/p-aero-rad_sec</property>
                       <table>
                           <independentVar>aero/alpha-rad</independentVar>
                           <tableData>
                               0.0000  -0.4000
                               0.3490  -0.3100
                           </tableData>
                       </table>
                   </product>
               </function>
               <function name="aero/coefficient/Clr">
                   <description>Roll_moment_due_to_yaw_rate</description>
                   <product>
                       <property>aero/qbar-psf</property>
                       <property>metrics/Sw-sqft</property>
                       <property>metrics/bw-ft</property>
                      <property>aero/bi2vel</property>
                       <property>velocities/r-aero-rad_sec</property>
                       <table>
                           <independentVar>aero/alpha-rad</independentVar>
                           <tableData>
                               -0.175 -0.126
                                -0.087 -0.026
                                 0.0    0.063
                                 0.087  0.113
                                 0.175  0.208
                                 0.262  0.230
                                 0.349  0.319
                                 0.436  0.437
                                 0.524  0.680
                                 0.611  0.100
                                 0.698  0.447
                                 0.785 -0.330
                           </tableData>
                       </table>
                   </product>
               </function>
               <function name="aero/coefficient/Clda">
                   <description>Roll_moment_due_to_aileron</description>
                   <product>
                                <value>3.26</value>
                       <property>aero/qbar-psf</property>
                       <property>metrics/Sw-sqft</property>
                       <property>metrics/bw-ft</property>
                       <property>fcs/left-aileron-pos-rad</property>
                         <table>
                             <independentVar>aero/alpha-rad</independentVar>
                             <tableData>
                                -0.1745   0.045
                                      -0.0873   0.052
                                       0.0000   0.060
                                       0.0873   0.057
                                       0.1745   0.052
                                       0.2618   0.047
                                       0.3491   0.040
                                       0.4363   0.034
                                       0.5236   0.029
                                       0.6109   0.023
                                       0.6981   0.019
                                       0.7854   0.015
                                       0.8727   0.012
                                       1.0472   0.011
                                       1.2217   0.009
                                       1.3963   0.008
                             </tableData>
                         </table>
                   </product>
               </function>
               <function name="aero/coefficient/ClDr">
                   <description>Roll_moment_due_to_rudder</description>
                   <product>
                                <value>1</value>
                       <property>aero/qbar-psf</property>
                       <property>metrics/Sw-sqft</property>
                       <property>metrics/bw-ft</property>
                      <property>fcs/rudder-pos-rad</property>
                         <table>
                             <independentVar>aero/alpha-rad</independentVar>
                            <tableData>
                                 -0.1745    0.0078
                                 -0.0873    0.0070
                                 0.0000    0.0059
                                 0.0873    0.0043
                                 0.1745    0.0023
                                 0.2618    0.0007
                                 0.3491    -0.0008
                                 0.4363    0.0004
                                 0.5236    0.0019
                                 0.6109    0.0019
                                 0.6981    0.0017
                                 0.7854    0.0009
                                 0.8727    0.0003
                                 1.0472    0.0000
                                 1.2217    0.0000
                                 1.3963    0.0000
                             </tableData>
                         </table>
                   </product>
               </function>
           </axis>

           <axis name="PITCH">
               <function name="aero/coefficient/CmDh">
                   <description>Pitch_moment_due_to_horizontal_tail_deflection</description>
                   <product>

                       <property>aero/qbar-psf</property>
                       <property>metrics/Sw-sqft</property>
                       <property>metrics/cbarw-ft</property>
                         <table>
                           <independentVar lookup="row">aero/alpha-rad</independentVar>
                           <independentVar lookup="column">fcs/elevator-pos-rad</independentVar>
                           <tableData>
                                        -0.5236  0.0    0.5236
                                      -0.0873    0.3222 -0.0546 -0.4911
                               0.0000    0.3482  0.0000 -0.4729
                               0.0873    0.3897  0.0286 -0.4782
                               0.1745    0.3689  0.0156 -0.4988
                               0.2618    0.3975  0.0546 -0.4287
                               0.3491    0.3819  0.0442 -0.2722
                               0.4363    0.4131  0.0831 -0.1637
                               0.5236    0.4599  0.1377 -0.0546
                               0.6109    0.4443  0.1325 -0.0530
                               0.6981    0.3819  0.1013 -0.0650
                               0.7854    0.3585  0.0909 -0.0624
                               0.8727    0.3430  0.1299 -0.0364
                               1.0472    0.0208 -0.1117 -0.1975
                               1.2217    0.3248 -0.4521 -0.5144

                           </tableData>
                         </table>
                   </product>
               </function>

               <function name="aero/coefficient/CmDtv">
                   <description>Pitch_moment_due_to_thrust_vectoring</description>
                   <product>
                       <property>aero/qbar-psf</property>
                       <property>metrics/Sw-sqft</property>
                       <property>metrics/cbarw-ft</property>
                       <property>fcs/thrust-norm</property>
                         <table>
                           <independentVar lookup="row">aero/alpha-rad</independentVar>
                           <independentVar lookup="column">fcs/tvc-pos-rad</independentVar>
                           <tableData>
                                        -0.3491  0.0  0.3491
                                       -0.0873    0.4417  0.0 -0.7924
                                0.0000    0.4650  0.0 -0.8366
                                0.0873    0.4448  0.0 -0.8808
                                0.1745    0.4677  0.0 -0.8886
                                0.2618    0.4755  0.0 -0.8600
                                0.3491    0.4625  0.0 -0.7534
                                0.4363    0.4963  0.0 -0.6901
                                0.5236    0.4936  0.0 -0.6408
                                0.6109    0.4781  0.0 -0.6000
                                0.6981    0.5025  0.0 -0.5454
                                0.7854    0.5015  0.0 -0.5143
                                0.8727    0.4209  0.0 -0.5284
                                1.0472    0.4417  0.0 -0.5047
                                1.2217    0.2988  0.0 -0.4883

                           </tableData>
                        </table>
                   </product>
               </function>
                   <function name="aero/coefficient/Cma_M">
                   <description>Change_in_Pitch_moment_due_to_alpha_due_to_mach</description>
                   <product>
                       <property>aero/qbar-psf</property>
                       <property>metrics/Sw-sqft</property>
                       <property>metrics/cbarw-ft</property>
                       <property>aero/alpha-rad</property>
                        <table>
                             <independentVar>velocities/mach</independentVar>
                             <tableData>
                                       0.6000  0.0000
                                       0.8000  0.0974
                                       0.9000  -0.3323
                                       1.0000  -0.9626
                                       1.1000  -0.8480
                                       1.2000  -0.7907
                             </tableData>
                         </table>
                   </product>
               </function>
               <function name="aero/coefficient/Cmq">
                   <description>Pitch_moment_due_to_pitch_rate</description>
                   <product>
                       <property>aero/qbar-psf</property>
                       <property>metrics/Sw-sqft</property>
                       <property>metrics/cbarw-ft</property>
                       <property>aero/ci2vel</property>
                       <property>velocities/q-aero-rad_sec</property>
                       <table>
                             <independentVar>aero/alpha-rad</independentVar>
                             <tableData>
                                       -0.1750  -7.2100
                                -0.0870  -5.4000
                                0.0000  -5.2300
                                0.0870  -5.2600
                                0.1750  -6.1100
                                0.2620  -6.6400
                                0.3490  -5.6900
                                0.4360  -6.0000
                                0.5240  -6.2000
                                0.6110  -6.4000
                                0.6980  -6.6000
                                0.7850  -6.0000
                             </tableData>
                         </table>
                   </product>
               </function>
               <function name="aero/coefficient/Cmadot">
                   <description>Pitch_moment_due_to_alpha_rate</description>
                   <product>
                       <property>aero/qbar-psf</property>
                       <property>metrics/Sw-sqft</property>
                       <property>metrics/cbarw-ft</property>
                       <property>aero/ci2vel</property>
                       <property>aero/alphadot-rad_sec</property>
                       <table>
                             <independentVar>velocities/mach</independentVar>
                             <tableData>
                                 0.2570    -1.5611
                                 1.8000    -2.0500
                             </tableData>
                         </table>
                   </product>
               </function>

           </axis>
           <axis name="YAW">
               <function name="aero/coefficient/Cnb">
                   <description>Yaw_moment_due_to_beta</description>
                   <product>
                      <property>aero/qbar-psf</property>
                       <property>metrics/Sw-sqft</property>
                       <property>metrics/bw-ft</property>
                       <property>aero/beta-rad</property>
                      <table>
                             <independentVar>aero/alpha-rad</independentVar>
                             <tableData>
                                 -0.349        0.0745
                                           0.000        0.1780
                                            0.873        0.0086

                             </tableData>
                         </table>
                   </product>
               </function>
               <function name="aero/coefficient/Cnb_M">
                   <description>Change_in_Yaw_moment_due_to_beta_due_to_mach</description>
                   <product>
                       <property>aero/qbar-psf</property>
                       <property>metrics/Sw-sqft</property>
                       <property>metrics/bw-ft</property>
                       <property>aero/beta-rad</property>
                         <table>
                             <independentVar>velocities/mach</independentVar>
                             <tableData>
                                 0.6000  0.0000
                                      0.7000  -0.0688
                                      0.8000  -0.0172
                                      0.9000  0.0229
                                      1.0000  0.0000
                                      1.2000  -0.0688
                                      1.4000  0.0057
                                      1.6000  0.0688
                             </tableData>
                         </table>
                   </product>
               </function>
               <function name="aero/coefficient/Cnbdot">
                   <description>Yaw_moment_due_to_beta_rate</description>
                   <product>
                       <property>aero/qbar-psf</property>
                       <property>metrics/Sw-sqft</property>
                       <property>metrics/bw-ft</property>
                      <property>aero/bi2vel</property>
                       <property>aero/betadot-rad_sec</property>
                       <value>-0.0115</value>
                   </product>
               </function>
               <function name="aero/coefficient/Cnp">
                   <description>Yaw_moment_due_to_roll_rate</description>
                   <product>
                       <property>aero/qbar-psf</property>
                       <property>metrics/Sw-sqft</property>
                       <property>metrics/bw-ft</property>
                       <property>aero/bi2vel</property>
                       <property>velocities/p-aero-rad_sec</property>
                       <value>-0.0035</value>
                   </product>
               </function>
               <function name="aero/coefficient/Cnr">
                   <description>Yaw_moment_due_to_yaw_rate</description>
                   <product>
                       <property>aero/qbar-psf</property>
                       <property>metrics/Sw-sqft</property>
                       <property>metrics/bw-ft</property>
                       <property>aero/bi2vel</property>
                       <property>velocities/r-aero-rad_sec</property>
                       <value>-0.1500</value>
                   </product>
               </function>
               <function name="aero/coefficient/CnDr">
                   <description>Yaw_moment_due_to_rudder</description>
                   <product>
                                <value>15</value>
                       <property>aero/qbar-psf</property>
                       <property>metrics/Sw-sqft</property>
                       <property>metrics/bw-ft</property>
                       <property>fcs/rudder-pos-rad</property>
                         <table>
                             <independentVar>aero/alpha-rad</independentVar>
                             <tableData>
                                 -0.1745  -0.045
                                      -0.1745    -0.0082
                                -0.0873    -0.0128
                                 0.0000    -0.0131
                                 0.0873    -0.0140
                                 0.1745    -0.0154
                                 0.2618    -0.0128
                                0.3491    -0.0100
                                 0.4363    -0.0077
                                 0.5236    -0.0065
                                 0.6109    -0.0051
                                 0.6981    -0.0041
                                 0.7854    -0.0025
                                 0.8727    0.0000
                                 1.0472    0.0000
                                 1.2217    0.0000
                                 1.3963    0.0000

                             </tableData>
                         </table>
                   </product>
               </function>
                <function name="aero/coefficient/Cndr_M">
                   <description>Change_in_Yaw_moment_due_to_rudder_due_to_mach</description>
                   <product>
                       <property>aero/qbar-psf</property>
                       <property>metrics/Sw-sqft</property>
                       <property>metrics/bw-ft</property>
                        <property>aero/alpha-rad</property>
                       <property>fcs/rudder-pos-rad</property>
                         <table>
                             <independentVar>velocities/mach</independentVar>
                             <tableData>
                                 0.6000  0.0000
                                      1.2000  0.0401
                                      1.6000  0.0716
                             </tableData>
                         </table>
                   </product>
               </function>
               <function name="aero/coefficient/Cnda">
                   <description>Adverse_yaw</description>
                   <product>
                                <value>5</value>
                       <property>aero/qbar-psf</property>
                       <property>metrics/Sw-sqft</property>
                       <property>metrics/bw-ft</property>
                       <property>fcs/left-aileron-pos-rad</property>
                       <table>
                             <independentVar>aero/alpha-rad</independentVar>
                             <tableData>
                                -0.1745  0.01
                                      -0.0873  0.009
                                       0.0000  0.010
                                       0.0873  0.009
                                       0.1745  0.008
                                       0.2618  0.006
                                       0.3491  -0.002
                                       0.4363  -0.003
                                       0.5236  -0.005
                                       0.6109  -0.008
                                       0.6981  -0.006
                                       0.7854  -0.006
                                       0.8727  -0.008
                                       1.0472  -0.01
                                       1.2217  -0.011
                                       1.3963  -0.013
                             </tableData>
                        </table>
                   </product>
               </function>
           </axis>
       </aerodynamics>
<!--
  <output name="f16_datalog.csv" type="CSV" rate="1">
    <property> aero/qbar-psf </property>
    <property> attitude/phi-rad </property>
    <property> position/h-sl-ft </property>
    <property> velocities/vc-kts </property>
    <property> fcs/throttle-cmd-norm </property>
    <property> fcs/elevator-cmd-norm </property>
    <property> fcs/pitch-trim-cmd-norm </property>
    <property> propulsion/total-fuel-lbs </property>
    <property> flight-path/gamma-rad </property>
    <property> accelerations/n-pilot-z-norm </property>
    <rates> ON </rates>
    <velocities> ON </velocities>
    <forces> ON </forces>
    <moments> ON </moments>
    <position> ON </position>
    <fcs> ON </fcs>
    <propulsion> OFF </propulsion>
    <aerosurfaces> ON </aerosurfaces>
    <fcs> ON </fcs>
    <ground_reactions> ON </ground_reactions>
  </output>
-->
</fdm_config>
