<?xml version="1.0"?>
<!-- Failed to tie property fcs/spoiler-control to object methods
     Failed to tie property output-value to object methods
     Failed to tie property output-norm to object methods        -->
<?xml-stylesheet href="JSBSim.xsl" type="application/xml"?>
<fdm_config name="Fokker 100" version="2.0" release="BETA">

    <fileheader>
        <author> Author Name </author>
        <filecreationdate> Creation Date </filecreationdate>
        <description> Description </description>
        <version> Version </version>
        <reference refID="None" author="n/a" title="n/a" date="n/a"/>
        <reference title="Butterworth-Heinemann - Civil Jet Aircraft Design (BH)
        http://www.bh.com/companions/034074152X/appendices/data-a/default.htm"/>
        <reference title="Lissys - PIANO aircraft analysis software
        http://www.lissys.demon.co.uk/f7tx2.html"/>
        <reference title="Advanced Topics in Aerodynamics, Aerodynamic Database (AD)
        http://aerodyn.org/HighLift/tables.html"/>
    </fileheader>

    <metrics>
        <wingarea unit="FT2"> 1006.53 </wingarea>
        <wingspan unit="FT"> 92.13 </wingspan>
        <chord unit="FT"> 12.41 </chord>
        <htailarea unit="FT2"> 244.47 </htailarea>
        <htailarm unit="FT"> 47.22 </htailarm>
        <vtailarea unit="FT2"> 178.83 </vtailarea>
        <vtailarm unit="FT"> 0 </vtailarm>
        <location name="AERORP" unit="IN">
            <x> 627.4 </x>
            <y> 0 </y>
            <z> 18.1 </z>
        </location>
        <location name="EYEPOINT" unit="IN">
            <x> 94.5 </x>
            <y> -22.4 </y>
            <z> 49.2 </z>
        </location>
        <location name="VRP" unit="IN">
            <x> 0 </x>
            <y> 0 </y>
            <z> 0 </z>
        </location>
    </metrics>

    <mass_balance>
        <ixx unit="SLUG*FT2"> 587012 </ixx>
        <iyy unit="SLUG*FT2"> 2.12516e+06 </iyy>
        <izz unit="SLUG*FT2"> 2.51927e+06 </izz>
        <ixz unit="SLUG*FT2"> -0 </ixz>
        <iyz unit="SLUG*FT2"> -0 </iyz>
        <ixy unit="SLUG*FT2"> -0 </ixy>
        <emptywt unit="LBS"> 54218 </emptywt>
        <location name="CG" unit="IN">
            <x> 627.4 </x>
            <y> 0 </y>
            <z> -16.5 </z>
        </location>
        <pointmass name="name">
            <weight unit="LBS"> 230 </weight>
            <location name="POINTMASS" unit="IN">
                <x> 94.5 </x>
                <y> -22.4 </y>
                <z> 25.6 </z>
            </location>
        </pointmass>
        <pointmass name="name">
            <weight unit="LBS"> 230 </weight>
            <location name="POINTMASS" unit="IN">
                <x> 94.5 </x>
                <y> 22.4 </y>
                <z> 25.6 </z>
            </location>
        </pointmass>
        <pointmass name="name">
            <weight unit="LBS"> 400 </weight>
            <location name="POINTMASS" unit="IN">
                <x> 206 </x>
                <y> 22.4 </y>
                <z> 25.6 </z>
            </location>
        </pointmass>
    </mass_balance>

    <ground_reactions>
        <contact type="BOGEY" name="NOSE_LG">
            <location unit="IN">
                <x> 137 </x>
                <y> 0 </y>
                <z> -81.5 </z>
            </location>
            <static_friction> 0.8 </static_friction>
            <dynamic_friction> 0.5 </dynamic_friction>
            <rolling_friction> 0.02 </rolling_friction>
            <spring_coeff unit="LBS/FT"> 28504 </spring_coeff>
            <damping_coeff unit="LBS/FT/SEC"> 9501.3 </damping_coeff>
            <max_steer unit="DEG"> 5 </max_steer>
            <brake_group> NONE </brake_group>
            <retractable>1</retractable>
        </contact>
        <contact type="BOGEY" name="LEFT_MLG">
            <location unit="IN">
                <x> 700.4 </x>
                <y> -113 </y>
                <z> -89.8 </z>
            </location>
            <static_friction> 0.8 </static_friction>
            <dynamic_friction> 0.5 </dynamic_friction>
            <rolling_friction> 0.02 </rolling_friction>
            <spring_coeff unit="LBS/FT"> 95013.4 </spring_coeff>
            <damping_coeff unit="LBS/FT/SEC"> 19002.7 </damping_coeff>
            <max_steer unit="DEG"> 0.0 </max_steer>
            <brake_group> LEFT </brake_group>
            <retractable>1</retractable>
        </contact>
        <contact type="BOGEY" name="RIGHT_MLG">
            <location unit="IN">
                <x> 700.4 </x>
                <y> 113 </y>
                <z> -89.8 </z>
            </location>
            <static_friction> 0.8 </static_friction>
            <dynamic_friction> 0.5 </dynamic_friction>
            <rolling_friction> 0.02 </rolling_friction>
            <spring_coeff unit="LBS/FT"> 95013.4 </spring_coeff>
            <damping_coeff unit="LBS/FT/SEC"> 19002.7 </damping_coeff>
            <max_steer unit="DEG"> 0.0 </max_steer>
            <brake_group> RIGHT </brake_group>
            <retractable>1</retractable>
        </contact>
    </ground_reactions>
    <propulsion>
        <engine file="Tay-651">
            <location unit="IN">
                <x> 1028.74 </x>
                <y> -101.6 </y>
                <z> -49.2 </z>
            </location>
            <orient unit="DEG">
                <roll> 0.0 </roll>
                <pitch> 0 </pitch>
                <yaw> 0 </yaw>
            </orient>
            <feed>0</feed>
            <thruster file="direct">
                <location unit="IN">
                    <x> 1028.74 </x>
                    <y> -101.6 </y>
                    <z> -49.2 </z>
                </location>
                <orient unit="DEG">
                    <roll> 0.0 </roll>
                    <pitch> 0.0 </pitch>
                    <yaw> 0.0 </yaw>
                </orient>
            </thruster>
        </engine>
        <engine file="Tay-651">
            <location unit="IN">
                <x> 1028.74 </x>
                <y> 101.6 </y>
                <z> -49.2 </z>
            </location>
            <orient unit="DEG">
                <roll> 0.0 </roll>
                <pitch> 0 </pitch>
                <yaw> 0 </yaw>
            </orient>
            <feed>1</feed>
            <thruster file="direct">
                <location unit="IN">
                    <x> 1028.74 </x>
                    <y> 101.6 </y>
                    <z> -49.2 </z>
                </location>
                <orient unit="DEG">
                    <roll> 0.0 </roll>
                    <pitch> 0.0 </pitch>
                    <yaw> 0.0 </yaw>
                </orient>
            </thruster>
        </engine>
        <tank type="FUEL">    <!-- Tank number 0 -->
            <location unit="IN">
                <x> 587.4 </x>
                <y> 0 </y>
                <z> -16.5 </z>
            </location>
            <capacity unit="LBS"> 1377 </capacity>
            <contents unit="LBS"> 688.5 </contents>
        </tank>
        <tank type="FUEL">    <!-- Tank number 1 -->
            <location unit="IN">
                <x> 587.4 </x>
                <y> 0 </y>
                <z> -16.5 </z>
            </location>
            <capacity unit="LBS"> 1377 </capacity>
            <contents unit="LBS"> 688.5 </contents>
        </tank>
        <tank type="FUEL">    <!-- Tank number 2 -->
            <location unit="IN">
                <x> 587.4 </x>
                <y> 0 </y>
                <z> -16.5 </z>
            </location>
            <capacity unit="LBS"> 1377 </capacity>
            <contents unit="LBS"> 688.5 </contents>
        </tank>
    </propulsion>
    <flight_control name="Fokker 100">
        <channel name="Pitch">
            <component name="Pitch Trim Sum" type="SUMMER">
                <input>fcs/elevator-cmd-norm</input>
                <input>fcs/pitch-trim-cmd-norm</input>
                <clip>
                    <min>-1</min>
                    <max>1</max>
                </clip>
            </component>

            <component name="Elevator Control" type="AEROSURFACE_SCALE">
                <input>fcs/pitch-trim-sum</input>
                <range>
                    <min>-0.35</min>
                    <max>0.3</max>
                </range>
                <output>fcs/elevator-pos-rad</output>
            </component>
        </channel>
        <channel name="Roll">
            <component name="Roll Trim Sum" type="SUMMER">
                <input>fcs/aileron-cmd-norm</input>
                <input>fcs/roll-trim-cmd-norm</input>
                <clip>
                    <min>-1</min>
                    <max>1</max>
                </clip>
            </component>

            <component name="Left Aileron Control" type="AEROSURFACE_SCALE">
                <input>fcs/roll-trim-sum</input>
                <range>
                    <min>-0.35</min>
                    <max>0.35</max>
                </range>
                <output>fcs/left-aileron-pos-rad</output>
            </component>

            <component name="Right Aileron Control" type="AEROSURFACE_SCALE">
                <input>-fcs/roll-trim-sum</input>
                <range>
                    <min>-0.35</min>
                    <max>0.35</max>
                </range>
                <output>fcs/right-aileron-pos-rad</output>
            </component>
        </channel>
        <channel name="Yaw">
            <component name="Rudder Command Sum" type="SUMMER">
                <input>fcs/rudder-cmd-norm</input>
                <input>fcs/yaw-trim-cmd-norm</input>
                <clip>
                    <min>-1</min>
                    <max>1</max>
                </clip>
            </component>

            <component name="Yaw Damper Rate" type="SCHEDULED_GAIN">
                <input>velocities/r-aero-rad_sec</input>
                <table>
                    <independentVar>aero/qbar-psf</independentVar>
                    <tableData>
                        3.00  0.00
                       11.00  2.00
                    </tableData>
                </table>
            </component>

            <component name="Yaw Damper Beta" type="SCHEDULED_GAIN">
                <input>aero/beta-rad</input>
                <table>
                    <independentVar>aero/qbar-psf</independentVar>
                    <tableData>
                        3.00  0.00
                       11.00  0.00
                    </tableData>
                </table>
            </component>

            <component name="Yaw Damper Sum" type="SUMMER">
                <input>fcs/yaw-damper-beta</input>
                <input>fcs/yaw-damper-rate</input>
                <clip>
                    <min>-0.2</min>
                    <max>0.2</max>
                </clip>
            </component>

            <component name="Yaw Damper Final" type="SCHEDULED_GAIN">
                <input>fcs/yaw-damper-sum</input>
                <table>
                    <independentVar>aero/qbar-psf</independentVar>
                    <tableData>
                        2.99  0.00
                        3.00  1.00
                    </tableData>
                </table>
            </component>

            <component name="Rudder Sum" type="SUMMER">
                <input>fcs/rudder-command-sum</input>
                <input>fcs/yaw-damper-final</input>
                <clip>
                    <min>-1</min>
                    <max>1</max>
                </clip>
            </component>

            <component name="Rudder Control" type="AEROSURFACE_SCALE">
                <input>fcs/rudder-sum</input>
                <range>
                    <min>-0.35</min>
                    <max>0.35</max>
                </range>
                <output>fcs/rudder-pos-rad</output>
            </component>
        </channel>
        <channel name="Flaps">
            <component name="Flaps Control" type="KINEMAT">
                <input>fcs/flap-cmd-norm</input>
                <traverse>
                    <setting>
                        <position>0</position>
                        <time>0</time>
                    </setting>
                    <setting>
                        <position>8</position>
                        <time>3</time>
                    </setting>
                    <setting>
                        <position>15</position>
                        <time>3</time>
                    </setting>
                    <setting>
                        <position>25</position>
                        <time>4</time>
                    </setting>
                    <setting>
                        <position>42</position>
                        <time>4</time>
                    </setting>
                </traverse>
                <output>fcs/flap-pos-deg</output>
            </component>

            <component name="Flaps Control Normalizer" type="AEROSURFACE_SCALE">
                <input>fcs/flap-pos-deg</input>
                <domain>
                    <min>0</min>
                    <max>42</max>
                </domain>
                <range>
                    <min>0</min>
                    <max>1</max>
                </range>
                <output> fcs/flap-pos-norm </output>
            </component>
        </channel>
        <channel name="Landing Gear">
            <component name="Gear Control" type="KINEMAT">
                <input>gear/gear-cmd-norm</input>
                <traverse>
                    <setting>
                        <position>0</position>
                        <time>0</time>
                    </setting>
                    <setting>
                        <position>1</position>
                        <time>5</time>
                    </setting>
                </traverse>
                <output>gear/gear-pos-norm</output>
            </component>
        </channel>
        <channel name="Speedbrake">
            <component name="Speedbrake Control" type="KINEMAT">
                <input>fcs/speedbrake-cmd-norm</input>
                <traverse>
                    <setting>
                        <position>0</position>
                        <time>0</time>
                    </setting>
                    <setting>
                        <position>1</position>
                        <time>1</time>
                    </setting>
                </traverse>
                <output>fcs/speedbrake-pos-norm</output>
            </component>
        </channel>
        <channel name="Spoilers">
            <component name="Spoiler Control" type="KINEMAT">
                <input>fcs/spoiler-cmd-norm</input>
                <traverse>
                    <setting>
                        <position>0</position>
                        <time>0</time>
                    </setting>
                    <setting>
                        <position>1</position>
                        <time>1</time>
                    </setting>
                </traverse>
                <output>fcs/spoiler-pos-norm</output>
            </component>

            <component name="Reverser Pos Norm" type="KINEMAT">
                <input>fcs/spoiler-cmd-norm</input>
                <traverse>
                    <setting>
                        <position>0</position>
                        <time>0</time>
                    </setting>
                    <setting>
                        <position>1</position>
                        <time>1</time>
                    </setting>
                </traverse>
            </component>
        </channel>
    </flight_control>
    <aerodynamics>

        <function name="aero/function/kCDge">
            <description>Change_in_drag_due_to_ground_effect</description>
            <product>
                  <table>
                      <independentVar>aero/h_b-mac-ft</independentVar>
                      <tableData>
                          0.0000	0.0350
                          0.1000	0.4170
                          0.1500	0.5390
                          0.2000	0.6240
                          0.3000	0.7510
                          0.4000	0.8000
                          0.5000	0.8960
                          0.6000	0.9390
                          0.7000	0.9740
                          0.8000	0.9810
                          0.9000	0.9900
                          1.0000	0.9940
                          1.1000	1.0000
                      </tableData>
                  </table>
            </product>
        </function>

        <function name="aero/function/kCLge">
            <description>Change_in_lift_due_to_ground_effect</description>
            <product>
                  <table>
                      <independentVar>aero/h_b-mac-ft</independentVar>
                      <tableData>
                          0.0000	1.3910
                          0.1000	1.2350
                          0.1500	1.1670
                          0.2000	1.1350
                          0.3000	1.0850
                          0.4000	1.1020
                          0.5000	1.0350
                          0.6000	1.0240
                          0.7000	1.0150
                          0.8000	1.0110
                          0.9000	1.0060
                          1.0000	1.0040
                          1.1000	1.0000
                      </tableData>
                  </table>
            </product>
        </function>

        <axis name="DRAG">
            <function name="aero/coefficient/CD0">
                <description>Drag_at_zero_lift</description>
                <product>
                    <property>aero/qbar-psf</property>
                    <property>metrics/Sw-sqft</property>
                    <property>aero/function/kCDge</property>
                      <table>
                          <independentVar>aero/alpha-rad</independentVar>
                          <tableData>
                              -1.5700	1.5000
                              -0.2600	0.0400
                              0.0000	0.0192
                              0.2600	0.0400
                              1.5700	1.5000
                          </tableData>
                      </table>
                </product>
            </function>
            <function name="aero/coefficient/CDi">
                <description>Induced_drag</description>
                <product>
                    <property>aero/qbar-psf</property>
                    <property>metrics/Sw-sqft</property>
                    <property>aero/cl-squared-norm</property>
                    <property>aero/function/kCDge</property>
                    <value>0.0448</value>
                </product>
            </function>
            <function name="aero/coefficient/CDflap">
                <description>Drag_due_to_flaps</description>
                <product>
                    <property>aero/qbar-psf</property>
                    <property>metrics/Sw-sqft</property>
                    <property>fcs/flap-pos-norm</property>
                    <property>aero/function/kCDge</property>
                    <value>0.0830</value>
                </product>
            </function>
            <function name="aero/coefficient/CDmach">
                <description>Drag_due_to_mach</description>
                <product>
                    <property>aero/qbar-psf</property>
                    <property>metrics/Sw-sqft</property>
                      <table>
                          <independentVar>velocities/mach-norm</independentVar>
                          <tableData>
                              0.0000	0.0000
                              0.6500	0.0000
                              0.7700	0.0015
                              0.8600	0.0200
                              1.1000	0.0390
                              1.8000	0.0260
                          </tableData>
                      </table>
                </product>
            </function>
            <function name="aero/coefficient/CDgear">
                <description>Drag_due_to_gear</description>
                <product>
                    <property>aero/qbar-psf</property>
                    <property>metrics/Sw-sqft</property>
                    <property>gear/gear-pos-norm</property>
                    <value>0.0120</value>
                </product>
            </function>
            <function name="aero/coefficient/CDsb">
                <description>Drag_due_to_speedbrakes</description>
                <product>
                    <property>aero/qbar-psf</property>
                    <property>metrics/Sw-sqft</property>
                    <property>fcs/speedbrake-pos-norm</property>
                    <value>0.1200</value>
                </product>
            </function>
            <function name="aero/coefficient/CDsp">
                <description>Drag_due_to_spoilers</description>
                <product>
                    <property>aero/qbar-psf</property>
                    <property>metrics/Sw-sqft</property>
                    <property>fcs/spoiler-pos-norm</property>
                    <value>0.0280</value>
                </product>
            </function>
            <function name="aero/coefficient/CDbeta">
                <description>Drag_due_to_sideslip</description>
                <product>
                    <property>aero/qbar-psf</property>
                    <property>metrics/Sw-sqft</property>
                      <table>
                          <independentVar>aero/beta-rad</independentVar>
                          <tableData>
                              -1.5700	1.2300
                              -0.2600	0.0500
                              0.0000	0.0000
                              0.2600	0.0500
                              1.5700	1.2300
                          </tableData>
                      </table>
                </product>
            </function>
            <function name="aero/coefficient/CDde">
                <description>Drag_due_to_Elevator_Deflection</description>
                <product>
                    <property>aero/qbar-psf</property>
                    <property>metrics/Sw-sqft</property>
                    <property>fcs/elevator-pos-norm</property>
                    <value>0.0590</value>
                </product>
            </function>
        </axis>

        <axis name="SIDE">
            <function name="aero/coefficient/CYb">
                <description>Side_force_due_to_beta</description>
                <product>
                    <property>aero/qbar-psf</property>
                    <property>metrics/Sw-sqft</property>
                    <property>aero/beta-rad</property>
                    <value>-1.0000</value>
                </product>
            </function>
        </axis>

        <axis name="LIFT">
            <function name="aero/coefficient/CLalpha">
                <description>Lift_due_to_alpha</description>
                <product>
                    <property>aero/qbar-psf</property>
                    <property>metrics/Sw-sqft</property>
                    <property>aero/function/kCLge</property>
                      <table>
                          <independentVar>aero/alpha-rad</independentVar>
                          <tableData>
                              -0.2000 -0.6800
                              0.0000 0.2000
                              0.2300 1.3000
                              0.6000 0.6000
                          </tableData>
                      </table>
                </product>
            </function>
            <function name="aero/coefficient/dCLflap">
                <description>Delta_Lift_due_to_flaps</description>
                <product>
                    <property>aero/qbar-psf</property>
                    <property>metrics/Sw-sqft</property>
                    <property>aero/function/kCLge</property>
                      <table>
                          <independentVar>fcs/flap-pos-norm</independentVar>
                          <tableData>
                              0.0000	0.0000
                              0.3570	0.4900
                              1.0000	1.1800
                          </tableData>
                      </table>
                </product>
            </function>
            <function name="aero/coefficient/dCLsp">
                <description>Delta_Lift_due_to_spoiler</description>
                <product>
                    <property>aero/qbar-psf</property>
                    <property>metrics/Sw-sqft</property>
                    <property>fcs/spoiler-pos-norm</property>
                    <property>aero/function/kCLge</property>
                    <value>-0.1200</value>
                </product>
            </function>
            <function name="aero/coefficient/CLde">
                <description>Lift_due_to_Elevator_Deflection</description>
                <product>
                    <property>aero/qbar-psf</property>
                    <property>metrics/Sw-sqft</property>
                    <property>fcs/elevator-pos-rad</property>
                    <value>0.2000</value>
                </product>
            </function>
        </axis>

        <axis name="ROLL">
            <function name="aero/coefficient/Clb">
                <description>Roll_moment_due_to_beta</description>
                <product>
                    <property>aero/qbar-psf</property>
                    <property>metrics/Sw-sqft</property>
                    <property>metrics/bw-ft</property>
                    <property>aero/beta-rad</property>
                    <value>-0.1000</value>
                </product>
            </function>
            <function name="aero/coefficient/Clp">
                <description>Roll_moment_due_to_roll_rate</description>
                <product>
                    <property>aero/qbar-psf</property>
                    <property>metrics/Sw-sqft</property>
                    <property>metrics/bw-ft</property>
                    <property>aero/bi2vel</property>
                    <property>velocities/p-aero-rad_sec</property>
                    <value>-0.4000</value>
                </product>
            </function>
            <function name="aero/coefficient/Clr">
                <description>Roll_moment_due_to_yaw_rate</description>
                <product>
                    <property>aero/qbar-psf</property>
                    <property>metrics/Sw-sqft</property>
                    <property>metrics/bw-ft</property>
                    <property>aero/bi2vel</property>
                    <property>velocities/r-aero-rad_sec</property>
                    <value>0.1500</value>
                </product>
            </function>
            <function name="aero/coefficient/Clda">
                <description>Roll_moment_due_to_aileron</description>
                <product>
                    <property>aero/qbar-psf</property>
                    <property>metrics/Sw-sqft</property>
                    <property>metrics/bw-ft</property>
                    <property>fcs/left-aileron-pos-rad</property>
                      <table>
                          <independentVar>velocities/mach-norm</independentVar>
                          <tableData>
                              0.0000	0.1000
                              2.0000	0.0330
                          </tableData>
                      </table>
                </product>
            </function>
            <function name="aero/coefficient/Cldr">
                <description>Roll_moment_due_to_rudder</description>
                <product>
                    <property>aero/qbar-psf</property>
                    <property>metrics/Sw-sqft</property>
                    <property>metrics/bw-ft</property>
                    <property>fcs/rudder-pos-rad</property>
                    <value>0.0100</value>
                </product>
            </function>
        </axis>

        <axis name="PITCH">
            <function name="aero/function/kCmge">
                <description>Change_in_lift_due_to_ground_effect</description>
                <product>
                      <table>
                          <independentVar>aero/h_b-mac-ft</independentVar>
                          <tableData>
                              0.0000	1.2030
                              0.1000	1.1270
                              0.1500	1.0900
                              0.2000	1.0730
                              0.3000	1.0460
                              0.4000	1.0550
                              0.5000	1.0190
                              0.6000	1.0130
                              0.7000	1.0080
                              0.8000	1.0060
                              0.9000	1.0030
                              1.0000	1.0020
                              1.1000	1.0000
                          </tableData>
                      </table>
                </product>
            </function>

            <function name="aero/coefficient/Cmo">
                <description>Pitching_moment_at_zero_alpha</description>
                <product>
                    <property>aero/qbar-psf</property>
                    <property>metrics/Sw-sqft</property>
                    <property>metrics/cbarw-ft</property>
                    <property>aero/function/kCmge</property>
                    <value>-0.0748</value>
                </product>
            </function>
            <function name="aero/coefficient/Cmalpha">
                <description>Pitch_moment_due_to_alpha</description>
                <product>
                    <property>aero/qbar-psf</property>
                    <property>metrics/Sw-sqft</property>
                    <property>metrics/cbarw-ft</property>
                    <property>aero/alpha-rad</property>
                    <value>-0.6000</value>
                </product>
            </function>
            <function name="aero/coefficient/Cmde">
                <description>Pitch_moment_due_to_elevator</description>
                <product>
                    <property>aero/qbar-psf</property>
                    <property>metrics/Sw-sqft</property>
                    <property>metrics/cbarw-ft</property>
                    <property>fcs/elevator-pos-rad</property>
                      <table>
                          <independentVar>velocities/mach-norm</independentVar>
                          <tableData>
                              0.0000	-1.2000
                              2.0000	-0.3000
                          </tableData>
                      </table>
                </product>
            </function>
            <function name="aero/coefficient/Cmq">
                <description>Pitch_moment_due_to_pitch_rate</description>
                <product>
                    <property>aero/qbar-psf</property>
                    <property>metrics/Sw-sqft</property>
                    <property>metrics/cbarw-ft</property>
                    <property>aero/ci2vel</property>
                    <property>velocities/q-aero-rad_sec</property>
                    <value>-17.0000</value>
                </product>
            </function>
            <function name="aero/coefficient/Cmadot">
                <description>Pitch_moment_due_to_alpha_rate</description>
                <product>
                    <property>aero/qbar-psf</property>
                    <property>metrics/Sw-sqft</property>
                    <property>metrics/cbarw-ft</property>
                    <property>aero/ci2vel</property>
                    <property>aero/alphadot-rad_sec</property>
                    <value>-6.0000</value>
                </product>
            </function>
        </axis>

        <axis name="YAW">
            <function name="aero/coefficient/Cnb">
                <description>Yaw_moment_due_to_beta</description>
                <product>
                    <property>aero/qbar-psf</property>
                    <property>metrics/Sw-sqft</property>
                    <property>metrics/bw-ft</property>
                    <property>aero/beta-rad</property>
                    <value>0.1200</value>
                </product>
            </function>
            <function name="aero/coefficient/Cnr">
                <description>Yaw_moment_due_to_yaw_rate</description>
                <product>
                    <property>aero/qbar-psf</property>
                    <property>metrics/Sw-sqft</property>
                    <property>metrics/bw-ft</property>
                    <property>aero/bi2vel</property>
                    <property>velocities/r-aero-rad_sec</property>
                    <value>-0.1500</value>
                </product>
            </function>
            <function name="aero/coefficient/Cndr">
                <description>Yaw_moment_due_to_rudder</description>
                <product>
                    <property>aero/qbar-psf</property>
                    <property>metrics/Sw-sqft</property>
                    <property>metrics/bw-ft</property>
                    <property>fcs/rudder-pos-rad</property>
                    <value>-0.1000</value>
                </product>
            </function>
            <function name="aero/coefficient/Cnda">
                <description>Adverse_yaw</description>
                <product>
                    <property>aero/qbar-psf</property>
                    <property>metrics/Sw-sqft</property>
                    <property>metrics/bw-ft</property>
                    <property>fcs/left-aileron-pos-rad</property>
                    <value>0.0000</value>
                </product>
            </function>
        </axis>
    </aerodynamics>
</fdm_config>
