<FDM_CONFIG NAME="GENERIC" VERSION="1.65">
<!--

  File:        generic.xml
  Author:      Sonny Hammaker
  -->

  <METRICS>
    <!--
      // Wing area (ft^2)
      // Wing span (ft)
      // Wing avg. chord (ft)
      // H. Tail Area (ft^2)
      // Wing MAC to H.Tail MAC (ft)
      // V. Tail Area (ft^2)
      // Wing MAC to V.Tail MAC (ft)
      // Ixx
      // Iyy
      // Izz
      // Ixz
      // Empty weight
      // Center of gravity location, empty weight, in aircraft's own structural coord
      //   system. X, Y, Z, in inches
      // Pilot's eyepoint location, in aircraft's own coord system, FROM cg.
      //  X, Y, Z, in inches
      //AC_AERORP   43.2  0.0    59.4
    -->


    AC_WINGAREA 1.4309
    AC_WINGSPAN   3.615
    AC_CHORD 0.39583

    //AC_WINGAREA 9.816
    //AC_WINGSPAN 12
    //AC_CHORD 0.818

    AC_HTAILAREA 2.0313
    AC_HTAILARM  1.8229
    AC_VTAILAREA 0.1094
    AC_HV        2.25


    AC_IXX     0.2296
    AC_IYY     0.3544
    AC_IZZ     0.5711
    AC_IXZ     0.0176

    //AC_IXX     0.18067
    //AC_IYY     0.15987
    //AC_IZZ     0.32438
    //AC_IXZ     0.01519

    AC_EMPTYWT    3.5
    AC_AERORP     16.8  0.0 0.0
    AC_CGLOC      16.51 0.0 0.0

  </METRICS>
  <UNDERCARRIAGE>
    //AC_GEAR  MLG_NOSE    -16.42 0.0  -5.98  30  5.01  0.8 0.9 0.2 CASTERED  NONE 0 FIXED
    //AC_GEAR  MLG_CENTER  -2.8   0.0  -6.47  40  5.012 0.8 0.9 0.2 CASTERED  NONE 0 FIXED
    //AC_GEAR  WT_RIGHT    0.0   80.0   2.0   20   1.3   0.8 0.8 0.6 FIXED      NONE 0 FIXED
    //AC_GEAR  WT_LEFT     0.0  -80.0   2.0   20   1.3   0.8 0.8 0.6 FIXED      NONE 0 FIXED
    //AC_GEAR  TAIL        69.3   0.0  -1.85   86   7.2   0.8 0.8 0.3 CASTERED  NONE 0 FIXED
    //AC_GEAR  TAIL2       69.5   0.0  18.5    64   7.2   0.7 0.8 0.7 CASTERED  NONE 0 FIXED
    //AC_GEAR  BACK        -4.0    0.0   2.0   60   7.2   0.8 0.8 0.8 FIXED     NONE 0 FIXED
    //AC_GEAR  NOSE        -27.6  0.0  -0.35   40  8.2   0.9 0.9 0.6 FIXED     NONE 0 FIXED
  </UNDERCARRIAGE>


   <PROPULSION>

    <!--
      TANKS SECTION

      Tank locations and characteristics, empty weight, in aircraft's own coord system:
      X, Y, Z, in inches
      effective radius of tank, in inches (for fuel slosh, if/when modeled)
      capacity in pounds
      Current contents, in pounds

      ENGINE[S] SECTION

      Engine[s] is|are specified by giving engine name (which corresponds to an engine
      definition file in the "engines" directory) followed by x, y, z placement and
      pitch and yaw orientation. Coordinates are given in inches in the structural
      coordinate frame. Angles for pitch and yaw are specified in radians.

      AC_ENGINE name x y z pitch yaw

      THRUSTER[S] SECTION

      AC_THRUSTER name x y z pitch yaw
    -->

    <AC_ENGINE FILE="eng_io320">
      XLOC    -14.0
      YLOC    0.0
      ZLOC    0.0
      PITCH   0.0
      YAW     0.0
      FEED      0
      FEED      1
      <AC_THRUSTER FILE="prop_75in2f">
        XLOC    -16.0
        YLOC    0.0
        ZLOC    0.0
        PITCH   0.0
        YAW     0
        P_FACTOR 0.0
        SENSE   1.0
      </AC_THRUSTER>
    </AC_ENGINE>

  </PROPULSION>


  <FLIGHT_CONTROL NAME="Generic">
    <COMPONENT NAME="Pitch Trim Sum" TYPE="SUMMER">
       INPUT        fcs/elevator-cmd-norm
       INPUT        fcs/pitch-trim-cmd-norm
       CLIPTO       -1 1
    </COMPONENT>
    <COMPONENT NAME="Elevator Control" TYPE="AEROSURFACE_SCALE">
       INPUT         fcs/pitch-trim-sum
       MIN          -20
       MAX           20
       OUTPUT        fcs/elevator-pos-rad
       GAIN          0.01745
     </COMPONENT>
     <COMPONENT NAME="Roll Trim Sum" TYPE="SUMMER">
       INPUT        fcs/aileron-cmd-norm
       INPUT        fcs/roll-trim-cmd-norm
       CLIPTO       -1 1
     </COMPONENT>
     <COMPONENT NAME="Left Aileron Control" TYPE="AEROSURFACE_SCALE">
       INPUT         fcs/roll-trim-sum
       MIN          -20
       MAX           20
       GAIN          0.01745
       OUTPUT        fcs/left-aileron-pos-rad
     </COMPONENT>
      <COMPONENT NAME="Right Aileron Control" TYPE="AEROSURFACE_SCALE">
       INPUT         fcs/roll-trim-sum
       MIN          -20
       MAX           20
       GAIN         -0.01745
       OUTPUT        fcs/right-aileron-pos-rad
     </COMPONENT>
     <COMPONENT NAME="Yaw Trim Sum" TYPE="SUMMER">
       INPUT        fcs/rudder-cmd-norm
       INPUT        fcs/yaw-trim-cmd-norm
       CLIPTO       -1 1
     </COMPONENT>
     <COMPONENT NAME="Rudder Control" TYPE="AEROSURFACE_SCALE">
       INPUT        fcs/rudder-cmd-norm
       MIN         -15
       MAX          15
       GAIN         0.01745
       OUTPUT       fcs/rudder-pos-rad
     </COMPONENT>
   </FLIGHT_CONTROL>
   <AERODYNAMICS>

     AC_ALPHALIMITS -0.87 1.2

     <AXIS NAME="LIFT">
       <GROUP NAME="CLb">
         Basic_lift
         <FACTOR NAME="kCLge" TYPE="VECTOR">
            Change_in_lift_due_to_ground_effect
            13
            aero/h_b-mac-ft
            none
            0.0   1.203
            0.1   1.127
            0.15  1.090
            0.2   1.073
            0.3   1.046
            0.4   1.055
            0.5   1.019
            0.6   1.013
            0.7   1.008
            0.8   1.006
            0.9   1.003
            1.0   1.002
            1.1   1.0
         </FACTOR>
         <COEFFICIENT NAME="CLwbh" TYPE="VECTOR">
            Lift_due_to_alpha
            39
            aero/alpha-rad
            aero/qbar-psf | metrics/Sw-sqft
            -0.1047    -0.23
            -0.1222    -0.21
            -0.1369    -0.20
            -0.1571    -0.15
            -0.0524    -0.09
            -0.0349    -0.04
            -0.0175     0.00
             0.0000     0.20
             0.0175     0.56
             0.0349     0.64
             0.0524     0.71
             0.0698     0.78
             0.0873     0.82
             0.1047     0.92
             0.1222     0.99
             0.1369     1.06
             0.1571     1.10
             0.1745     1.16
             0.1920     1.22
             0.2094     1.25
             0.2269     1.26
             0.2444     1.25
             0.2618     1.24
             0.2793     1.21
             0.2967     1.16
             0.3142     1.14
             0.3316     1.14
             0.3491     1.09
             0.4363     0.98
             0.5236     0.88
             0.6109     0.83
             0.6981     0.84
             0.7854     0.82
             0.8727     0.79
             0.9599     0.74
             0.6981     0.66
             1.2217     0.47
             1.3963     0.26
             1.5708     0.03
          </COEFFICIENT>
       </GROUP>
       <COEFFICIENT NAME="CLDe" TYPE="VALUE">
         Lift_due_to_Elevator_Deflection
         aero/qbar-psf | metrics/Sw-sqft | fcs/elevator-pos-rad
         0.989274
       </COEFFICIENT>
    </AXIS>
    <AXIS NAME="DRAG">
      <COEFFICIENT NAME="CDo" TYPE="VALUE">
         Drag_at_zero_lift
         aero/qbar-psf | metrics/Sw-sqft
         0.0130
      </COEFFICIENT>
      <COEFFICIENT NAME="CDwbh" TYPE="TABLE">
         Drag_due_to_alpha
         21
         1
         aero/alpha-rad
         fcs/flap-pos-deg
         aero/qbar-psf | metrics/Sw-sqft
         -0.0175     0.0320
          0.0000     0.0325
          0.0175     0.0330
          0.0349     0.0335
          0.0524     0.0340
          0.0698     0.0345
          0.0873     0.0350
          0.1745     0.050
          0.2618     0.063
          0.3491     0.077
          0.4363     0.080
          0.5236     0.090
          0.6109     0.16
          0.6981     0.125
          0.7854     0.136
          0.8727     0.146
          0.9599     0.154
          0.6981     0.162
          1.2217     0.178
          1.3963     0.180
          1.5708     0.196
       </COEFFICIENT>
       <COEFFICIENT NAME="CDDe" TYPE="VALUE">
         Drag_due_to_Elevator_Deflection
        aero/qbar-psf | metrics/Sw-sqft | fcs/elevator-pos-rad
        0.03412
       </COEFFICIENT>
    </AXIS>
    <AXIS NAME="SIDE">
       <COEFFICIENT NAME="CYb" TYPE="VALUE">
         Side_force_due_to_beta
         aero/qbar-psf | metrics/Sw-sqft | aero/beta-rad
         -0.7678
       </COEFFICIENT>
      <COEFFICIENT NAME="CYda" TYPE="VALUE">
         Side_force_due_to_aileron
         aero/qbar-psf | metrics/Sw-sqft | fcs/left-aileron-pos-rad
         -0.02956
       </COEFFICIENT>
      <COEFFICIENT NAME="CYdr" TYPE="VALUE">
         Side_force_due_to_rudder
         aero/qbar-psf | metrics/Sw-sqft | fcs/rudder-pos-rad
         0.1158
      </COEFFICIENT>
    </AXIS>

    <AXIS NAME="ROLL">
       <COEFFICIENT NAME="Clo" TYPE="VALUE">
         Roll_moment_due_to_vertical_tail_incidence
         aero/qbar-psf | metrics/Sw-sqft | metrics/bw-ft
         -0.00005910
       </COEFFICIENT>
       <COEFFICIENT NAME="Clb" TYPE="VALUE">
         Roll_moment_due_to_beta
         aero/qbar-psf | metrics/Sw-sqft | metrics/bw-ft | aero/beta-rad
         -0.06180
       </COEFFICIENT>
       <COEFFICIENT NAME="Clp" TYPE="VALUE">
         Roll_moment_due_to_roll_rate_(roll_damping)
         aero/qbar-psf | metrics/Sw-sqft | metrics/bw-ft | aero/bi2vel | velocities/p-aero-rad_sec
         -0.5045
       </COEFFICIENT>
       <COEFFICIENT NAME="Clr" TYPE="VALUE">
         Roll_moment_due_to_yaw_rate
         aero/qbar-psf | metrics/Sw-sqft | metrics/bw-ft | aero/bi2vel | velocities/r-aero-rad_sec
         0.1695
       </COEFFICIENT>
       <COEFFICIENT NAME="Clda" TYPE="VALUE">
         Roll_moment_due_to_aileron
         aero/qbar-psf | metrics/Sw-sqft | metrics/bw-ft | fcs/left-aileron-pos-rad
         0.09917
       </COEFFICIENT>
       <COEFFICIENT NAME="Cldr" TYPE="VALUE">
         Roll_moment_due_to_rudder
         aero/qbar-psf | metrics/Sw-sqft | metrics/bw-ft | fcs/rudder-pos-rad
         0.006934
        </COEFFICIENT>
      </AXIS>
    <AXIS NAME="PITCH">
      <COEFFICIENT NAME="Cmalpha" TYPE="VALUE">
        Pitch_moment_due_to_alpha
        aero/qbar-psf | metrics/Sw-sqft | metrics/cbarw-ft | aero/alpha-rad
        -1.6028
      </COEFFICIENT>
      <COEFFICIENT NAME="Cmq" TYPE="VALUE">
         Pitch_moment_due_to_pitch_rate
         aero/qbar-psf | metrics/Sw-sqft | metrics/cbarw-ft | aero/ci2vel | velocities/q-aero-rad_sec
         -15.56
      </COEFFICIENT>
      <COEFFICIENT NAME="Cmo" TYPE="VALUE">
        Pitching_moment_at_zero_alpha
        aero/qbar-psf | metrics/Sw-sqft | metrics/cbarw-ft
        0.000
      </COEFFICIENT>
      <COEFFICIENT NAME="Cmde" TYPE="VALUE">
        Pitch_moment_due_to_elevator_deflection
        aero/qbar-psf | metrics/Sw-sqft | metrics/cbarw-ft | fcs/elevator-pos-rad
        -1.221
      </COEFFICIENT>

    </AXIS>

    <AXIS NAME="YAW">
       <COEFFICIENT NAME="Cnb" TYPE="VALUE">
         Yaw_moment_due_to_beta
         aero/qbar-psf | metrics/Sw-sqft | metrics/bw-ft | aero/beta-rad
         0.006719
       </COEFFICIENT>
       <COEFFICIENT NAME="Cnp" TYPE="VALUE">
         Yaw_moment_due_to_roll_rate
         aero/qbar-psf | metrics/Sw-sqft | metrics/bw-ft | aero/bi2vel | velocities/p-aero-rad_sec
         -0.1585
       </COEFFICIENT>
       <COEFFICIENT NAME="Cnr" TYPE="VALUE">
         Yaw_moment_due_to_yaw_rate
         aero/qbar-psf | metrics/Sw-sqft | metrics/bw-ft | aero/bi2vel | velocities/r-aero-rad_sec
        -.1112
       </COEFFICIENT>
       <COEFFICIENT NAME="Cnda" TYPE="VALUE">
         Yaw_moment_due_to_aileron
         aero/qbar-psf | metrics/Sw-sqft | metrics/bw-ft | fcs/left-aileron-pos-rad
         -0.003872
       </COEFFICIENT>
       <COEFFICIENT NAME="Cndr" TYPE="VALUE">
         Yaw_moment_due_to_rudder
         aero/qbar-psf | metrics/Sw-sqft | metrics/bw-ft | fcs/rudder-pos-rad
         -0.08265
       </COEFFICIENT>
    </AXIS>
  </AERODYNAMICS>
  <!--
    OUTPUT section definition

    The following specifies the way that JSBSim writes out data.

    NAME is the filename you want the output to go to

    TYPE can be:
      CSV       Comma separated data. If a filename is supplied then the data
                goes to that file. If COUT or cout is specified, the data goes
                to stdout. If the filename is a null filename the data goes to
                stdout, as well.
      SOCKET    Will eventually send data to a socket output, where NAME
                would then be the IP address of the machine the data should be
                sent to. DONT USE THIS YET!
      TABULAR   Columnar data. NOT IMPLEMENTED YET!
      TERMINAL  Output to terminal. NOT IMPLEMENTED YET!
      NONE      Specifies to do nothing. THis setting makes it easy to turn on and
                off the data output without having to mess with anything else.

    The arguments that can be supplied, currently, are

    RATE_IN_HZ  An integer rate in times-per-second that the data is output. This
                value may not be *exactly* what you want, due to the dependence
                on dt, the cycle rate for the FDM.

    The following parameters tell which subsystems of data to output:

    SIMULATION       ON|OFF
    ATMOSPHERE       ON|OFF
    MASSPROPS        ON|OFF
    AEROSURFACES     ON|OFF
    RATES            ON|OFF
    VELOCITIES       ON|OFF
    FORCES           ON|OFF
    MOMENTS          ON|OFF
    POSITION         ON|OFF
    COEFFICIENTS     ON|OFF
    GROUND_REACTIONS ON|OFF
    FCS              ON|OFF
    PROPULSION       ON|OFF

    NOTE that Time is always output with the data.
  -->
  <OUTPUT NAME="PADV.csv" TYPE="CSV">
    RATE_IN_HZ       50
    SIMULATION       OFF
    ATMOSPHERE       OFF
    MASSPROPS        OFF
    AEROSURFACES     OFF
    RATES            OFF
    VELOCITIES       OFF
    FORCES           OFF
    MOMENTS          OFF
    POSITION         OFF
    COEFFICIENTS     OFF
    GROUND_REACTIONS OFF
    FCS              OFF
    PROPULSION       OFF
  </OUTPUT>
</FDM_CONFIG>
