<?xml version="1.0"?>
<propeller name="Simulated APC 11x5.5E 8K">
  <ixx> 0.000110 </ixx>
  <diameter unit="IN"> 11 </diameter>
  <numblades> 2   </numblades>
  <minpitch> 5.5 </minpitch>
  <maxpitch> 5.5 </maxpitch>
  <table name="C_THRUST" type="internal">
    <tableData>
		0		0.1028
		0.02	0.1015
		0.05	0.1
		0.07	0.0983
		0.1		0.0965
		0.12	0.0945
		0.14	0.0923
		0.17	0.09
		0.19	0.0875
		0.22	0.0848
		0.24	0.0819
		0.27	0.0788
		0.29	0.0755
		0.31	0.072
		0.34	0.0683
		0.36	0.0644
		0.39	0.0604
		0.41	0.0563
		0.43	0.0521
		0.46	0.0478
		0.48	0.0435
		0.51	0.039
		0.53	0.0344
		0.55	0.0297
		0.58	0.025
		0.6		0.0201
		0.63	0.0152
		0.65	0.0102
		0.68	0.0051
		0.7		0
    </tableData>
  </table>
  <table name="C_POWER" type="internal">
    <tableData>
		0		0.0378
		0.02	0.0382
		0.05	0.0385
		0.07	0.0388
		0.1		0.039
		0.12	0.0392
		0.14	0.0392
		0.17	0.0392
		0.19	0.0391
		0.22	0.0389
		0.24	0.0386
		0.27	0.0382
		0.29	0.0376
		0.31	0.0369
		0.34	0.036
		0.36	0.035
		0.39	0.0338
		0.41	0.0326
		0.43	0.0311
		0.46	0.0295
		0.48	0.0278
		0.51	0.0259
		0.53	0.0239
		0.55	0.0216
		0.58	0.0191
		0.6		0.0165
		0.63	0.0136
		0.65	0.0106
		0.68	0.0075
		0.7		0.0045
    </tableData>
  </table>
</propeller>
