<?xml version="1.0"?>

<!-- Generated by apc_dat_to_jsbsim_xml.py from PER3_18x8E.dat -->

<propeller name="18x8E">
  <ixx unit="KG*M2"> 1.269e-03 </ixx>  <!-- (1/12) * 72.9e-3 * (18*0.0254)^2 -->
  <diameter unit="IN">18</diameter>
  <numblades>2</numblades>
  <constspeed>0</constspeed>

  <!-- C_THRUST and C_POWER from APC PER3 measurement data at 10000 RPM -->

  <table name="C_THRUST" type="internal">
    <tableData>
        0.0000     0.0836
        0.0202     0.0822
        0.0405     0.0806
        0.0607     0.0789
        0.0809     0.0771
        0.1012     0.0753
        0.1214     0.0732
        0.1416     0.0711
        0.1619     0.0688
        0.1821     0.0665
        0.2023     0.0640
        0.2226     0.0613
        0.2428     0.0586
        0.2630     0.0557
        0.2833     0.0527
        0.3035     0.0496
        0.3237     0.0464
        0.3440     0.0430
        0.3642     0.0397
        0.3844     0.0362
        0.4047     0.0327
        0.4249     0.0291
        0.4451     0.0254
        0.4654     0.0218
        0.4856     0.0181
        0.5058     0.0144
        0.5260     0.0107
        0.5463     0.0071
        0.5665     0.0035
        0.5867    -0.0001
    </tableData>
  </table>

  <table name="C_POWER" type="internal">
    <tableData>
        0.0000     0.0250
        0.0202     0.0253
        0.0405     0.0255
        0.0607     0.0257
        0.0809     0.0258
        0.1012     0.0259
        0.1214     0.0259
        0.1416     0.0259
        0.1619     0.0258
        0.1821     0.0257
        0.2023     0.0254
        0.2226     0.0251
        0.2428     0.0247
        0.2630     0.0242
        0.2833     0.0236
        0.3035     0.0229
        0.3237     0.0222
        0.3440     0.0213
        0.3642     0.0203
        0.3844     0.0192
        0.4047     0.0181
        0.4249     0.0168
        0.4451     0.0155
        0.4654     0.0141
        0.4856     0.0126
        0.5058     0.0110
        0.5260     0.0093
        0.5463     0.0076
        0.5665     0.0058
        0.5867     0.0040
    </tableData>
  </table>

  <!-- Reynolds-number correction for off-design RPM operation.
       Normalised to 1.0 at the baseline 10000 RPM data set above.
       Derived from APC PER3 static (J=0) values across RPM sweep.
  -->
  <table name="CP_RPM_FACTOR" type="internal">
    <tableData>
        1000   1.132
        2000   1.036
        3000   0.996
        4000   0.972
        5000   0.964
        6000   0.960
        7000   0.964
        8000   0.972
        9000   0.984
       10000   1.000
       11000   1.040
       12000   1.160
       13000   1.396
    </tableData>
  </table>
  <table name="CT_RPM_FACTOR" type="internal">
    <tableData>
        1000   0.923
        2000   0.927
        3000   0.931
        4000   0.935
        5000   0.941
        6000   0.950
        7000   0.959
        8000   0.970
        9000   0.983
       10000   1.000
       11000   1.020
       12000   1.044
       13000   1.061
    </tableData>
  </table>

</propeller>
