<?xml version="1.0" ?>
<propeller name="APC_7x5E">
	<ixx>0.000015</ixx>
	<diameter unit="IN">7.0</diameter>
	<numblades>2</numblades>
	<minpitch>5.0</minpitch>
	<maxpitch>5.0</maxpitch>
	<table name="C_THRUST" type="internal">
		<tableData>
		0.0 	0.1322
		0.03	0.1318
		0.07	0.1313
		0.1 	0.1308
		0.13	0.1301
		0.16	0.1292
		0.2 	0.128
		0.23	0.1265
		0.26	0.1246
		0.29	0.1222
		0.33	0.1193
		0.36	0.1159
		0.39	0.112
		0.43	0.1076
		0.46	0.1026
		0.49	0.0971
		0.52	0.0912
		0.56	0.0851
		0.59	0.0788
		0.62	0.0724
		0.66	0.0659
		0.69	0.0592
		0.72	0.0523
		0.75	0.0452
		0.79	0.0381
		0.82	0.0307
		0.85	0.0232
		0.88	0.0156
		0.92	0.0078
		0.95	0.0
		</tableData>
	</table>
	<table name="C_POWER" type="internal">
		<tableData>
		0.0 	0.0643
		0.03	0.0656
		0.07	0.0669
		0.1 	0.0682
		0.13	0.0695
		0.16	0.0708
		0.2 	0.0719
		0.23	0.0729
		0.26	0.0737
		0.29	0.0742
		0.33	0.0744
		0.36	0.0743
		0.39	0.0738
		0.43	0.0729
		0.46	0.0716
		0.49	0.0698
		0.52	0.0676
		0.56	0.0652
		0.59	0.0624
		0.62	0.0593
		0.66	0.0558
		0.69	0.0519
		0.72	0.0476
		0.75	0.0428
		0.79	0.0376
		0.82	0.0319
		0.85	0.0257
		0.88	0.0192
		0.92	0.0123
		0.95	0.0057
		</tableData>
	</table>
</propeller>
