<?xml version="1.0"?>
<!-- Generated by Aero-Matic v 0.7
     Date: 10 August 2005
     Version: 1.1

     Inputs:
       horsepower:   1600.0
       pitch:        variable

     Outputs:
       linear-blade-inches: 212


  References :
  ==========
  - http://www.airweb.faa.gov/Regulatory_and_Guidance_Library/rgMakeModel.nsf/MainFrame?OpenFrameSet
  (FAA certificate, TC704 - 25 january 1939, B-314) :

  Engine limits : * maximum except take-off (straight line manifold pressure variation) : 33.2 in. hg. 2100 rpm (1200 hp)
                  at 5400 ft, 35.0 in. hg. 2100 rpm (1200 hp) at sea level.
                  * take-off (2 minutes), 42.5 in. hg. 2400 rpm (1550 hp).

  Propeller : * Hamilton standard 3 blade constant speed, 6243A-3 to 6243A-6 inclusive, diameter 14'9-3/8" maximum
              14'5-5/8" minimum (1928 lb).
              * Hamilton standard 3 blade constant speed, 6159A-0 to 6159A-3 inclusive, diameter 14'3/8" maximum
              13'8-3/4" minimum (1819 lb).

  - http://www.airweb.faa.gov/Regulatory_and_Guidance_Library/rgMakeModel.nsf/MainFrame?OpenFrameSet
  (FAA certificate, TC704 - 2 may 1941 B-314A) :

  Engine limits : * maximum except take-off (straight line manifold pressure variation) : 35.8 in. hg. 2300 rpm (1350 hp)
                  at 6200 ft, 37.5 in. hg. 2300 rpm (1350 hp) at sea level.
                  * take-off (2 minutes), 43.5 in. hg. 2400 rpm (1600 hp).

  Propeller : Hamilton standard 3 blade constant speed, 6243A-3 to 6243A-6 inclusive, diameter 14'9-3/8" maximum
              14'5-5/8" minimum (1928 lb).

  - http://www.airweb.faa.gov/Regulatory_and_Guidance_Library/rgMakeModel.nsf/MainFrame?OpenFrameSet
  (FAA certificate, TC176 - Wright Double row Cyclone GR-260025) :

  16:9 or 16:7 reduction gears.


  J above 1.0 :
  ===========
  - http://naca.larc.nasa.gov/reports/1938/naca-report-640/ :
    The aerodynamics characteristics of full-scale propellers having 2, 3, and 4 blades of Clark Y and R.A.F. 6
    airfoil sections, Edwin P. Hartman and David Biermann, NACA 640, 1938.

  - http://naca.larc.nasa.gov/reports/1953/naca-tn-2966/ :
    Propeller-performance charts for transport airplanes, Jean Gilman, NACA 2966, July 1953.

  - http://naca.larc.nasa.gov/reports/1954/naca-tn-3228/ :
    Aerodynamic investigation of a four-blade propeller operating through an angle of attack range from 0 to 180 deg,
    H. Clyde McLemore and Michael D. Cannon, NACA 3228, June 1954.

-->

<!-- choiced a propeller of B-314 A. -->

<propeller name="Hamilton Standard 6243A-3">

  <!-- Gear ratio 1 :
       ============

       14.5 ft diameter :
       - with 75 in., not enough power to climb at full load.
       - multiply the aeromatic moment by 2.32 ^2 = 174/75 ^2.

       is a constant speed propeller because of 700-2400.

       thrust x 0.4, power x 0.2, 700 - 2400 rpm (propeller).

       Reduction gear ratio 16/9 :
       =========================

       divide min/max rpm (700/2400) by the gear ratio 1.778.
  -->

  <ixx> 20.405 </ixx>
  <diameter unit="IN"> 174.0 </diameter>
  <numblades> 3 </numblades>
  <gearratio> 1.778 </gearratio>                                            <!-- aeromatic none (1.0) -->
  <minpitch> 10 </minpitch>
  <maxpitch> 30 </maxpitch>
  <minrpm> 394 </minrpm>
  <maxrpm> 1350 </maxrpm>

  <table name="C_THRUST" type="internal">
    <tableData>
           10      30
      0.0  0.06739 0.0842
      0.1  0.06674 0.0838
      0.2  0.06610 0.0834
      0.3  0.06545 0.0830
      0.4  0.05963 0.0826
      0.5  0.01771 0.0822
      0.6  0.01512 0.0818
      0.7  0.01176 0.0782
      0.8  0.00864 0.0745
      0.9  0.00480 0.0705
      1.0  0.00096 0.0664
      1.2  0.00000 0.0567
      1.4  0.00000 0.0441
      1.6  0.00000 0.0324
      1.8  0.00000 0.0180
      2.0  0.00000 0.0036
    </tableData>
  </table>

  <table name="C_POWER" type="internal">
    <tableData>
             10      30
        0.0  0.01144 0.05198
        0.1  0.01126 0.05159
        0.2  0.01109 0.05119
        0.3  0.01074 0.05080
        0.4  0.01040 0.05040
        0.5  0.01005 0.04962
        0.6  0.00953 0.04883
        0.7  0.00832 0.04804
        0.8  0.00658 0.04725
        0.9  0.00433 0.04647
        1.0  0.00173 0.04568
        1.2  0.00000 0.04331
        1.4  0.00000 0.03780
        1.6  0.00000 0.02993
        1.8  0.00000 0.01969
        2.0  0.00000 0.00788
    </tableData>
  </table>
</propeller>
