<?xml version="1.0"?>
<propeller name="Jetfan 90mm v2" version="1.1"> <!-- UMN Testdata -->
  <ixx unit="KG*M2"> 0.00002 </ixx> <!-- Unknown -->
  <diameter unit="IN"> 3.54331 </diameter>
  <numblades> 9 </numblades>
  <constspeed> 0 </constspeed>

  <table name="C_THRUST" type="internal">
    <tableData>
        0.0000    1.0649
        0.2000    0.9765
        0.4000    0.8886
        0.6000    0.8011
        0.8000    0.7142
        1.0000    0.6278
        1.2000    0.5420
        1.4000    0.4566
        1.6000    0.3717
        1.8000    0.2874
        2.0000    0.2035
        2.2000    0.1202
        2.4000    0.0374
        2.6000    0.0000
    </tableData>
  </table>

  <table name="C_POWER" type = "internal">
    <tableData>
        0.0000    1.3390
        0.2000    1.4526
        0.4000    1.5326
        0.6000    1.5790
        0.8000    1.5919
        1.0000    1.5713
        1.2000    1.5171
        1.4000    1.4293
        1.6000    1.3080
        1.8000    1.1532
        2.0000    0.9648
        2.2000    0.7428
        2.4000    0.4873
        2.6000    0.0000
    </tableData>
  </table>

</propeller>
