<?xml version="1.0"?>
<!--
  File:     R-1820-97.xml
  Author:   Aero-Matic v 0.81

  Inputs:
    name:           R-1820-97
    type:           piston
    power:          1200 hp
    augmented?      no
    injected?       no
-->

<piston_engine name="R-1820-97">
  <minmp unit="INHG">          6.0 </minmp>
  <!-- Deprecated -->
  <maxmp unit="INHG">         29.9 </maxmp>
  <!-- Deprecated -->
  <displacement unit="IN3"> 2280.00 </displacement>
  <!-- Defining <bsfc> over-rides the bsfc value calculated from <maxhp> -->
  <!--<bsfc>           0.45 </bsfc>-->
  <maxhp>        1200.00 </maxhp>
  <cycles>         4.0 </cycles>
  <idlerpm>      700.0 </idlerpm>
  <maxrpm>      2800.0 </maxrpm>
  <maxthrottle>    1.0 </maxthrottle>
  <minthrottle>    0.2 </minthrottle>
  <sparkfaildrop>  0.0 </sparkfaildrop>
</piston_engine>
