<?xml version="1.0" ?>

  <turbine_engine name="YJ93-GE-3">
  <milthrust> 19900 </milthrust>
  <maxthrust> 28800 </maxthrust>
  <bypassratio> 0.0 </bypassratio>
  <tsfc> 0.700 </tsfc>
  <atsfc> 1.800 </atsfc>
  <idlen1> 30.0 </idlen1>
  <idlen2> 60.0 </idlen2>
  <maxn1> 102.0 </maxn1>
  <maxn2> 106.0 </maxn2>
  <augmented> 1 </augmented>
  <augmethod> 1 </augmethod>
  <injected> 0 </injected>

  <function name="IdleThrust">
      <table>
          <independentVar lookup="row">velocities/mach</independentVar>
          <independentVar lookup="column">atmosphere/density-altitude</independentVar>
          <tableData>
              -10000     0     10000   20000   30000   40000   50000
              0.0  0.0430  0.0488  0.0528  0.0694  0.0899  0.1183  0.1467
              0.2  0.0500  0.0501  0.0335  0.0544  0.0797  0.1049  0.1342
              0.4  0.0040  0.0047  0.0020  0.0272  0.0595  0.0891  0.1203
              0.6  0.0     0.0     0.0     0.0     0.0276  0.0718  0.1073
              0.8  0.0     0.0     0.0     0.0     0.0474  0.0868  0.0900
              1.0  0.0     0.0     0.0     0.0     0.0     0.0552  0.0800
          </tableData>
      </table>
  </function>

  <function name="MilThrust">
      <table>
          <independentVar lookup="row">velocities/mach</independentVar>
          <independentVar lookup="column">atmosphere/density-altitude</independentVar>
          <tableData>
		    -10000	 0   10000   20000   30000   40000   50000 60000
              0.0   1.2600  1.0000  0.7400  0.5340  0.3720  0.2410  0.1490 0.01
              0.2   1.1710  0.9340  0.6970  0.5060  0.3550  0.2310  0.1430 0.01
              0.4   1.1500  0.9210  0.6920  0.5060  0.3570  0.2330  0.1450 0.01
              0.6   1.1810  0.9510  0.7210  0.5320  0.3780  0.2480  0.1540 0.01
              0.8   1.2580  1.0200  0.7820  0.5820  0.4170  0.2750  0.1700 0.01
              1.0   1.3690  1.1200  0.8710  0.6510  0.4750  0.3150  0.1950 0.01
              1.2   1.4850  1.2300  0.9750  0.7440  0.5450  0.3640  0.2250 0.01
              1.4   1.5941  1.3400  1.0860  0.8450  0.6280  0.4240  0.2630 0.01
              1.6   0.01    0.01    0.01    0.01    0.01    0.01    0.01   0.01
          </tableData>
      </table>
  </function>

  <function name="AugThrust">
      <table>
          <independentVar lookup="row">velocities/mach</independentVar>
          <independentVar lookup="column">atmosphere/density-altitude</independentVar>
          <tableData>
			-10000	0	10000	20000	30000	40000	50000	60000	70000	77500	85000  100000
              0.00	1.1816	1.0000	0.8184	0.6627	0.5280	0.3756	0.2327	0.1280	0.0880	0.0550	0.0275  0.0010
              0.20	1.1308	0.9599	0.7890	0.6406	0.5116	0.3645	0.2258	0.1242	0.0844	0.0528	0.0264  0.0010
              0.40	1.1150	0.9474	0.7798	0.6340	0.5070	0.3615	0.2240	0.1232	0.0833	0.0521	0.0261  0.0010
              0.60	1.1284	0.9589	0.7894	0.6420	0.5134	0.3661	0.2268	0.1247	0.0844	0.0527	0.0264  0.0010
              0.80	1.1707	0.9942	0.8177	0.6647	0.5309	0.3784	0.2345	0.1290	0.0875	0.0547	0.0274  0.0010
              1.00	1.2411	1.0529	0.8648	0.7017	0.5596	0.3983	0.2467	0.1357	0.0926	0.0579	0.0290  0.0010
              1.05	1.2163	1.0318	0.8475	0.6877	0.5784	0.4053	0.2418	0.1330	0.0907	0.0567	0.0284  0.0010
              1.15	1.2411	1.0529	0.8648	0.7017	0.6596	0.4383	0.2767	0.1357	0.0926	0.0579	0.0290  0.0010
              1.20	1.5944	1.3505	1.1065	0.8954	0.7123	0.5063	0.3137	0.1726	0.1188	0.0743	0.0371  0.0010
              1.40	2.1548	1.8224	1.4900	1.2032	0.9540	0.6764	0.4191	0.2307	0.1604	0.1002	0.0501  0.0010
              1.60	2.6709	2.2542	1.8375	1.4790	1.1686	0.8262	0.5119	0.2815	0.1984	0.1239	0.0620  0.0010
              1.80	3.1142	2.6242	2.1343	1.7122	1.3491	0.9520	0.5899	0.3244	0.2309	0.1444	0.0722  0.0010
              2.00	3.4797	2.9830	2.4863	1.9901	1.5610	1.0993	0.6812	0.3747	0.2626	0.1640	0.0820  0.0010
              2.20	3.9400	3.3800	2.8200	2.4800	1.8200	1.2718	0.7880	0.4334	0.2974	0.1858	0.0929  0.0010
              2.40	4.5540	3.9600	3.3660	2.9480	2.2000	1.5840	1.0120	0.5566	0.3485	0.2178	0.1089  0.0010
              2.60	5.2800	4.6080	3.9360	3.4560	2.6400	1.9200	1.2480	0.6864	0.4054	0.2534	0.1267  0.0010
              2.75	0.1000	0.1000	0.1000	0.1000	0.1000	0.1000	1.3455	0.7526	0.4066	0.2527	0.1263  0.0010
              2.90	0.1000	0.1000	0.1000	0.1000	0.1000	0.1000	1.4786	0.8271	0.4156	0.2535	0.1267  0.0010
              3.05	0.1000	0.1000	0.1000	0.1000	0.1000	0.1000	1.6211	0.9069	0.4241	0.2560	0.1280  0.0010
              3.15	0.1000	0.1000	0.1000	0.1000	0.1000	0.1000	1.4630	0.8184	0.3828	0.2311	0.1155  0.0010
              3.25	0.1000	0.1000	0.1000	0.1000	0.1000	0.1000	0.1000	0.1000	0.1000	0.0100  0.0010  0.0010

          </tableData>
      </table>
</function>

</turbine_engine>
