<?xml version="1.0" ?>
<!-- $Id: dowty-rotol-aero.xml,v 1.1 2015/04/17 21:17:34 bcoconni Exp $ -->

<!--

  References :
  ==========

  - NACA Report 378

-->

<propeller name="dowty-rotol">

  <ixx> 10.405 </ixx>
  <diameter unit="IN"> 144.0 </diameter>
  <numblades> 6 </numblades>
  <gearratio> 2.22 </gearratio>
  <minrpm> 750 </minrpm>
  <maxrpm> 1296 </maxrpm>
  <minpitch> 0 </minpitch>
  <maxpitch> 45 </maxpitch>
<ct_factor>1.6</ct_factor>
<cp_factor>1.5</cp_factor>

  <table name="C_THRUST" type="internal">
      <tableData>
	0	15	30	45
0	0.07	0.11	0.15	0.19
0.15	0.05	0.1	0.15	0.2
0.3	0.03	0.09	0.15	0.21
0.45	0.01	0.08	0.15	0.23
0.6	-0.03	0.06	0.15	0.24
0.75	-0.07	0.04	0.15	0.26
0.9	-0.1	0.02	0.14	0.27
1.05	-0.13	0	0.13	0.26
1.2	-0.17	-0.03	0.11	0.26
1.5	-0.22	-0.07	0.08	0.22
1.8	-0.28	-0.12	0.06	0.18
2.1	-0.32	-0.16	0.03	0.14
2.4	-0.39	-0.21	0	0.1
      </tableData>
  </table>

  <table name="C_POWER" type="internal">
     <tableData>
	0	15	30	45
0	0.008	0.010	0.12	0.250
0.13	0.008	0.010	0.12	0.250
0.26	0.008	0.010	0.12	0.260
0.39	0.007	0.009	0.12	0.260
0.52	0.006	0.008	0.12	0.280
0.65	0.005	0.007	0.12	0.290
0.78	0.004	0.005	0.12	0.300
0.91	0.002	0.003	0.11	0.320
1.04	0.000	0.002	0.11	0.330
1.3	-0.005	-0.004	0.11	0.330
1.56	-0.011	-0.011	0.1	0.330
1.82	-0.021	-0.020	0.11	0.360
2.08	-0.029	-0.029	0.11	0.390
2.34	-0.040	-0.040	0.07	0.290
2.6	-0.049	-0.050	0.03	0.190
2.86	-0.059	-0.059	-0.01	0.090
3.12	-0.069	-0.069	-0.05	-0.010
     </tableData>
  </table>
</propeller>
