<?xml version="1.0"?>
<!--
  File:     IO470D.xml
  Author:   Aero-Matic v 0.8

  Inputs:
    name:           IO470D
    type:           piston
    power:          260.0 hp
    augmented?      no
    injected?       no
-->

<piston_engine name="IO470D">
  <minmp unit="INHG">          6.5 </minmp>	<!-- Deprecated -->
  <maxmp unit="INHG">         28.5 </maxmp>	<!-- Deprecated -->
  <displacement unit="IN3">  470.0 </displacement>
  <maxhp>        260.00 </maxhp>		<!-- Deprecated -->
  <bsfc>           0.45 </bsfc>
  <cycles>         4.0 </cycles>
  <idlerpm>      900.0 </idlerpm>
  <maxrpm>      2600.0 </maxrpm>
  <maxthrottle>    1.0 </maxthrottle>
  <minthrottle>    0.2 </minthrottle>
  <sparkfaildrop>  0.0 </sparkfaildrop>
</piston_engine>
