<?xml version="1.0"?>
<!--
  File:     engIO540AB1A5.xml
  Author:   Aero-Matic v 0.8

  Inputs:
    name:           engIO540AB1A5
    type:           piston
    power:          230.0 hp
    augmented?      no
    injected?       no
-->

<piston_engine name="IO540AB1A5">
  <minmp unit="INHG">          6.5 </minmp>	<!-- Deprecated -->
  <maxmp unit="INHG">         28.5 </maxmp>	<!-- Deprecated -->
  <displacement unit="IN3">  540.0 </displacement>
  <maxhp>        230.0 </maxhp>			<!-- Deprecated -->
  <bsfc>           0.45 </bsfc>
  <cycles>         4.0 </cycles>
  <idlerpm>      900.0 </idlerpm>
  <maxrpm>      2575.0 </maxrpm>
  <maxthrottle>    1.0 </maxthrottle>
  <minthrottle>    0.2 </minthrottle>
  <sparkfaildrop>  0.0 </sparkfaildrop>
</piston_engine>
