<?xml version="1.0"?>
<!--
  File:     engRRMerlinXII.xml
  Author:   Aero-Matic v 0.8

  Inputs:
    name:           RR-Merlin_XII
    type:           piston
    power:          160.0 hp
    augmented?      no
    injected?       no
-->

<piston_engine name="RR-Merlin_XII">
  <minmp unit="INHG">          6.5 </minmp>	<!-- Deprecated -->
  <maxmp unit="INHG">         29.92 </maxmp>	<!-- Deprecated -->
  <displacement unit="IN3"> 1649.00 </displacement>
  <maxhp>       1650.00 </maxhp>		<!-- Deprecated -->
  <cycles>         4.0 </cycles>
  <idlerpm>      700.0 </idlerpm>
  <maxrpm>      3000.0 </maxrpm>
  <bsfc>           0.45 </bsfc>
  <maxthrottle>    1.0 </maxthrottle>
  <minthrottle>    0.2 </minthrottle>
  <numboostspeeds> 1   </numboostspeeds>
  <boostoverride>  1   </boostoverride>
  <ratedboost1>    9   </ratedboost1>
  <ratedpower1> 1150   </ratedpower1>
  <ratedrpm1>   2850   </ratedrpm1>
  <ratedaltitude1> 13000 </ratedaltitude1>
  <takeoffboost> 12    </takeoffboost>
  <sparkfaildrop>  0.0 </sparkfaildrop>
</piston_engine>
